// SBML level 2 version 3

model cell_cycle_v3.1.0()

  // Compartments:
  compartment cell = 1;

  // Species:
  species cell_CCND in cell = 6.022e23; cell_CCND is "@cell::CCND()";
  species cell_CCNE_CDKN1A in cell = 1.3986043e23; cell_CCNE_CDKN1A is "@cell::CCNE(CDKN1A)";
  species cell_E2F_DBD_RB1_Ser332_u in cell = 1.1128068e22; cell_E2F_DBD_RB1_Ser332_u is "@cell::E2F(DBD,RB1,Ser332~u)";
  species cell_E2F_DBD_RB1_Ser332_p in cell = 2.2932894e19; cell_E2F_DBD_RB1_Ser332_p is "@cell::E2F(DBD,RB1,Ser332~p)";
  species cell_CCNA_CDKN1A in cell = 4.2325597e21; cell_CCNA_CDKN1A is "@cell::CCNA(CDKN1A)";
  species cell_CCNB_CDK1_Thr14_Tyr15_u in cell = 1.133559e21; cell_CCNB_CDK1_Thr14_Tyr15_u is "@cell::CCNB(CDK1_Thr14_Tyr15~u)";
  species S7 in cell = 4.3034014e22; S7 is "@cell::E2F(DBD,RB1!1,Ser332~u).RB1(E2F!1,Ser807_Ser811~u)";
  species S8 in cell = 9.065434e19; S8 is "@cell::E2F(DBD,RB1!1,Ser332~p).RB1(E2F!1,Ser807_Ser811~u)";
  species cell_RB1_E2F_Ser807_Ser811_u in cell = 5.2778426e22; cell_RB1_E2F_Ser807_Ser811_u is "@cell::RB1(E2F,Ser807_Ser811~u)";
  species cell_RB1_E2F_Ser807_Ser811_p in cell = 5.0629691e23; cell_RB1_E2F_Ser807_Ser811_p is "@cell::RB1(E2F,Ser807_Ser811~p)";
  species cell_PPP2R2B_ENSA_ARPP19 in cell = 4.6484797e22; cell_PPP2R2B_ENSA_ARPP19 is "@cell::PPP2R2B(ENSA_ARPP19)";
  species S12 in cell = 2.4260911e24; S12 is "@cell::APC(FBXO5,FZR1_CDC20,Ser355~u)";
  species cell_CDC20_APC in cell = 1.3847757e23; cell_CDC20_APC is "@cell::CDC20(APC)";
  species S14 in cell = 4.2087805e22; S14 is "@cell::APC(FBXO5,FZR1_CDC20!1,Ser355~p).CDC20(APC!1)";
  species S15 in cell = 3.7993439e22; S15 is "@cell::APC(FBXO5,FZR1_CDC20,Ser355~p)";
  species S16 in cell = 4.2969631e23; S16 is "@cell::APC(FBXO5,FZR1_CDC20!1,Ser355~u).FZR1(APC!1,FBXO5,nTerm~u)";
  species cell_FZR1_APC_FBXO5_nTerm_u in cell = 3.4406152e20; cell_FZR1_APC_FBXO5_nTerm_u is "@cell::FZR1(APC,FBXO5,nTerm~u)";
  species cell_FZR1_APC_FBXO5_nTerm_p in cell = 9.7028319e22; cell_FZR1_APC_FBXO5_nTerm_p is "@cell::FZR1(APC,FBXO5,nTerm~p)";
  species S19 in cell = 6.5604459e22; S19 is "@cell::APC(FBXO5!1,FZR1_CDC20!2,Ser355~u).FBXO5(APC!1,FZR1!3,Ser182~u).FZR1(APC!2,FBXO5!3,nTerm~u)";
  species cell_FBXO5_APC_FZR1_Ser182_u in cell = 4.3226888e20; cell_FBXO5_APC_FZR1_Ser182_u is "@cell::FBXO5(APC,FZR1,Ser182~u)";
  species S21 in cell = 1.3323959e21; S21 is "@cell::APC(FBXO5!1,FZR1_CDC20!2,Ser355~p).FBXO5(APC!1,FZR1!3,Ser182~u).FZR1(APC!2,FBXO5!3,nTerm~u)";
  species S22 in cell = 8.1944566e21; S22 is "@cell::APC(FBXO5,FZR1_CDC20!1,Ser355~p).FZR1(APC!1,FBXO5,nTerm~u)";
  species cell_FBXO5_APC_FZR1_Ser182_p in cell = 1.1324333e19; cell_FBXO5_APC_FZR1_Ser182_p is "@cell::FBXO5(APC,FZR1,Ser182~p)";
  species cell_FOXM1_DBD_Thr600_u in cell = 3.3510826e21; cell_FOXM1_DBD_Thr600_u is "@cell::FOXM1(DBD,Thr600~u)";
  species cell_FOXM1_DBD_Thr600_p in cell = 2.2950816e20; cell_FOXM1_DBD_Thr600_p is "@cell::FOXM1(DBD,Thr600~p)";
  species S26 in cell = 1.1461427e17; S26 is "@cell::CCNB_promoter(FOXM1!1).FOXM1(DBD!1,Thr600~p)";
  species cell_CCNB_promoter_FOXM1 in cell = 6.0105386e19; cell_CCNB_promoter_FOXM1 is "@cell::CCNB_promoter(FOXM1)";
  species cell_CDC20_promoter_FOXM1 in cell = 6.0174121e19; cell_CDC20_promoter_FOXM1 is "@cell::CDC20_promoter(FOXM1)";
  species S29 in cell = 4.5878816e16; S29 is "@cell::CDC20_promoter(FOXM1!1).FOXM1(DBD!1,Thr600~p)";
  species cell_WEE1_Ser123_u in cell = 5.9042195e23; cell_WEE1_Ser123_u is "@cell::WEE1(Ser123~u)";
  species cell_CCNB_CDK1_Thr14_Tyr15_p in cell = 4.5242773e21; cell_CCNB_CDK1_Thr14_Tyr15_p is "@cell::CCNB(CDK1_Thr14_Tyr15~p)";
  species cell_WEE1_Ser123_p in cell = 1.1778049e22; cell_WEE1_Ser123_p is "@cell::WEE1(Ser123~p)";
  species cell_CDC25_pSites_p in cell = 1.1103404e22; cell_CDC25_pSites_p is "@cell::CDC25(pSites~p)";
  species cell_CDC25_pSites_u in cell = 5.910966e23; cell_CDC25_pSites_u is "@cell::CDC25(pSites~u)";
  species cell_MASTL_Thr198_u in cell = 6.0070998e23; cell_MASTL_Thr198_u is "@cell::MASTL(Thr198~u)";
  species cell_MASTL_Thr198_p in cell = 1.4900204e21; cell_MASTL_Thr198_p is "@cell::MASTL(Thr198~p)";
  species S37 in cell = 4.9793694e23; S37 is "@cell::ENSA_ARPP19(PPP2R2B,Ser62_Ser67~u)";
  species S38 in cell = 1.9785953e20; S38 is "@cell::ENSA_ARPP19(PPP2R2B,Ser62_Ser67~p)";
  species S39 in cell = 1.040652e23; S39 is "@cell::ENSA_ARPP19(PPP2R2B!1,Ser62_Ser67~p).PPP2R2B(ENSA_ARPP19!1)";
  species cell_CCNE_promoter_E2F in cell = 5.0873268e19; cell_CCNE_promoter_E2F is "@cell::CCNE_promoter(E2F)";
  species cell_CCNA_promoter_E2F in cell = 5.0873268e19; cell_CCNA_promoter_E2F is "@cell::CCNA_promoter(E2F)";
  species cell_E2F_promoter_E2F in cell = 5.0873268e19; cell_E2F_promoter_E2F is "@cell::E2F_promoter(E2F)";
  species cell_FBXO5_promoter_E2F in cell = 5.0873268e19; cell_FBXO5_promoter_E2F is "@cell::FBXO5_promoter(E2F)";
  species cell_FOXM1_promoter_E2F in cell = 5.0873268e19; cell_FOXM1_promoter_E2F is "@cell::FOXM1_promoter(E2F)";
  species S45 in cell = 9.3467317e18; S45 is "@cell::CCNE_promoter(E2F!1).E2F(DBD!1,RB1,Ser332~u)";
  species S46 in cell = 9.3467317e18; S46 is "@cell::CCNA_promoter(E2F!1).E2F(DBD!1,RB1,Ser332~u)";
  species S47 in cell = 9.3467317e18; S47 is "@cell::E2F(DBD!1,RB1,Ser332~u).E2F_promoter(E2F!1)";
  species S48 in cell = 9.3467317e18; S48 is "@cell::E2F(DBD!1,RB1,Ser332~u).FBXO5_promoter(E2F!1)";
  species S49 in cell = 9.3467317e18; S49 is "@cell::E2F(DBD!1,RB1,Ser332~u).FOXM1_promoter(E2F!1)";
  species cell_iWEE in cell = 0; cell_iWEE is "@cell::iWEE()";
  species cell_SKP2 in cell = 6.022e23; cell_SKP2 is "@cell::SKP2()";
  species cell_TP53_DBD_Ser15_p in cell = 0; cell_TP53_DBD_Ser15_p is "@cell::TP53(DBD,Ser15~p)";
  species cell_CDKN1A_promoter_TP53 in cell = 5.0873268e19; cell_CDKN1A_promoter_TP53 is "@cell::CDKN1A_promoter(TP53)";
  species S54 in cell = 0; S54 is "@cell::CCNB_promoter(FOXM1!1).FOXM1(DBD!1,Thr600~u)";
  species S55 in cell = 0; S55 is "@cell::CDC20_promoter(FOXM1!1).FOXM1(DBD!1,Thr600~u)";
  species S56 in cell = 0; S56 is "@cell::CDKN1A_promoter(TP53!1).TP53(DBD!1,Ser15~p)";
  species cell_CDKN1A_CCNA_CCNE_Ser130_u in cell = 0; cell_CDKN1A_CCNA_CCNE_Ser130_u is "@cell::CDKN1A(CCNA_CCNE,Ser130~u)";
  species S58 in cell = 0; S58 is "@cell::CCNA(CDKN1A!1).CDKN1A(CCNA_CCNE!1,Ser130~u)";
  species S59 in cell = 0; S59 is "@cell::CCNE(CDKN1A!1).CDKN1A(CCNA_CCNE!1,Ser130~u)";
  species cell_CDKN1A_CCNA_CCNE_Ser130_p in cell = 0; cell_CDKN1A_CCNA_CCNE_Ser130_p is "@cell::CDKN1A(CCNA_CCNE,Ser130~p)";

  // Parameters:
  kPhRbD = 9.206253e-27;
  kPhRbE = 1.1507816e-26;
  kDpRb = 0.0013860014;
  kPhRb = 3.4523449e-26;
  kSyCe1 = 8.3465003e18;
  kSyCe2 = 4.1580042;
  kDeCe = 0.00013860014;
  kDiE2fRb = 0.00034650035;
  kAsE2fRb = 5.7539081e-25;
  kSyE2f1 = 4.1732502e18;
  kSyE2f2 = 0.69300069;
  kDeE2f1 = 6.9300069e-5;
  kDeE2f2 = 2.3015632e-27;
  kPhE2f = 2.3015632e-27;
  kDpE2f2 = 1.1507816e-25;
  kSyEmi1 = 2.0866251e19;
  kSyEmi2 = 3.4650035;
  kDeEmi1 = 0.00034650035;
  kDeEmi2 = 0.00034650035;
  kDeEmi3 = 0.0034650035;
  kPhEmiA = 5.7539081e-29;
  kPhEmiB = 2.8769541e-28;
  kDpEmi = 3.4650035e-6;
  kSyCa1 = 4.1732502e18;
  kSyCa2 = 0.51975052;
  kDeCa1 = 6.9300069e-6;
  kDeCa2 = 4.6031265e-27;
  kDeCa3 = 1.1507816e-27;
  kDpCdh = 0.0034650035;
  kPhCdhA = 2.8769541e-26;
  kPhCdhE = 1.1507816e-27;
  kPhCdhB = 2.8769541e-25;
  kDiACE = 0.00034650035;
  kAsACE = 5.7539081e-25;
  kDiACdh = 0.00034650035;
  kAsACdh = 5.7539081e-25;
  kPhCeA = 1.1507816e-26;
  kPhCeE = 1.1507816e-28;
  kPhFoxE = 1.1507816e-27;
  kPhFoxA = 1.1507816e-27;
  kPhFoxB = 5.7539081e-27;
  kDpFox = 1e-5;
  kSyCb1 = 4.1732502e18;
  kSyCb2 = 0.51975052;
  kDeCb1 = 6.9300069e-6;
  kDeCb2 = 1.438477e-27;
  kDeCb3 = 1.438477e-27;
  kPhEnsa = 1.1507816e-27;
  kDpEnsa = 0.00034650035;
  kPhGw = 1.1507816e-26;
  kDpGw1 = 0.0017325017;
  kDpGw2 = 1.1507816e-25;
  kWee1 = 1.1507816e-28;
  kWee2 = 1.1507816e-26;
  kPhWeeA = 1.1507816e-27;
  kPhWeeB = 1.1507816e-26;
  kDpWee = 1.1507816e-25;
  kCdc25_1 = 1.1507816e-27;
  kCdc25_2 = 1.1507816e-26;
  kDpCdc25 = 1.1507816e-25;
  kDipEB55 = 4.7124047e-5;
  kAspEB55 = 6.5594552e-25;
  kSyCdc_1 = 4.1732502e18;
  kSyCdc_2 = 0.69300069;
  kDeCdc_1 = 2.7720028e-5;
  kDeCdc_2 = 4.6031265e-28;
  kDipACdc = 0.00086625087;
  kAspACdc = 1.1507816e-26;
  kPhApcA = 1.1507816e-28;
  kDpApc_1 = 0;
  kDpApc_2 = 5.7539081e-26;
  kSyFox1 = 4.1732502e18;
  kSyFox2 = 0.51975052;
  kDeFox1 = 6.9300069e-6;
  kDeFox2 = 5.7539081e-27;
  kAsEPx = 5.7539081e-25;
  kDiEPx = 0.034650035;
  kAsFPcb = 5.7539081e-25;
  kDiFPcb = 0.069300069;
  kAsFPcdc = 5.7539081e-25;
  kDiFPcdc = 0.17325017;
  kPhC25B = 1.1507816e-26;
  kPhCAEE = 9.2062529e-28;
  kPhCAEA = 2.3015632e-26;
  kPhCAEB = 2.3015632e-25;
  ikSyCb = 1;
  jiWee = 6.022e22;
  kDpE2f1 = 0;
  kPhC25A = 0;
  kSySkp2 = 6.022e19;
  kDeSkp2_1 = 0.0001;
  kDeSkp2_2 = 3.3211558e-27;
  kAsTP53PCDKN1A = 4.9817336e-25;
  kDiTP53PCDKN1A = 0.15;
  kSyCDKN1A_1 = 6.022e18;
  kSyCDKN1A_2 = 4;
  kDeCDKN1A_1 = 2e-5;
  kDeCDKN1A_2 = 4.1514447e-28;
  kAsCdkn1aC = 1.1624045e-26;
  kDiCdkn1aC = 0.0003;
  kPhCDKN1A = 8.3028894e-27;
  kDpCDKN1A = 0.002;
  _InitialConc1 = 6.022e23;
  _InitialConc2 = 1.3986043e23;
  _InitialConc3 = 1.1128068e22;
  _InitialConc4 = 2.2932894e19;
  _InitialConc5 = 4.2325597e21;
  _InitialConc6 = 1.133559e21;
  _InitialConc7 = 4.3034014e22;
  _InitialConc8 = 9.065434e19;
  _InitialConc9 = 5.2778426e22;
  _InitialConc10 = 5.0629691e23;
  _InitialConc11 = 4.6484797e22;
  _InitialConc12 = 2.4260911e24;
  _InitialConc13 = 1.3847757e23;
  _InitialConc14 = 4.2087805e22;
  _InitialConc15 = 3.7993439e22;
  _InitialConc16 = 4.2969631e23;
  _InitialConc17 = 3.4406152e20;
  _InitialConc18 = 9.7028319e22;
  _InitialConc19 = 6.5604459e22;
  _InitialConc20 = 4.3226888e20;
  _InitialConc21 = 1.3323959e21;
  _InitialConc22 = 8.1944566e21;
  _InitialConc23 = 1.1324333e19;
  _InitialConc24 = 3.3510826e21;
  _InitialConc25 = 2.2950816e20;
  _InitialConc26 = 1.1461427e17;
  _InitialConc27 = 6.0105386e19;
  _InitialConc28 = 6.0174121e19;
  _InitialConc29 = 4.5878816e16;
  _InitialConc30 = 5.9042195e23;
  _InitialConc31 = 4.5242773e21;
  _InitialConc32 = 1.1778049e22;
  _InitialConc33 = 1.1103404e22;
  _InitialConc34 = 5.910966e23;
  _InitialConc35 = 6.0070998e23;
  _InitialConc36 = 1.4900204e21;
  _InitialConc37 = 4.9793694e23;
  _InitialConc38 = 1.9785953e20;
  _InitialConc39 = 1.040652e23;
  _InitialConc40 = 5.0873268e19;
  _InitialConc41 = 5.0873268e19;
  _InitialConc42 = 5.0873268e19;
  _InitialConc43 = 5.0873268e19;
  _InitialConc44 = 5.0873268e19;
  _InitialConc45 = 9.3467317e18;
  _InitialConc46 = 9.3467317e18;
  _InitialConc47 = 9.3467317e18;
  _InitialConc48 = 9.3467317e18;
  _InitialConc49 = 9.3467317e18;
  _InitialConc50 = 0;
  _InitialConc51 = 6.022e23;
  _InitialConc52 = 0;
  _InitialConc53 = 5.0873268e19;
  _rateLaw1 = kSyCb1*ikSyCb;
  _rateLaw2 = kSyCb2*ikSyCb;

  // Assignment rules:
  tCCNE := cell_CCNE_CDKN1A + S59;
  tCCNA := cell_CCNA_CDKN1A + S58;
  tCCNB := cell_CCNB_CDK1_Thr14_Tyr15_u + cell_CCNB_CDK1_Thr14_Tyr15_p;
  tCDKN1A := cell_CDKN1A_CCNA_CCNE_Ser130_u + S58 + S59 + cell_CDKN1A_CCNA_CCNE_Ser130_p;

  // Reactions:
  R1: => cell_E2F_DBD_RB1_Ser332_u; kSyE2f1;
  R2: cell_FOXM1_DBD_Thr600_p + cell_CCNB_promoter_FOXM1 => S26; kAsFPcb*cell_FOXM1_DBD_Thr600_p*cell_CCNB_promoter_FOXM1;
  R3: S26 => cell_FOXM1_DBD_Thr600_p + cell_CCNB_promoter_FOXM1; kDiFPcb*S26;
  R4: S47 => cell_E2F_DBD_RB1_Ser332_u + S47; kSyE2f2*S47;
  R5: cell_E2F_DBD_RB1_Ser332_u => ; kDeE2f1*cell_E2F_DBD_RB1_Ser332_u;
  R6: cell_E2F_DBD_RB1_Ser332_p => ; kDeE2f1*cell_E2F_DBD_RB1_Ser332_p;
  R7: S7 => cell_RB1_E2F_Ser807_Ser811_u; kDeE2f1*S7;
  R8: S8 => cell_RB1_E2F_Ser807_Ser811_u; kDeE2f1*S8;
  R9: S45 => cell_CCNE_promoter_E2F; kDeE2f1*S45;
  R10: S46 => cell_CCNA_promoter_E2F; kDeE2f1*S46;
  R11: S47 => cell_E2F_promoter_E2F; kDeE2f1*S47;
  R12: S48 => cell_FBXO5_promoter_E2F; kDeE2f1*S48;
  R13: S49 => cell_FOXM1_promoter_E2F; kDeE2f1*S49;
  R14: cell_CCND + S7 => cell_CCND + cell_E2F_DBD_RB1_Ser332_u + cell_RB1_E2F_Ser807_Ser811_p; kPhRbD*cell_CCND*S7;
  R15: cell_CCND + S8 => cell_CCND + cell_E2F_DBD_RB1_Ser332_p + cell_RB1_E2F_Ser807_Ser811_p; kPhRbD*cell_CCND*S8;
  R16: cell_CCNE_CDKN1A + S7 => cell_CCNE_CDKN1A + cell_E2F_DBD_RB1_Ser332_u + cell_RB1_E2F_Ser807_Ser811_p; kPhRbE*cell_CCNE_CDKN1A*S7;
  R17: cell_CCNE_CDKN1A + S8 => cell_CCNE_CDKN1A + cell_E2F_DBD_RB1_Ser332_p + cell_RB1_E2F_Ser807_Ser811_p; kPhRbE*cell_CCNE_CDKN1A*S8;
  R18: cell_CCNA_CDKN1A + S7 => cell_E2F_DBD_RB1_Ser332_u + cell_CCNA_CDKN1A + cell_RB1_E2F_Ser807_Ser811_p; kPhRb*cell_CCNA_CDKN1A*S7;
  R19: cell_CCNA_CDKN1A + S8 => cell_E2F_DBD_RB1_Ser332_p + cell_CCNA_CDKN1A + cell_RB1_E2F_Ser807_Ser811_p; kPhRb*cell_CCNA_CDKN1A*S8;
  R20: cell_CCNB_CDK1_Thr14_Tyr15_u + S7 => cell_E2F_DBD_RB1_Ser332_u + cell_CCNB_CDK1_Thr14_Tyr15_u + cell_RB1_E2F_Ser807_Ser811_p; kPhRb*cell_CCNB_CDK1_Thr14_Tyr15_u*S7;
  R21: cell_CCNB_CDK1_Thr14_Tyr15_u + S8 => cell_E2F_DBD_RB1_Ser332_p + cell_CCNB_CDK1_Thr14_Tyr15_u + cell_RB1_E2F_Ser807_Ser811_p; kPhRb*cell_CCNB_CDK1_Thr14_Tyr15_u*S8;
  R22: cell_E2F_DBD_RB1_Ser332_u + cell_CCNA_CDKN1A => cell_E2F_DBD_RB1_Ser332_p + cell_CCNA_CDKN1A; kPhE2f*cell_E2F_DBD_RB1_Ser332_u*cell_CCNA_CDKN1A;
  R23: cell_CCNA_CDKN1A + S7 => cell_CCNA_CDKN1A + S8; kPhE2f*cell_CCNA_CDKN1A*S7;
  R24: cell_E2F_DBD_RB1_Ser332_u + cell_CCNB_CDK1_Thr14_Tyr15_u => cell_E2F_DBD_RB1_Ser332_p + cell_CCNB_CDK1_Thr14_Tyr15_u; kPhE2f*cell_E2F_DBD_RB1_Ser332_u*cell_CCNB_CDK1_Thr14_Tyr15_u;
  R25: cell_CCNB_CDK1_Thr14_Tyr15_u + S7 => cell_CCNB_CDK1_Thr14_Tyr15_u + S8; kPhE2f*cell_CCNB_CDK1_Thr14_Tyr15_u*S7;
  R26: cell_E2F_DBD_RB1_Ser332_p => cell_E2F_DBD_RB1_Ser332_u; kDpE2f1*cell_E2F_DBD_RB1_Ser332_p;
  R27: S8 => S7; kDpE2f1*S8;
  R28: cell_E2F_DBD_RB1_Ser332_p + cell_PPP2R2B_ENSA_ARPP19 => cell_E2F_DBD_RB1_Ser332_u + cell_PPP2R2B_ENSA_ARPP19; kDpE2f2*cell_E2F_DBD_RB1_Ser332_p*cell_PPP2R2B_ENSA_ARPP19;
  R29: S8 + cell_PPP2R2B_ENSA_ARPP19 => S7 + cell_PPP2R2B_ENSA_ARPP19; kDpE2f2*S8*cell_PPP2R2B_ENSA_ARPP19;
  R30: cell_E2F_DBD_RB1_Ser332_p + cell_SKP2 => cell_SKP2; kDeE2f2*cell_E2F_DBD_RB1_Ser332_p*cell_SKP2;
  R31: S8 + cell_SKP2 => cell_RB1_E2F_Ser807_Ser811_u + cell_SKP2; kDeE2f2*S8*cell_SKP2;
  R32: cell_CCND + cell_RB1_E2F_Ser807_Ser811_u => cell_CCND + cell_RB1_E2F_Ser807_Ser811_p; kPhRbD*cell_CCND*cell_RB1_E2F_Ser807_Ser811_u;
  R33: cell_CCNE_CDKN1A + cell_RB1_E2F_Ser807_Ser811_u => cell_CCNE_CDKN1A + cell_RB1_E2F_Ser807_Ser811_p; kPhRbE*cell_CCNE_CDKN1A*cell_RB1_E2F_Ser807_Ser811_u;
  R34: cell_CCNA_CDKN1A + cell_RB1_E2F_Ser807_Ser811_u => cell_CCNA_CDKN1A + cell_RB1_E2F_Ser807_Ser811_p; kPhRb*cell_CCNA_CDKN1A*cell_RB1_E2F_Ser807_Ser811_u;
  R35: cell_CCNB_CDK1_Thr14_Tyr15_u + cell_RB1_E2F_Ser807_Ser811_u => cell_CCNB_CDK1_Thr14_Tyr15_u + cell_RB1_E2F_Ser807_Ser811_p; kPhRb*cell_CCNB_CDK1_Thr14_Tyr15_u*cell_RB1_E2F_Ser807_Ser811_u;
  R36: => cell_CCNE_CDKN1A; kSyCe1;
  R37: S46 => cell_CCNA_CDKN1A + S46; kSyCa2*S46;
  R38: cell_CCNE_CDKN1A => ; kDeCe*cell_CCNE_CDKN1A;
  R39: cell_CCNE_CDKN1A + cell_CCNE_CDKN1A => cell_CCNE_CDKN1A; kPhCeE*cell_CCNE_CDKN1A*cell_CCNE_CDKN1A;
  R40: cell_RB1_E2F_Ser807_Ser811_p => cell_RB1_E2F_Ser807_Ser811_u; kDpRb*cell_RB1_E2F_Ser807_Ser811_p;
  R41: S14 => S12 + cell_CDC20_APC; kDpApc_1*S14;
  R42: cell_PPP2R2B_ENSA_ARPP19 + S14 => cell_PPP2R2B_ENSA_ARPP19 + S12 + cell_CDC20_APC; kDpApc_2*cell_PPP2R2B_ENSA_ARPP19*S14;
  R43: cell_CCNA_CDKN1A + S12 => cell_CCNA_CDKN1A + S15; kPhApcA*cell_CCNA_CDKN1A*S12;
  R44: cell_CCNA_CDKN1A + S16 => cell_CCNA_CDKN1A + S22; kPhApcA*cell_CCNA_CDKN1A*S16;
  R45: cell_CCNA_CDKN1A + S19 => cell_CCNA_CDKN1A + S21; kPhApcA*cell_CCNA_CDKN1A*S19;
  R46: cell_CCNB_CDK1_Thr14_Tyr15_u + S12 => cell_CCNB_CDK1_Thr14_Tyr15_u + S15; kPhApcA*cell_CCNB_CDK1_Thr14_Tyr15_u*S12;
  R47: cell_CCNB_CDK1_Thr14_Tyr15_u + S16 => cell_CCNB_CDK1_Thr14_Tyr15_u + S22; kPhApcA*cell_CCNB_CDK1_Thr14_Tyr15_u*S16;
  R48: cell_CCNB_CDK1_Thr14_Tyr15_u + S19 => cell_CCNB_CDK1_Thr14_Tyr15_u + S21; kPhApcA*cell_CCNB_CDK1_Thr14_Tyr15_u*S19;
  R49: S15 => S12; kDpApc_1*S15;
  R50: S21 => S19; kDpApc_1*S21;
  R51: S22 => S16; kDpApc_1*S22;
  R52: cell_PPP2R2B_ENSA_ARPP19 + S15 => cell_PPP2R2B_ENSA_ARPP19 + S12; kDpApc_2*cell_PPP2R2B_ENSA_ARPP19*S15;
  R53: cell_PPP2R2B_ENSA_ARPP19 + S21 => cell_PPP2R2B_ENSA_ARPP19 + S19; kDpApc_2*cell_PPP2R2B_ENSA_ARPP19*S21;
  R54: cell_PPP2R2B_ENSA_ARPP19 + S22 => cell_PPP2R2B_ENSA_ARPP19 + S16; kDpApc_2*cell_PPP2R2B_ENSA_ARPP19*S22;
  R55: cell_CCNA_CDKN1A + S16 => cell_CCNA_CDKN1A + S12 + cell_FZR1_APC_FBXO5_nTerm_p; kPhCdhA*cell_CCNA_CDKN1A*S16;
  R56: cell_CCNA_CDKN1A + S22 => cell_CCNA_CDKN1A + S15 + cell_FZR1_APC_FBXO5_nTerm_p; kPhCdhA*cell_CCNA_CDKN1A*S22;
  R57: cell_CCNE_CDKN1A + S19 => cell_CCNE_CDKN1A + S12 + cell_FZR1_APC_FBXO5_nTerm_p + cell_FBXO5_APC_FZR1_Ser182_u; kPhCAEE*cell_CCNE_CDKN1A*S19;
  R58: cell_CCNE_CDKN1A + S21 => cell_CCNE_CDKN1A + S15 + cell_FZR1_APC_FBXO5_nTerm_p + cell_FBXO5_APC_FZR1_Ser182_u; kPhCAEE*cell_CCNE_CDKN1A*S21;
  R59: cell_CCNA_CDKN1A + S19 => cell_CCNA_CDKN1A + S12 + cell_FZR1_APC_FBXO5_nTerm_p + cell_FBXO5_APC_FZR1_Ser182_u; kPhCAEA*cell_CCNA_CDKN1A*S19;
  R60: cell_CCNA_CDKN1A + S21 => cell_CCNA_CDKN1A + S15 + cell_FZR1_APC_FBXO5_nTerm_p + cell_FBXO5_APC_FZR1_Ser182_u; kPhCAEA*cell_CCNA_CDKN1A*S21;
  R61: cell_CCNB_CDK1_Thr14_Tyr15_u + S19 => cell_CCNB_CDK1_Thr14_Tyr15_u + S12 + cell_FZR1_APC_FBXO5_nTerm_p + cell_FBXO5_APC_FZR1_Ser182_u; kPhCAEB*cell_CCNB_CDK1_Thr14_Tyr15_u*S19;
  R62: cell_CCNB_CDK1_Thr14_Tyr15_u + S21 => cell_CCNB_CDK1_Thr14_Tyr15_u + S15 + cell_FZR1_APC_FBXO5_nTerm_p + cell_FBXO5_APC_FZR1_Ser182_u; kPhCAEB*cell_CCNB_CDK1_Thr14_Tyr15_u*S21;
  R63: cell_CCNE_CDKN1A + S16 => cell_CCNE_CDKN1A + S12 + cell_FZR1_APC_FBXO5_nTerm_p; kPhCdhE*cell_CCNE_CDKN1A*S16;
  R64: cell_CCNE_CDKN1A + S22 => cell_CCNE_CDKN1A + S15 + cell_FZR1_APC_FBXO5_nTerm_p; kPhCdhE*cell_CCNE_CDKN1A*S22;
  R65: S19 => S16; kDeEmi1*S19;
  R66: cell_FBXO5_APC_FZR1_Ser182_u => ; kDeEmi1*cell_FBXO5_APC_FZR1_Ser182_u;
  R67: S21 => S22; kDeEmi1*S21;
  R68: cell_FBXO5_APC_FZR1_Ser182_p => ; kDeEmi1*cell_FBXO5_APC_FZR1_Ser182_p;
  R69: S19 => S16; kDeEmi2*S19;
  R70: S21 => S22; kDeEmi2*S21;
  R71: cell_CCNA_CDKN1A + S19 => cell_CCNA_CDKN1A + S16 + cell_FBXO5_APC_FZR1_Ser182_p; kPhEmiA*cell_CCNA_CDKN1A*S19;
  R72: cell_CCNA_CDKN1A + S21 => cell_CCNA_CDKN1A + S22 + cell_FBXO5_APC_FZR1_Ser182_p; kPhEmiA*cell_CCNA_CDKN1A*S21;
  R73: cell_CCNB_CDK1_Thr14_Tyr15_u + S19 => cell_CCNB_CDK1_Thr14_Tyr15_u + S16 + cell_FBXO5_APC_FZR1_Ser182_p; kPhEmiB*cell_CCNB_CDK1_Thr14_Tyr15_u*S19;
  R74: cell_CCNB_CDK1_Thr14_Tyr15_u + S21 => cell_CCNB_CDK1_Thr14_Tyr15_u + S22 + cell_FBXO5_APC_FZR1_Ser182_p; kPhEmiB*cell_CCNB_CDK1_Thr14_Tyr15_u*S21;
  R75: cell_CCNA_CDKN1A + cell_FBXO5_APC_FZR1_Ser182_u => cell_CCNA_CDKN1A + cell_FBXO5_APC_FZR1_Ser182_p; kPhEmiA*cell_CCNA_CDKN1A*cell_FBXO5_APC_FZR1_Ser182_u;
  R76: cell_CCNB_CDK1_Thr14_Tyr15_u + cell_FBXO5_APC_FZR1_Ser182_u => cell_CCNB_CDK1_Thr14_Tyr15_u + cell_FBXO5_APC_FZR1_Ser182_p; kPhEmiB*cell_CCNB_CDK1_Thr14_Tyr15_u*cell_FBXO5_APC_FZR1_Ser182_u;
  R77: cell_FBXO5_APC_FZR1_Ser182_p => cell_FBXO5_APC_FZR1_Ser182_u; kDpEmi*cell_FBXO5_APC_FZR1_Ser182_p;
  R78: cell_FBXO5_APC_FZR1_Ser182_p => ; kDeEmi3*cell_FBXO5_APC_FZR1_Ser182_p;
  R79: => cell_FOXM1_DBD_Thr600_u; kSyFox1;
  R80: S48 => cell_FBXO5_APC_FZR1_Ser182_u + S48; kSyEmi2*S48;
  R81: cell_CCNE_CDKN1A + cell_FZR1_APC_FBXO5_nTerm_u => cell_CCNE_CDKN1A + cell_FZR1_APC_FBXO5_nTerm_p; kPhCdhE*cell_CCNE_CDKN1A*cell_FZR1_APC_FBXO5_nTerm_u;
  R82: cell_CCNA_CDKN1A + cell_FZR1_APC_FBXO5_nTerm_u => cell_CCNA_CDKN1A + cell_FZR1_APC_FBXO5_nTerm_p; kPhCdhA*cell_CCNA_CDKN1A*cell_FZR1_APC_FBXO5_nTerm_u;
  R83: cell_CCNB_CDK1_Thr14_Tyr15_u + cell_FZR1_APC_FBXO5_nTerm_u => cell_CCNB_CDK1_Thr14_Tyr15_u + cell_FZR1_APC_FBXO5_nTerm_p; kPhCdhB*cell_CCNB_CDK1_Thr14_Tyr15_u*cell_FZR1_APC_FBXO5_nTerm_u;
  R84: cell_FZR1_APC_FBXO5_nTerm_p => cell_FZR1_APC_FBXO5_nTerm_u; kDpCdh*cell_FZR1_APC_FBXO5_nTerm_p;
  R85: => cell_CCNA_CDKN1A; kSyCa1;
  R86: cell_CCNA_CDKN1A => ; kDeCa1*cell_CCNA_CDKN1A;
  R87: cell_CCNE_CDKN1A + cell_CCNA_CDKN1A => cell_CCNA_CDKN1A; kPhCeA*cell_CCNE_CDKN1A*cell_CCNA_CDKN1A;
  R88: cell_CCNA_CDKN1A + S16 => S16; kDeCa2*cell_CCNA_CDKN1A*S16;
  R89: cell_CCNA_CDKN1A + S22 => S22; kDeCa2*cell_CCNA_CDKN1A*S22;
  R90: cell_CCNA_CDKN1A + S14 => S14; kDeCa3*cell_CCNA_CDKN1A*S14;
  R91: S49 => cell_FOXM1_DBD_Thr600_u + S49; kSyFox2*S49;
  R92: cell_FOXM1_DBD_Thr600_u => ; kDeFox1*cell_FOXM1_DBD_Thr600_u;
  R93: cell_FOXM1_DBD_Thr600_p => ; kDeFox1*cell_FOXM1_DBD_Thr600_p;
  R94: S26 => cell_CCNB_promoter_FOXM1; kDeFox1*S26;
  R95: S29 => cell_CDC20_promoter_FOXM1; kDeFox1*S29;
  R96: S16 + cell_FOXM1_DBD_Thr600_u => S16; kDeFox2*S16*cell_FOXM1_DBD_Thr600_u;
  R97: S22 + cell_FOXM1_DBD_Thr600_u => S22; kDeFox2*S22*cell_FOXM1_DBD_Thr600_u;
  R98: S16 + cell_FOXM1_DBD_Thr600_p => S16; kDeFox2*S16*cell_FOXM1_DBD_Thr600_p;
  R99: S22 + cell_FOXM1_DBD_Thr600_p => S22; kDeFox2*S22*cell_FOXM1_DBD_Thr600_p;
  R100: cell_CCNE_CDKN1A + cell_FOXM1_DBD_Thr600_u => cell_CCNE_CDKN1A + cell_FOXM1_DBD_Thr600_p; kPhFoxE*cell_CCNE_CDKN1A*cell_FOXM1_DBD_Thr600_u;
  R101: cell_CCNA_CDKN1A + cell_FOXM1_DBD_Thr600_u => cell_CCNA_CDKN1A + cell_FOXM1_DBD_Thr600_p; kPhFoxA*cell_CCNA_CDKN1A*cell_FOXM1_DBD_Thr600_u;
  R102: cell_CCNB_CDK1_Thr14_Tyr15_u + cell_FOXM1_DBD_Thr600_u => cell_CCNB_CDK1_Thr14_Tyr15_u + cell_FOXM1_DBD_Thr600_p; kPhFoxB*cell_CCNB_CDK1_Thr14_Tyr15_u*cell_FOXM1_DBD_Thr600_u;
  R103: cell_FOXM1_DBD_Thr600_p => cell_FOXM1_DBD_Thr600_u; kDpFox*cell_FOXM1_DBD_Thr600_p;
  R104: S26 => S54; kDpFox*S26;
  R105: S29 => S55; kDpFox*S29;
  R106: => cell_CCNB_CDK1_Thr14_Tyr15_u; _rateLaw1;
  R107: S26 => cell_CCNB_CDK1_Thr14_Tyr15_u + S26; _rateLaw2*S26;
  R108: cell_CCNB_CDK1_Thr14_Tyr15_u => ; kDeCb1*cell_CCNB_CDK1_Thr14_Tyr15_u;
  R109: cell_CCNB_CDK1_Thr14_Tyr15_p => ; kDeCb1*cell_CCNB_CDK1_Thr14_Tyr15_p;
  R110: cell_CCNB_CDK1_Thr14_Tyr15_u + S16 => S16; kDeCb2*cell_CCNB_CDK1_Thr14_Tyr15_u*S16;
  R111: cell_CCNB_CDK1_Thr14_Tyr15_u + S22 => S22; kDeCb2*cell_CCNB_CDK1_Thr14_Tyr15_u*S22;
  R112: S16 + cell_CCNB_CDK1_Thr14_Tyr15_p => S16; kDeCb2*S16*cell_CCNB_CDK1_Thr14_Tyr15_p;
  R113: S22 + cell_CCNB_CDK1_Thr14_Tyr15_p => S22; kDeCb2*S22*cell_CCNB_CDK1_Thr14_Tyr15_p;
  R114: cell_CCNB_CDK1_Thr14_Tyr15_u + S14 => S14; kDeCb3*cell_CCNB_CDK1_Thr14_Tyr15_u*S14;
  R115: S14 + cell_CCNB_CDK1_Thr14_Tyr15_p => S14; kDeCb3*S14*cell_CCNB_CDK1_Thr14_Tyr15_p;
  R116: cell_CDC20_APC => ; kDeCdc_1*cell_CDC20_APC;
  R117: S14 => S15; kDeCdc_1*S14;
  R118: cell_CDC20_APC + S16 => S16; kDeCdc_2*cell_CDC20_APC*S16;
  R119: cell_CDC20_APC + S22 => S22; kDeCdc_2*cell_CDC20_APC*S22;
  R120: S14 + S16 => S15 + S16; kDeCdc_2*S14*S16;
  R121: S14 + S22 => S15 + S22; kDeCdc_2*S14*S22;
  R122: => cell_CDC20_APC; kSyCdc_1;
  R123: S29 => cell_CDC20_APC + S29; kSyCdc_2*S29;
  R124: cell_FOXM1_DBD_Thr600_p + cell_CDC20_promoter_FOXM1 => S29; kAsFPcdc*cell_FOXM1_DBD_Thr600_p*cell_CDC20_promoter_FOXM1;
  R125: S29 => cell_FOXM1_DBD_Thr600_p + cell_CDC20_promoter_FOXM1; kDiFPcdc*S29;
  R126: cell_CCNB_CDK1_Thr14_Tyr15_u + cell_WEE1_Ser123_u => cell_WEE1_Ser123_u + cell_CCNB_CDK1_Thr14_Tyr15_p; kWee2*cell_CCNB_CDK1_Thr14_Tyr15_u*cell_WEE1_Ser123_u;
  R127: cell_CCNB_CDK1_Thr14_Tyr15_u + cell_WEE1_Ser123_p => cell_CCNB_CDK1_Thr14_Tyr15_p + cell_WEE1_Ser123_p; kWee1*cell_CCNB_CDK1_Thr14_Tyr15_u*cell_WEE1_Ser123_p;
  R128: cell_CCNB_CDK1_Thr14_Tyr15_p + cell_CDC25_pSites_p => cell_CCNB_CDK1_Thr14_Tyr15_u + cell_CDC25_pSites_p; kCdc25_2*cell_CCNB_CDK1_Thr14_Tyr15_p*cell_CDC25_pSites_p;
  R129: cell_CCNB_CDK1_Thr14_Tyr15_p + cell_CDC25_pSites_u => cell_CCNB_CDK1_Thr14_Tyr15_u + cell_CDC25_pSites_u; kCdc25_1*cell_CCNB_CDK1_Thr14_Tyr15_p*cell_CDC25_pSites_u;
  R130: cell_CCNB_CDK1_Thr14_Tyr15_u + cell_CDC25_pSites_u => cell_CCNB_CDK1_Thr14_Tyr15_u + cell_CDC25_pSites_p; kPhC25B*cell_CCNB_CDK1_Thr14_Tyr15_u*cell_CDC25_pSites_u;
  R131: cell_CCNA_CDKN1A + cell_CDC25_pSites_u => cell_CCNA_CDKN1A + cell_CDC25_pSites_p; kPhC25A*cell_CCNA_CDKN1A*cell_CDC25_pSites_u;
  R132: cell_PPP2R2B_ENSA_ARPP19 + cell_CDC25_pSites_p => cell_PPP2R2B_ENSA_ARPP19 + cell_CDC25_pSites_u; kDpCdc25*cell_PPP2R2B_ENSA_ARPP19*cell_CDC25_pSites_p;
  R133: cell_PPP2R2B_ENSA_ARPP19 + cell_WEE1_Ser123_p => cell_PPP2R2B_ENSA_ARPP19 + cell_WEE1_Ser123_u; kDpWee*cell_PPP2R2B_ENSA_ARPP19*cell_WEE1_Ser123_p;
  R134: cell_CCNA_CDKN1A + cell_WEE1_Ser123_u => cell_CCNA_CDKN1A + cell_WEE1_Ser123_p; kPhWeeA*cell_CCNA_CDKN1A*cell_WEE1_Ser123_u;
  R135: cell_CCNB_CDK1_Thr14_Tyr15_u + cell_WEE1_Ser123_u => cell_CCNB_CDK1_Thr14_Tyr15_u + cell_WEE1_Ser123_p; kPhWeeB*cell_CCNB_CDK1_Thr14_Tyr15_u*cell_WEE1_Ser123_u;
  R136: cell_CCNB_CDK1_Thr14_Tyr15_u + cell_MASTL_Thr198_u => cell_CCNB_CDK1_Thr14_Tyr15_u + cell_MASTL_Thr198_p; kPhGw*cell_CCNB_CDK1_Thr14_Tyr15_u*cell_MASTL_Thr198_u;
  R137: cell_MASTL_Thr198_p => cell_MASTL_Thr198_u; kDpGw1*cell_MASTL_Thr198_p;
  R138: cell_PPP2R2B_ENSA_ARPP19 + cell_MASTL_Thr198_p => cell_PPP2R2B_ENSA_ARPP19 + cell_MASTL_Thr198_u; kDpGw2*cell_PPP2R2B_ENSA_ARPP19*cell_MASTL_Thr198_p;
  R139: cell_MASTL_Thr198_p + S37 => cell_MASTL_Thr198_p + S38; kPhEnsa*cell_MASTL_Thr198_p*S37;
  R140: S39 => cell_PPP2R2B_ENSA_ARPP19 + S37; kDpEnsa*S39;
  R141: => cell_FBXO5_APC_FZR1_Ser182_u; kSyEmi1;
  R142: S45 => cell_CCNE_CDKN1A + S45; kSyCe2*S45;
  R143: cell_CCNB_CDK1_Thr14_Tyr15_u + S16 => cell_CCNB_CDK1_Thr14_Tyr15_u + S12 + cell_FZR1_APC_FBXO5_nTerm_p; kPhCdhB*cell_CCNB_CDK1_Thr14_Tyr15_u*S16;
  R144: cell_CCNB_CDK1_Thr14_Tyr15_u + S22 => cell_CCNB_CDK1_Thr14_Tyr15_u + S15 + cell_FZR1_APC_FBXO5_nTerm_p; kPhCdhB*cell_CCNB_CDK1_Thr14_Tyr15_u*S22;
  R145: cell_E2F_DBD_RB1_Ser332_u + cell_RB1_E2F_Ser807_Ser811_u => S7; kAsE2fRb*cell_E2F_DBD_RB1_Ser332_u*cell_RB1_E2F_Ser807_Ser811_u;
  R146: cell_E2F_DBD_RB1_Ser332_p + cell_RB1_E2F_Ser807_Ser811_u => S8; kAsE2fRb*cell_E2F_DBD_RB1_Ser332_p*cell_RB1_E2F_Ser807_Ser811_u;
  R147: S7 => cell_E2F_DBD_RB1_Ser332_u + cell_RB1_E2F_Ser807_Ser811_u; kDiE2fRb*S7;
  R148: S8 => cell_E2F_DBD_RB1_Ser332_p + cell_RB1_E2F_Ser807_Ser811_u; kDiE2fRb*S8;
  R149: S12 + cell_FZR1_APC_FBXO5_nTerm_u => S16; kAsACdh*S12*cell_FZR1_APC_FBXO5_nTerm_u;
  R150: S15 + cell_FZR1_APC_FBXO5_nTerm_u => S22; kAsACdh*S15*cell_FZR1_APC_FBXO5_nTerm_u;
  R151: S16 => S12 + cell_FZR1_APC_FBXO5_nTerm_u; kDiACdh*S16;
  R152: S22 => S15 + cell_FZR1_APC_FBXO5_nTerm_u; kDiACdh*S22;
  R153: S16 + cell_FBXO5_APC_FZR1_Ser182_u => S19; kAsACE*S16*cell_FBXO5_APC_FZR1_Ser182_u;
  R154: cell_FBXO5_APC_FZR1_Ser182_u + S22 => S21; kAsACE*cell_FBXO5_APC_FZR1_Ser182_u*S22;
  R155: S19 => S16 + cell_FBXO5_APC_FZR1_Ser182_u; kDiACE*S19;
  R156: S21 => cell_FBXO5_APC_FZR1_Ser182_u + S22; kDiACE*S21;
  R157: cell_CDC20_APC + S15 => S14; kAspACdc*cell_CDC20_APC*S15;
  R158: S14 => cell_CDC20_APC + S15; kDipACdc*S14;
  R159: cell_PPP2R2B_ENSA_ARPP19 + S38 => S39; kAspEB55*cell_PPP2R2B_ENSA_ARPP19*S38;
  R160: S39 => cell_PPP2R2B_ENSA_ARPP19 + S38; kDipEB55*S39;
  R161: cell_E2F_DBD_RB1_Ser332_u + cell_CCNE_promoter_E2F => S45; kAsEPx*cell_E2F_DBD_RB1_Ser332_u*cell_CCNE_promoter_E2F;
  R162: S45 => cell_E2F_DBD_RB1_Ser332_u + cell_CCNE_promoter_E2F; kDiEPx*S45;
  R163: cell_E2F_DBD_RB1_Ser332_u + cell_CCNA_promoter_E2F => S46; kAsEPx*cell_E2F_DBD_RB1_Ser332_u*cell_CCNA_promoter_E2F;
  R164: S46 => cell_E2F_DBD_RB1_Ser332_u + cell_CCNA_promoter_E2F; kDiEPx*S46;
  R165: cell_E2F_DBD_RB1_Ser332_u + cell_E2F_promoter_E2F => S47; kAsEPx*cell_E2F_DBD_RB1_Ser332_u*cell_E2F_promoter_E2F;
  R166: S47 => cell_E2F_DBD_RB1_Ser332_u + cell_E2F_promoter_E2F; kDiEPx*S47;
  R167: cell_E2F_DBD_RB1_Ser332_u + cell_FBXO5_promoter_E2F => S48; kAsEPx*cell_E2F_DBD_RB1_Ser332_u*cell_FBXO5_promoter_E2F;
  R168: S48 => cell_E2F_DBD_RB1_Ser332_u + cell_FBXO5_promoter_E2F; kDiEPx*S48;
  R169: cell_E2F_DBD_RB1_Ser332_u + cell_FOXM1_promoter_E2F => S49; kAsEPx*cell_E2F_DBD_RB1_Ser332_u*cell_FOXM1_promoter_E2F;
  R170: S49 => cell_E2F_DBD_RB1_Ser332_u + cell_FOXM1_promoter_E2F; kDiEPx*S49;
  R171: => cell_SKP2; kSySkp2;
  R172: cell_SKP2 => ; kDeSkp2_1*cell_SKP2;
  R173: S16 + cell_SKP2 => S16; kDeSkp2_2*S16*cell_SKP2;
  R174: S22 + cell_SKP2 => S22; kDeSkp2_2*S22*cell_SKP2;
  R175: cell_TP53_DBD_Ser15_p + cell_CDKN1A_promoter_TP53 => S56; kAsTP53PCDKN1A*cell_TP53_DBD_Ser15_p*cell_CDKN1A_promoter_TP53;
  R176: => cell_CDKN1A_CCNA_CCNE_Ser130_u; kSyCDKN1A_1;
  R177: S54 => cell_CCNB_promoter_FOXM1; kDeFox1*S54;
  R178: S55 => cell_CDC20_promoter_FOXM1; kDeFox1*S55;
  R179: S56 => cell_TP53_DBD_Ser15_p + cell_CDKN1A_promoter_TP53; kDiTP53PCDKN1A*S56;
  R180: S56 => S56 + cell_CDKN1A_CCNA_CCNE_Ser130_u; kSyCDKN1A_2*S56;
  R181: cell_CDKN1A_CCNA_CCNE_Ser130_u => ; kDeCDKN1A_1*cell_CDKN1A_CCNA_CCNE_Ser130_u;
  R182: cell_SKP2 + cell_CDKN1A_CCNA_CCNE_Ser130_u => cell_SKP2; kDeCDKN1A_2*cell_SKP2*cell_CDKN1A_CCNA_CCNE_Ser130_u;
  R183: cell_CCNA_CDKN1A + cell_CDKN1A_CCNA_CCNE_Ser130_u => S58; kAsCdkn1aC*cell_CCNA_CDKN1A*cell_CDKN1A_CCNA_CCNE_Ser130_u;
  R184: cell_CCNE_CDKN1A + cell_CDKN1A_CCNA_CCNE_Ser130_u => S59; kAsCdkn1aC*cell_CCNE_CDKN1A*cell_CDKN1A_CCNA_CCNE_Ser130_u;
  R185: cell_CCNE_CDKN1A + cell_CDKN1A_CCNA_CCNE_Ser130_u => cell_CCNE_CDKN1A + cell_CDKN1A_CCNA_CCNE_Ser130_p; kPhCDKN1A*cell_CCNE_CDKN1A*cell_CDKN1A_CCNA_CCNE_Ser130_u;
  R186: S59 => cell_CDKN1A_CCNA_CCNE_Ser130_u; kDeCe*S59;
  R187: cell_CCNE_CDKN1A + S59 => cell_CCNE_CDKN1A + cell_CDKN1A_CCNA_CCNE_Ser130_u; kPhCeE*cell_CCNE_CDKN1A*S59;
  R188: S58 => cell_CDKN1A_CCNA_CCNE_Ser130_u; kDeCa1*S58;
  R189: cell_CCNA_CDKN1A + S59 => cell_CCNA_CDKN1A + cell_CDKN1A_CCNA_CCNE_Ser130_u; kPhCeA*cell_CCNA_CDKN1A*S59;
  R190: S16 + S58 => S16 + cell_CDKN1A_CCNA_CCNE_Ser130_u; kDeCa2*S16*S58;
  R191: S22 + S58 => S22 + cell_CDKN1A_CCNA_CCNE_Ser130_u; kDeCa2*S22*S58;
  R192: S14 + S58 => S14 + cell_CDKN1A_CCNA_CCNE_Ser130_u; kDeCa3*S14*S58;
  R193: S58 => cell_CCNA_CDKN1A; kDeCDKN1A_1*S58;
  R194: S59 => cell_CCNE_CDKN1A; kDeCDKN1A_1*S59;
  R195: cell_CDKN1A_CCNA_CCNE_Ser130_p => ; kDeCDKN1A_1*cell_CDKN1A_CCNA_CCNE_Ser130_p;
  R196: cell_SKP2 + cell_CDKN1A_CCNA_CCNE_Ser130_p => cell_SKP2; kDeCDKN1A_2*cell_SKP2*cell_CDKN1A_CCNA_CCNE_Ser130_p;
  R197: cell_SKP2 + S58 => cell_CCNA_CDKN1A + cell_SKP2; kDeCDKN1A_2*cell_SKP2*S58;
  R198: cell_SKP2 + S59 => cell_CCNE_CDKN1A + cell_SKP2; kDeCDKN1A_2*cell_SKP2*S59;
  R199: S58 => cell_CCNA_CDKN1A + cell_CDKN1A_CCNA_CCNE_Ser130_u; kDiCdkn1aC*S58;
  R200: S59 => cell_CCNE_CDKN1A + cell_CDKN1A_CCNA_CCNE_Ser130_u; kDiCdkn1aC*S59;
  R201: cell_CCNE_CDKN1A + S58 => cell_CCNE_CDKN1A + cell_CCNA_CDKN1A + cell_CDKN1A_CCNA_CCNE_Ser130_p; kPhCDKN1A*cell_CCNE_CDKN1A*S58;
  R202: cell_CCNE_CDKN1A + S59 => cell_CCNE_CDKN1A + cell_CCNE_CDKN1A + cell_CDKN1A_CCNA_CCNE_Ser130_p; kPhCDKN1A*cell_CCNE_CDKN1A*S59;
  R203: cell_CDKN1A_CCNA_CCNE_Ser130_p => cell_CDKN1A_CCNA_CCNE_Ser130_u; kDpCDKN1A*cell_CDKN1A_CCNA_CCNE_Ser130_p;
end
