// SBML level 2 version 3

model test_petab_amici_v1_1()

  // Compartments:
  compartment cell = 1;

  // Species:
  species _cell__A_B_ in cell = 6.022e23;
  species _cell__B_A_ in cell = 6.022e23;
  species _cell__C in cell = 6.022e23;
  species _cell__A_B_1__B_A_1_ in cell = 0;

  // Parameters:
  kAs = 1.6605779e-24;
  kDi = 1.6605779e-24;
  _InitialConc1 = 6.022e23;
  _InitialConc2 = 6.022e23;
  _InitialConc3 = 6.022e23;

  // Reactions:
  R1: _cell__A_B_ + _cell__B_A_ => _cell__A_B_1__B_A_1_; kAs*_cell__A_B_*_cell__B_A_;
  R2: _cell__C + _cell__A_B_1__B_A_1_ => _cell__A_B_ + _cell__B_A_ + _cell__C; kDi*_cell__C*_cell__A_B_1__B_A_1_;
end
