// SBML level 2 version 3

model cell_cycle_v3_0_0_partial()

  // Compartments:
  compartment cell = 1;

  // Species:
  species _cell__CCND in cell = 6.022e23;
  species _cell__CCNE in cell = 1.3986043e23;
  species _cell__E2F_DBD_RB1_Ser332u_ in cell = 1.1128068e22;
  species _cell__E2F_DBD_RB1_Ser332p_ in cell = 2.2932894e19;
  species _cell__CCNA in cell = 4.2325597e21;
  species _cell__CCNB_CDK1_Thr14_Tyr15u_ in cell = 1.133559e21;
  species _cell__E2F_DBD_RB1_1_Ser332u__RB1_E2F_1_Ser807_Ser811u_ in cell = 4.3034014e22;
  species _cell__E2F_DBD_RB1_1_Ser332p__RB1_E2F_1_Ser807_Ser811u_ in cell = 9.065434e19;
  species _cell__RB1_E2F_Ser807_Ser811u_ in cell = 5.2778426e22;
  species _cell__RB1_E2F_Ser807_Ser811p_ in cell = 5.0629691e23;
  species _cell__PPP2R2B_ENSA_ARPP19_ in cell = 4.6484797e22;
  species _cell__APC_FBXO5_FZR1_CDC20_Ser355u_ in cell = 2.4260911e24;
  species _cell__CDC20_APC_ in cell = 1.3847757e23;
  species _cell__APC_FBXO5_FZR1_CDC20_1_Ser355p__CDC20_APC_1_ in cell = 4.2087805e22;
  species _cell__APC_FBXO5_FZR1_CDC20_Ser355p_ in cell = 3.7993439e22;
  species _cell__APC_FBXO5_FZR1_CDC20_1_Ser355u__FZR1_APC_1_FBXO5_nTermu_ in cell = 4.2969631e23;
  species _cell__FZR1_APC_FBXO5_nTermu_ in cell = 3.4406152e20;
  species _cell__FZR1_APC_FBXO5_nTermp_ in cell = 9.7028319e22;
  species _cell__APC_FBXO5_1_FZR1_CDC20_2_Ser355u__FBXO5_APC_1_FZR1_3_Ser182u__FZR1_APC_2_FBXO5_3_nTermu_ in cell = 6.5604459e22;
  species _cell__FBXO5_APC_FZR1_Ser182u_ in cell = 4.3226888e20;
  species _cell__APC_FBXO5_1_FZR1_CDC20_2_Ser355p__FBXO5_APC_1_FZR1_3_Ser182u__FZR1_APC_2_FBXO5_3_nTermu_ in cell = 1.3323959e21;
  species _cell__APC_FBXO5_FZR1_CDC20_1_Ser355p__FZR1_APC_1_FBXO5_nTermu_ in cell = 8.1944566e21;
  species _cell__FBXO5_APC_FZR1_Ser182p_ in cell = 1.1324333e19;
  species _cell__FOXM1_DBD_Thr600u_ in cell = 3.3510826e21;
  species _cell__FOXM1_DBD_Thr600p_ in cell = 2.2950816e20;
  species _cell__CCNB_promoter_FOXM1_1__FOXM1_DBD_1_Thr600p_ in cell = 1.1461427e17;
  species _cell__CCNB_promoter_FOXM1_ in cell = 6.0105386e19;
  species _cell__CDC20_promoter_FOXM1_ in cell = 6.0174121e19;
  species _cell__CDC20_promoter_FOXM1_1__FOXM1_DBD_1_Thr600p_ in cell = 4.5878816e16;
  species _cell__WEE1_Ser123u_ in cell = 5.9042195e23;
  species _cell__CCNB_CDK1_Thr14_Tyr15p_ in cell = 4.5242773e21;
  species _cell__WEE1_Ser123p_ in cell = 1.1778049e22;
  species _cell__CDC25_pSitesp_ in cell = 1.1103404e22;
  species _cell__CDC25_pSitesu_ in cell = 5.910966e23;
  species _cell__MASTL_Thr198u_ in cell = 6.0070998e23;
  species _cell__MASTL_Thr198p_ in cell = 1.4900204e21;
  species _cell__ENSA_ARPP19_PPP2R2B_Ser62_Ser67u_ in cell = 4.9793694e23;
  species _cell__ENSA_ARPP19_PPP2R2B_Ser62_Ser67p_ in cell = 1.9785953e20;
  species _cell__ENSA_ARPP19_PPP2R2B_1_Ser62_Ser67p__PPP2R2B_ENSA_ARPP19_1_ in cell = 1.040652e23;
  species _cell__CCNE_promoter_E2F_ in cell = 5.0873268e19;
  species _cell__CCNA_promoter_E2F_ in cell = 5.0873268e19;
  species _cell__E2F_promoter_E2F_ in cell = 5.0873268e19;
  species _cell__FBXO5_promoter_E2F_ in cell = 5.0873268e19;
  species _cell__FOXM1_promoter_E2F_ in cell = 5.0873268e19;
  species _cell__CCNE_promoter_E2F_1__E2F_DBD_1_RB1_Ser332u_ in cell = 9.3467317e18;
  species _cell__CCNA_promoter_E2F_1__E2F_DBD_1_RB1_Ser332u_ in cell = 9.3467317e18;
  species _cell__E2F_DBD_1_RB1_Ser332u__E2F_promoter_E2F_1_ in cell = 9.3467317e18;
  species _cell__E2F_DBD_1_RB1_Ser332u__FBXO5_promoter_E2F_1_ in cell = 9.3467317e18;
  species _cell__E2F_DBD_1_RB1_Ser332u__FOXM1_promoter_E2F_1_ in cell = 9.3467317e18;
  species _cell__iWEE in cell = 0;

  // Parameters:
  kPhRbD = 9.206253e-27;
  kPhRbE = 1.1507816e-26;
  kDpRb = 0.0013860014;
  kPhRb = 3.4523449e-26;
  kSyCe1 = 8.3465003e18;
  kSyCe2 = 4.1580042;
  kDeCe = 0.00013860014;
  kDiE2fRb = 0.00034650035;
  kAsE2fRb = 5.7539081e-25;
  kSyE2f1 = 4.1732502e18;
  kSyE2f2 = 0.69300069;
  kDeE2f1 = 6.9300069e-5;
  kDeE2f2 = 0.0013860014;
  kPhE2f = 2.3015632e-27;
  kDpE2f2 = 1.1507816e-25;
  kSyEmi1 = 2.0866251e19;
  kSyEmi2 = 3.4650035;
  kDeEmi1 = 0.00034650035;
  kDeEmi2 = 0.00034650035;
  kDeEmi3 = 0.0034650035;
  kPhEmiA = 5.7539081e-29;
  kPhEmiB = 2.8769541e-28;
  kDpEmi = 3.4650035e-6;
  kSyCa1 = 4.1732502e18;
  kSyCa2 = 0.51975052;
  kDeCa1 = 6.9300069e-6;
  kDeCa2 = 4.6031265e-27;
  kDeCa3 = 1.1507816e-27;
  kDpCdh = 0.0034650035;
  kPhCdhA = 2.8769541e-26;
  kPhCdhE = 1.1507816e-27;
  kPhCdhB = 2.8769541e-25;
  kDiACE = 0.00034650035;
  kAsACE = 5.7539081e-25;
  kDiACdh = 0.00034650035;
  kAsACdh = 5.7539081e-25;
  kPhCeA = 1.1507816e-26;
  kPhCeE = 1.1507816e-28;
  kPhFoxE = 1.1507816e-27;
  kPhFoxA = 1.1507816e-27;
  kPhFoxB = 5.7539081e-27;
  kDpFox = 3.4650035e-5;
  kSyCb1 = 4.1732502e18;
  kSyCb2 = 0.51975052;
  kDeCb1 = 6.9300069e-6;
  kDeCb2 = 1.438477e-27;
  kDeCb3 = 1.438477e-27;
  kPhEnsa = 1.1507816e-27;
  kDpEnsa = 0.00034650035;
  kPhGw = 1.1507816e-26;
  kDpGw1 = 0.0017325017;
  kDpGw2 = 1.1507816e-25;
  kWee1 = 1.1507816e-28;
  kWee2 = 1.1507816e-26;
  kPhWeeA = 1.1507816e-27;
  kPhWeeB = 1.1507816e-26;
  kDpWee = 1.1507816e-25;
  kCdc25_1 = 1.1507816e-27;
  kCdc25_2 = 1.1507816e-26;
  kDpCdc25 = 1.1507816e-25;
  kDipEB55 = 4.7124047e-5;
  kAspEB55 = 6.5594552e-25;
  kSyCdc_1 = 4.1732502e18;
  kSyCdc_2 = 0.69300069;
  kDeCdc_1 = 2.7720028e-5;
  kDeCdc_2 = 4.6031265e-28;
  kDipACdc = 0.00086625087;
  kAspACdc = 1.1507816e-26;
  kPhApcA = 1.1507816e-28;
  kPhApcB = 6.9300069e-5;
  kDpApc = 5.7539081e-26;
  kSyFox1 = 4.1732502e18;
  kSyFox2 = 0.51975052;
  kDeFox1 = 6.9300069e-6;
  kDeFox2 = 5.7539081e-27;
  kAsEPx = 5.7539081e-25;
  kDiEPx = 0.034650035;
  kAsFPcb = 5.7539081e-25;
  kDiFPcb = 0.069300069;
  kAsFPcdc = 5.7539081e-25;
  kDiFPcdc = 0.17325017;
  kPhC25B = 1.1507816e-26;
  kPhCAEE = 9.2062529e-28;
  kPhCAEA = 2.3015632e-26;
  kPhCAEB = 2.3015632e-25;
  ikSyCb = 1;
  jiWee = 6.022e22;
  _InitialConc1 = 6.022e23;
  _InitialConc2 = 1.3986043e23;
  _InitialConc3 = 1.1128068e22;
  _InitialConc4 = 2.2932894e19;
  _InitialConc5 = 4.2325597e21;
  _InitialConc6 = 1.133559e21;
  _InitialConc7 = 4.3034014e22;
  _InitialConc8 = 9.065434e19;
  _InitialConc9 = 5.2778426e22;
  _InitialConc10 = 5.0629691e23;
  _InitialConc11 = 4.6484797e22;
  _InitialConc12 = 2.4260911e24;
  _InitialConc13 = 1.3847757e23;
  _InitialConc14 = 4.2087805e22;
  _InitialConc15 = 3.7993439e22;
  _InitialConc16 = 4.2969631e23;
  _InitialConc17 = 3.4406152e20;
  _InitialConc18 = 9.7028319e22;
  _InitialConc19 = 6.5604459e22;
  _InitialConc20 = 4.3226888e20;
  _InitialConc21 = 1.3323959e21;
  _InitialConc22 = 8.1944566e21;
  _InitialConc23 = 1.1324333e19;
  _InitialConc24 = 3.3510826e21;
  _InitialConc25 = 2.2950816e20;
  _InitialConc26 = 1.1461427e17;
  _InitialConc27 = 6.0105386e19;
  _InitialConc28 = 6.0174121e19;
  _InitialConc29 = 4.5878816e16;
  _InitialConc30 = 5.9042195e23;
  _InitialConc31 = 4.5242773e21;
  _InitialConc32 = 1.1778049e22;
  _InitialConc33 = 1.1103404e22;
  _InitialConc34 = 5.910966e23;
  _InitialConc35 = 6.0070998e23;
  _InitialConc36 = 1.4900204e21;
  _InitialConc37 = 4.9793694e23;
  _InitialConc38 = 1.9785953e20;
  _InitialConc39 = 1.040652e23;
  _InitialConc40 = 5.0873268e19;
  _InitialConc41 = 5.0873268e19;
  _InitialConc42 = 5.0873268e19;
  _InitialConc43 = 5.0873268e19;
  _InitialConc44 = 5.0873268e19;
  _InitialConc45 = 9.3467317e18;
  _InitialConc46 = 9.3467317e18;
  _InitialConc47 = 9.3467317e18;
  _InitialConc48 = 9.3467317e18;
  _InitialConc49 = 9.3467317e18;
  _InitialConc50 = 0;

  // Reactions:
  R1: => _cell__E2F_DBD_RB1_Ser332u_; kSyE2f1;
  R2: _cell__FOXM1_DBD_Thr600p_ + _cell__CCNB_promoter_FOXM1_ => _cell__CCNB_promoter_FOXM1_1__FOXM1_DBD_1_Thr600p_; kAsFPcb*_cell__FOXM1_DBD_Thr600p_*_cell__CCNB_promoter_FOXM1_;
  R3: _cell__CCNB_promoter_FOXM1_1__FOXM1_DBD_1_Thr600p_ => _cell__FOXM1_DBD_Thr600p_ + _cell__CCNB_promoter_FOXM1_; kDiFPcb*_cell__CCNB_promoter_FOXM1_1__FOXM1_DBD_1_Thr600p_;
  R4: _cell__E2F_DBD_1_RB1_Ser332u__E2F_promoter_E2F_1_ => _cell__E2F_DBD_RB1_Ser332u_ + _cell__E2F_DBD_1_RB1_Ser332u__E2F_promoter_E2F_1_; kSyE2f2*_cell__E2F_DBD_1_RB1_Ser332u__E2F_promoter_E2F_1_;
  R5: _cell__E2F_DBD_RB1_Ser332u_ => ; kDeE2f1*_cell__E2F_DBD_RB1_Ser332u_;
  R6: _cell__E2F_DBD_RB1_Ser332p_ => ; kDeE2f1*_cell__E2F_DBD_RB1_Ser332p_;
  R7: _cell__E2F_DBD_RB1_1_Ser332u__RB1_E2F_1_Ser807_Ser811u_ => _cell__RB1_E2F_Ser807_Ser811u_; kDeE2f1*_cell__E2F_DBD_RB1_1_Ser332u__RB1_E2F_1_Ser807_Ser811u_;
  R8: _cell__E2F_DBD_RB1_1_Ser332p__RB1_E2F_1_Ser807_Ser811u_ => _cell__RB1_E2F_Ser807_Ser811u_; kDeE2f1*_cell__E2F_DBD_RB1_1_Ser332p__RB1_E2F_1_Ser807_Ser811u_;
  R9: _cell__CCND + _cell__E2F_DBD_RB1_1_Ser332u__RB1_E2F_1_Ser807_Ser811u_ => _cell__CCND + _cell__E2F_DBD_RB1_Ser332u_ + _cell__RB1_E2F_Ser807_Ser811p_; kPhRbD*_cell__CCND*_cell__E2F_DBD_RB1_1_Ser332u__RB1_E2F_1_Ser807_Ser811u_;
  R10: _cell__CCND + _cell__E2F_DBD_RB1_1_Ser332p__RB1_E2F_1_Ser807_Ser811u_ => _cell__CCND + _cell__E2F_DBD_RB1_Ser332p_ + _cell__RB1_E2F_Ser807_Ser811p_; kPhRbD*_cell__CCND*_cell__E2F_DBD_RB1_1_Ser332p__RB1_E2F_1_Ser807_Ser811u_;
  R11: _cell__CCNE + _cell__E2F_DBD_RB1_1_Ser332u__RB1_E2F_1_Ser807_Ser811u_ => _cell__CCNE + _cell__E2F_DBD_RB1_Ser332u_ + _cell__RB1_E2F_Ser807_Ser811p_; kPhRbE*_cell__CCNE*_cell__E2F_DBD_RB1_1_Ser332u__RB1_E2F_1_Ser807_Ser811u_;
  R12: _cell__CCNE + _cell__E2F_DBD_RB1_1_Ser332p__RB1_E2F_1_Ser807_Ser811u_ => _cell__CCNE + _cell__E2F_DBD_RB1_Ser332p_ + _cell__RB1_E2F_Ser807_Ser811p_; kPhRbE*_cell__CCNE*_cell__E2F_DBD_RB1_1_Ser332p__RB1_E2F_1_Ser807_Ser811u_;
  R13: _cell__CCNA + _cell__E2F_DBD_RB1_1_Ser332u__RB1_E2F_1_Ser807_Ser811u_ => _cell__E2F_DBD_RB1_Ser332u_ + _cell__CCNA + _cell__RB1_E2F_Ser807_Ser811p_; kPhRb*_cell__CCNA*_cell__E2F_DBD_RB1_1_Ser332u__RB1_E2F_1_Ser807_Ser811u_;
  R14: _cell__CCNA + _cell__E2F_DBD_RB1_1_Ser332p__RB1_E2F_1_Ser807_Ser811u_ => _cell__E2F_DBD_RB1_Ser332p_ + _cell__CCNA + _cell__RB1_E2F_Ser807_Ser811p_; kPhRb*_cell__CCNA*_cell__E2F_DBD_RB1_1_Ser332p__RB1_E2F_1_Ser807_Ser811u_;
  R15: _cell__CCNB_CDK1_Thr14_Tyr15u_ + _cell__E2F_DBD_RB1_1_Ser332u__RB1_E2F_1_Ser807_Ser811u_ => _cell__E2F_DBD_RB1_Ser332u_ + _cell__CCNB_CDK1_Thr14_Tyr15u_ + _cell__RB1_E2F_Ser807_Ser811p_; kPhRb*_cell__CCNB_CDK1_Thr14_Tyr15u_*_cell__E2F_DBD_RB1_1_Ser332u__RB1_E2F_1_Ser807_Ser811u_;
  R16: _cell__CCNB_CDK1_Thr14_Tyr15u_ + _cell__E2F_DBD_RB1_1_Ser332p__RB1_E2F_1_Ser807_Ser811u_ => _cell__E2F_DBD_RB1_Ser332p_ + _cell__CCNB_CDK1_Thr14_Tyr15u_ + _cell__RB1_E2F_Ser807_Ser811p_; kPhRb*_cell__CCNB_CDK1_Thr14_Tyr15u_*_cell__E2F_DBD_RB1_1_Ser332p__RB1_E2F_1_Ser807_Ser811u_;
  R17: _cell__E2F_DBD_RB1_Ser332u_ + _cell__CCNA => _cell__E2F_DBD_RB1_Ser332p_ + _cell__CCNA; kPhE2f*_cell__E2F_DBD_RB1_Ser332u_*_cell__CCNA;
  R18: _cell__CCNA + _cell__E2F_DBD_RB1_1_Ser332u__RB1_E2F_1_Ser807_Ser811u_ => _cell__CCNA + _cell__E2F_DBD_RB1_1_Ser332p__RB1_E2F_1_Ser807_Ser811u_; kPhE2f*_cell__CCNA*_cell__E2F_DBD_RB1_1_Ser332u__RB1_E2F_1_Ser807_Ser811u_;
end
