// SBML level 2 version 3

model cell_cycle_v3.0.0_partial()

  // Compartments:
  compartment cell = 1;

  // Species:
  species cell_CCND in cell = 6.022e23; cell_CCND is "@cell::CCND()";
  species cell_CCNE in cell = 1.3986043e23; cell_CCNE is "@cell::CCNE()";
  species cell_E2F_DBD_RB1_Ser332_u in cell = 1.1128068e22; cell_E2F_DBD_RB1_Ser332_u is "@cell::E2F(DBD,RB1,Ser332~u)";
  species cell_E2F_DBD_RB1_Ser332_p in cell = 2.2932894e19; cell_E2F_DBD_RB1_Ser332_p is "@cell::E2F(DBD,RB1,Ser332~p)";
  species cell_CCNA in cell = 4.2325597e21; cell_CCNA is "@cell::CCNA()";
  species cell_CCNB_CDK1_Thr14_Tyr15_u in cell = 1.133559e21; cell_CCNB_CDK1_Thr14_Tyr15_u is "@cell::CCNB(CDK1_Thr14_Tyr15~u)";
  species S7 in cell = 4.3034014e22; S7 is "@cell::E2F(DBD,RB1!1,Ser332~u).RB1(E2F!1,Ser807_Ser811~u)";
  species S8 in cell = 9.065434e19; S8 is "@cell::E2F(DBD,RB1!1,Ser332~p).RB1(E2F!1,Ser807_Ser811~u)";
  species cell_RB1_E2F_Ser807_Ser811_u in cell = 5.2778426e22; cell_RB1_E2F_Ser807_Ser811_u is "@cell::RB1(E2F,Ser807_Ser811~u)";
  species cell_RB1_E2F_Ser807_Ser811_p in cell = 5.0629691e23; cell_RB1_E2F_Ser807_Ser811_p is "@cell::RB1(E2F,Ser807_Ser811~p)";
  species cell_PPP2R2B_ENSA_ARPP19 in cell = 4.6484797e22; cell_PPP2R2B_ENSA_ARPP19 is "@cell::PPP2R2B(ENSA_ARPP19)";
  species S12 in cell = 2.4260911e24; S12 is "@cell::APC(FBXO5,FZR1_CDC20,Ser355~u)";
  species cell_CDC20_APC in cell = 1.3847757e23; cell_CDC20_APC is "@cell::CDC20(APC)";
  species S14 in cell = 4.2087805e22; S14 is "@cell::APC(FBXO5,FZR1_CDC20!1,Ser355~p).CDC20(APC!1)";
  species S15 in cell = 3.7993439e22; S15 is "@cell::APC(FBXO5,FZR1_CDC20,Ser355~p)";
  species S16 in cell = 4.2969631e23; S16 is "@cell::APC(FBXO5,FZR1_CDC20!1,Ser355~u).FZR1(APC!1,FBXO5,nTerm~u)";
  species cell_FZR1_APC_FBXO5_nTerm_u in cell = 3.4406152e20; cell_FZR1_APC_FBXO5_nTerm_u is "@cell::FZR1(APC,FBXO5,nTerm~u)";
  species cell_FZR1_APC_FBXO5_nTerm_p in cell = 9.7028319e22; cell_FZR1_APC_FBXO5_nTerm_p is "@cell::FZR1(APC,FBXO5,nTerm~p)";
  species S19 in cell = 6.5604459e22; S19 is "@cell::APC(FBXO5!1,FZR1_CDC20!2,Ser355~u).FBXO5(APC!1,FZR1!3,Ser182~u).FZR1(APC!2,FBXO5!3,nTerm~u)";
  species cell_FBXO5_APC_FZR1_Ser182_u in cell = 4.3226888e20; cell_FBXO5_APC_FZR1_Ser182_u is "@cell::FBXO5(APC,FZR1,Ser182~u)";
  species S21 in cell = 1.3323959e21; S21 is "@cell::APC(FBXO5!1,FZR1_CDC20!2,Ser355~p).FBXO5(APC!1,FZR1!3,Ser182~u).FZR1(APC!2,FBXO5!3,nTerm~u)";
  species S22 in cell = 8.1944566e21; S22 is "@cell::APC(FBXO5,FZR1_CDC20!1,Ser355~p).FZR1(APC!1,FBXO5,nTerm~u)";
  species cell_FBXO5_APC_FZR1_Ser182_p in cell = 1.1324333e19; cell_FBXO5_APC_FZR1_Ser182_p is "@cell::FBXO5(APC,FZR1,Ser182~p)";
  species cell_FOXM1_DBD_Thr600_u in cell = 3.3510826e21; cell_FOXM1_DBD_Thr600_u is "@cell::FOXM1(DBD,Thr600~u)";
  species cell_FOXM1_DBD_Thr600_p in cell = 2.2950816e20; cell_FOXM1_DBD_Thr600_p is "@cell::FOXM1(DBD,Thr600~p)";
  species S26 in cell = 1.1461427e17; S26 is "@cell::CCNB_promoter(FOXM1!1).FOXM1(DBD!1,Thr600~p)";
  species cell_CCNB_promoter_FOXM1 in cell = 6.0105386e19; cell_CCNB_promoter_FOXM1 is "@cell::CCNB_promoter(FOXM1)";
  species cell_CDC20_promoter_FOXM1 in cell = 6.0174121e19; cell_CDC20_promoter_FOXM1 is "@cell::CDC20_promoter(FOXM1)";
  species S29 in cell = 4.5878816e16; S29 is "@cell::CDC20_promoter(FOXM1!1).FOXM1(DBD!1,Thr600~p)";
  species cell_WEE1_Ser123_u in cell = 5.9042195e23; cell_WEE1_Ser123_u is "@cell::WEE1(Ser123~u)";
  species cell_CCNB_CDK1_Thr14_Tyr15_p in cell = 4.5242773e21; cell_CCNB_CDK1_Thr14_Tyr15_p is "@cell::CCNB(CDK1_Thr14_Tyr15~p)";
  species cell_WEE1_Ser123_p in cell = 1.1778049e22; cell_WEE1_Ser123_p is "@cell::WEE1(Ser123~p)";
  species cell_CDC25_pSites_p in cell = 1.1103404e22; cell_CDC25_pSites_p is "@cell::CDC25(pSites~p)";
  species cell_CDC25_pSites_u in cell = 5.910966e23; cell_CDC25_pSites_u is "@cell::CDC25(pSites~u)";
  species cell_MASTL_Thr198_u in cell = 6.0070998e23; cell_MASTL_Thr198_u is "@cell::MASTL(Thr198~u)";
  species cell_MASTL_Thr198_p in cell = 1.4900204e21; cell_MASTL_Thr198_p is "@cell::MASTL(Thr198~p)";
  species S37 in cell = 4.9793694e23; S37 is "@cell::ENSA_ARPP19(PPP2R2B,Ser62_Ser67~u)";
  species S38 in cell = 1.9785953e20; S38 is "@cell::ENSA_ARPP19(PPP2R2B,Ser62_Ser67~p)";
  species S39 in cell = 1.040652e23; S39 is "@cell::ENSA_ARPP19(PPP2R2B!1,Ser62_Ser67~p).PPP2R2B(ENSA_ARPP19!1)";
  species cell_CCNE_promoter_E2F in cell = 5.0873268e19; cell_CCNE_promoter_E2F is "@cell::CCNE_promoter(E2F)";
  species cell_CCNA_promoter_E2F in cell = 5.0873268e19; cell_CCNA_promoter_E2F is "@cell::CCNA_promoter(E2F)";
  species cell_E2F_promoter_E2F in cell = 5.0873268e19; cell_E2F_promoter_E2F is "@cell::E2F_promoter(E2F)";
  species cell_FBXO5_promoter_E2F in cell = 5.0873268e19; cell_FBXO5_promoter_E2F is "@cell::FBXO5_promoter(E2F)";
  species cell_FOXM1_promoter_E2F in cell = 5.0873268e19; cell_FOXM1_promoter_E2F is "@cell::FOXM1_promoter(E2F)";
  species S45 in cell = 9.3467317e18; S45 is "@cell::CCNE_promoter(E2F!1).E2F(DBD!1,RB1,Ser332~u)";
  species S46 in cell = 9.3467317e18; S46 is "@cell::CCNA_promoter(E2F!1).E2F(DBD!1,RB1,Ser332~u)";
  species S47 in cell = 9.3467317e18; S47 is "@cell::E2F(DBD!1,RB1,Ser332~u).E2F_promoter(E2F!1)";
  species S48 in cell = 9.3467317e18; S48 is "@cell::E2F(DBD!1,RB1,Ser332~u).FBXO5_promoter(E2F!1)";
  species S49 in cell = 9.3467317e18; S49 is "@cell::E2F(DBD!1,RB1,Ser332~u).FOXM1_promoter(E2F!1)";
  species cell_iWEE in cell = 0; cell_iWEE is "@cell::iWEE()";

  // Parameters:
  kPhRbD = 9.206253e-27;
  kPhRbE = 1.1507816e-26;
  kDpRb = 0.0013860014;
  kPhRb = 3.4523449e-26;
  kSyCe1 = 8.3465003e18;
  kSyCe2 = 4.1580042;
  kDeCe = 0.00013860014;
  kDiE2fRb = 0.00034650035;
  kAsE2fRb = 5.7539081e-25;
  kSyE2f1 = 4.1732502e18;
  kSyE2f2 = 0.69300069;
  kDeE2f1 = 6.9300069e-5;
  kDeE2f2 = 0.0013860014;
  kPhE2f = 2.3015632e-27;
  kDpE2f2 = 1.1507816e-25;
  kSyEmi1 = 2.0866251e19;
  kSyEmi2 = 3.4650035;
  kDeEmi1 = 0.00034650035;
  kDeEmi2 = 0.00034650035;
  kDeEmi3 = 0.0034650035;
  kPhEmiA = 5.7539081e-29;
  kPhEmiB = 2.8769541e-28;
  kDpEmi = 3.4650035e-6;
  kSyCa1 = 4.1732502e18;
  kSyCa2 = 0.51975052;
  kDeCa1 = 6.9300069e-6;
  kDeCa2 = 4.6031265e-27;
  kDeCa3 = 1.1507816e-27;
  kDpCdh = 0.0034650035;
  kPhCdhA = 2.8769541e-26;
  kPhCdhE = 1.1507816e-27;
  kPhCdhB = 2.8769541e-25;
  kDiACE = 0.00034650035;
  kAsACE = 5.7539081e-25;
  kDiACdh = 0.00034650035;
  kAsACdh = 5.7539081e-25;
  kPhCeA = 1.1507816e-26;
  kPhCeE = 1.1507816e-28;
  kPhFoxE = 1.1507816e-27;
  kPhFoxA = 1.1507816e-27;
  kPhFoxB = 5.7539081e-27;
  kDpFox = 3.4650035e-5;
  kSyCb1 = 4.1732502e18;
  kSyCb2 = 0.51975052;
  kDeCb1 = 6.9300069e-6;
  kDeCb2 = 1.438477e-27;
  kDeCb3 = 1.438477e-27;
  kPhEnsa = 1.1507816e-27;
  kDpEnsa = 0.00034650035;
  kPhGw = 1.1507816e-26;
  kDpGw1 = 0.0017325017;
  kDpGw2 = 1.1507816e-25;
  kWee1 = 1.1507816e-28;
  kWee2 = 1.1507816e-26;
  kPhWeeA = 1.1507816e-27;
  kPhWeeB = 1.1507816e-26;
  kDpWee = 1.1507816e-25;
  kCdc25_1 = 1.1507816e-27;
  kCdc25_2 = 1.1507816e-26;
  kDpCdc25 = 1.1507816e-25;
  kDipEB55 = 4.7124047e-5;
  kAspEB55 = 6.5594552e-25;
  kSyCdc_1 = 4.1732502e18;
  kSyCdc_2 = 0.69300069;
  kDeCdc_1 = 2.7720028e-5;
  kDeCdc_2 = 4.6031265e-28;
  kDipACdc = 0.00086625087;
  kAspACdc = 1.1507816e-26;
  kPhApcA = 1.1507816e-28;
  kPhApcB = 6.9300069e-5;
  kDpApc = 5.7539081e-26;
  kSyFox1 = 4.1732502e18;
  kSyFox2 = 0.51975052;
  kDeFox1 = 6.9300069e-6;
  kDeFox2 = 5.7539081e-27;
  kAsEPx = 5.7539081e-25;
  kDiEPx = 0.034650035;
  kAsFPcb = 5.7539081e-25;
  kDiFPcb = 0.069300069;
  kAsFPcdc = 5.7539081e-25;
  kDiFPcdc = 0.17325017;
  kPhC25B = 1.1507816e-26;
  kPhCAEE = 9.2062529e-28;
  kPhCAEA = 2.3015632e-26;
  kPhCAEB = 2.3015632e-25;
  ikSyCb = 1;
  jiWee = 6.022e22;
  _InitialConc1 = 6.022e23;
  _InitialConc2 = 1.3986043e23;
  _InitialConc3 = 1.1128068e22;
  _InitialConc4 = 2.2932894e19;
  _InitialConc5 = 4.2325597e21;
  _InitialConc6 = 1.133559e21;
  _InitialConc7 = 4.3034014e22;
  _InitialConc8 = 9.065434e19;
  _InitialConc9 = 5.2778426e22;
  _InitialConc10 = 5.0629691e23;
  _InitialConc11 = 4.6484797e22;
  _InitialConc12 = 2.4260911e24;
  _InitialConc13 = 1.3847757e23;
  _InitialConc14 = 4.2087805e22;
  _InitialConc15 = 3.7993439e22;
  _InitialConc16 = 4.2969631e23;
  _InitialConc17 = 3.4406152e20;
  _InitialConc18 = 9.7028319e22;
  _InitialConc19 = 6.5604459e22;
  _InitialConc20 = 4.3226888e20;
  _InitialConc21 = 1.3323959e21;
  _InitialConc22 = 8.1944566e21;
  _InitialConc23 = 1.1324333e19;
  _InitialConc24 = 3.3510826e21;
  _InitialConc25 = 2.2950816e20;
  _InitialConc26 = 1.1461427e17;
  _InitialConc27 = 6.0105386e19;
  _InitialConc28 = 6.0174121e19;
  _InitialConc29 = 4.5878816e16;
  _InitialConc30 = 5.9042195e23;
  _InitialConc31 = 4.5242773e21;
  _InitialConc32 = 1.1778049e22;
  _InitialConc33 = 1.1103404e22;
  _InitialConc34 = 5.910966e23;
  _InitialConc35 = 6.0070998e23;
  _InitialConc36 = 1.4900204e21;
  _InitialConc37 = 4.9793694e23;
  _InitialConc38 = 1.9785953e20;
  _InitialConc39 = 1.040652e23;
  _InitialConc40 = 5.0873268e19;
  _InitialConc41 = 5.0873268e19;
  _InitialConc42 = 5.0873268e19;
  _InitialConc43 = 5.0873268e19;
  _InitialConc44 = 5.0873268e19;
  _InitialConc45 = 9.3467317e18;
  _InitialConc46 = 9.3467317e18;
  _InitialConc47 = 9.3467317e18;
  _InitialConc48 = 9.3467317e18;
  _InitialConc49 = 9.3467317e18;
  _InitialConc50 = 0;

  // Reactions:
  R1: => cell_E2F_DBD_RB1_Ser332_u; kSyE2f1;
  R2: cell_FOXM1_DBD_Thr600_p + cell_CCNB_promoter_FOXM1 => S26; kAsFPcb*cell_FOXM1_DBD_Thr600_p*cell_CCNB_promoter_FOXM1;
  R3: S26 => cell_FOXM1_DBD_Thr600_p + cell_CCNB_promoter_FOXM1; kDiFPcb*S26;
  R4: S47 => cell_E2F_DBD_RB1_Ser332_u + S47; kSyE2f2*S47;
  R5: cell_E2F_DBD_RB1_Ser332_u => ; kDeE2f1*cell_E2F_DBD_RB1_Ser332_u;
  R6: cell_E2F_DBD_RB1_Ser332_p => ; kDeE2f1*cell_E2F_DBD_RB1_Ser332_p;
  R7: S7 => cell_RB1_E2F_Ser807_Ser811_u; kDeE2f1*S7;
  R8: S8 => cell_RB1_E2F_Ser807_Ser811_u; kDeE2f1*S8;
  R9: cell_CCND + S7 => cell_CCND + cell_E2F_DBD_RB1_Ser332_u + cell_RB1_E2F_Ser807_Ser811_p; kPhRbD*cell_CCND*S7;
  R10: cell_CCND + S8 => cell_CCND + cell_E2F_DBD_RB1_Ser332_p + cell_RB1_E2F_Ser807_Ser811_p; kPhRbD*cell_CCND*S8;
  R11: cell_CCNE + S7 => cell_CCNE + cell_E2F_DBD_RB1_Ser332_u + cell_RB1_E2F_Ser807_Ser811_p; kPhRbE*cell_CCNE*S7;
  R12: cell_CCNE + S8 => cell_CCNE + cell_E2F_DBD_RB1_Ser332_p + cell_RB1_E2F_Ser807_Ser811_p; kPhRbE*cell_CCNE*S8;
  R13: cell_CCNA + S7 => cell_E2F_DBD_RB1_Ser332_u + cell_CCNA + cell_RB1_E2F_Ser807_Ser811_p; kPhRb*cell_CCNA*S7;
  R14: cell_CCNA + S8 => cell_E2F_DBD_RB1_Ser332_p + cell_CCNA + cell_RB1_E2F_Ser807_Ser811_p; kPhRb*cell_CCNA*S8;
  R15: cell_CCNB_CDK1_Thr14_Tyr15_u + S7 => cell_E2F_DBD_RB1_Ser332_u + cell_CCNB_CDK1_Thr14_Tyr15_u + cell_RB1_E2F_Ser807_Ser811_p; kPhRb*cell_CCNB_CDK1_Thr14_Tyr15_u*S7;
  R16: cell_CCNB_CDK1_Thr14_Tyr15_u + S8 => cell_E2F_DBD_RB1_Ser332_p + cell_CCNB_CDK1_Thr14_Tyr15_u + cell_RB1_E2F_Ser807_Ser811_p; kPhRb*cell_CCNB_CDK1_Thr14_Tyr15_u*S8;
  R17: cell_E2F_DBD_RB1_Ser332_u + cell_CCNA => cell_E2F_DBD_RB1_Ser332_p + cell_CCNA; kPhE2f*cell_E2F_DBD_RB1_Ser332_u*cell_CCNA;
  R18: cell_CCNA + S7 => cell_CCNA + S8; kPhE2f*cell_CCNA*S7;
end
