// SBML level 2 version 3

model cell_cycle_v3_0_0()

  // Compartments:
  compartment cell = 1;

  // Species:
  species _cell__CCND in cell = 6.022e23;
  species _cell__CCNE in cell = 1.3986043e23;
  species _cell__E2F_DBD_RB1_Ser332u_ in cell = 1.1128068e22;
  species _cell__E2F_DBD_RB1_Ser332p_ in cell = 2.2932894e19;
  species _cell__CCNA in cell = 4.2325597e21;
  species _cell__CCNB_CDK1_Thr14_Tyr15u_ in cell = 1.133559e21;
  species _cell__E2F_DBD_RB1_1_Ser332u__RB1_E2F_1_Ser807_Ser811u_ in cell = 4.3034014e22;
  species _cell__E2F_DBD_RB1_1_Ser332p__RB1_E2F_1_Ser807_Ser811u_ in cell = 9.065434e19;
  species _cell__RB1_E2F_Ser807_Ser811u_ in cell = 5.2778426e22;
  species _cell__RB1_E2F_Ser807_Ser811p_ in cell = 5.0629691e23;
  species _cell__PPP2R2B_ENSA_ARPP19_ in cell = 4.6484797e22;
  species _cell__APC_FBXO5_FZR1_CDC20_Ser355u_ in cell = 2.4260911e24;
  species _cell__CDC20_APC_ in cell = 1.3847757e23;
  species _cell__APC_FBXO5_FZR1_CDC20_1_Ser355p__CDC20_APC_1_ in cell = 4.2087805e22;
  species _cell__APC_FBXO5_FZR1_CDC20_Ser355p_ in cell = 3.7993439e22;
  species _cell__APC_FBXO5_FZR1_CDC20_1_Ser355u__FZR1_APC_1_FBXO5_nTermu_ in cell = 4.2969631e23;
  species _cell__FZR1_APC_FBXO5_nTermu_ in cell = 3.4406152e20;
  species _cell__FZR1_APC_FBXO5_nTermp_ in cell = 9.7028319e22;
  species _cell__APC_FBXO5_1_FZR1_CDC20_2_Ser355u__FBXO5_APC_1_FZR1_3_Ser182u__FZR1_APC_2_FBXO5_3_nTermu_ in cell = 6.5604459e22;
  species _cell__FBXO5_APC_FZR1_Ser182u_ in cell = 4.3226888e20;
  species _cell__APC_FBXO5_1_FZR1_CDC20_2_Ser355p__FBXO5_APC_1_FZR1_3_Ser182u__FZR1_APC_2_FBXO5_3_nTermu_ in cell = 1.3323959e21;
  species _cell__APC_FBXO5_FZR1_CDC20_1_Ser355p__FZR1_APC_1_FBXO5_nTermu_ in cell = 8.1944566e21;
  species _cell__FBXO5_APC_FZR1_Ser182p_ in cell = 1.1324333e19;
  species _cell__FOXM1_DBD_Thr600u_ in cell = 3.3510826e21;
  species _cell__FOXM1_DBD_Thr600p_ in cell = 2.2950816e20;
  species _cell__CCNB_promoter_FOXM1_1__FOXM1_DBD_1_Thr600p_ in cell = 1.1461427e17;
  species _cell__CCNB_promoter_FOXM1_ in cell = 6.0105386e19;
  species _cell__CDC20_promoter_FOXM1_ in cell = 6.0174121e19;
  species _cell__CDC20_promoter_FOXM1_1__FOXM1_DBD_1_Thr600p_ in cell = 4.5878816e16;
  species _cell__WEE1_Ser123u_ in cell = 5.9042195e23;
  species _cell__CCNB_CDK1_Thr14_Tyr15p_ in cell = 4.5242773e21;
  species _cell__WEE1_Ser123p_ in cell = 1.1778049e22;
  species _cell__CDC25_pSitesp_ in cell = 1.1103404e22;
  species _cell__CDC25_pSitesu_ in cell = 5.910966e23;
  species _cell__MASTL_Thr198u_ in cell = 6.0070998e23;
  species _cell__MASTL_Thr198p_ in cell = 1.4900204e21;
  species _cell__ENSA_ARPP19_PPP2R2B_Ser62_Ser67u_ in cell = 4.9793694e23;
  species _cell__ENSA_ARPP19_PPP2R2B_Ser62_Ser67p_ in cell = 1.9785953e20;
  species _cell__ENSA_ARPP19_PPP2R2B_1_Ser62_Ser67p__PPP2R2B_ENSA_ARPP19_1_ in cell = 1.040652e23;
  species _cell__CCNE_promoter_E2F_ in cell = 5.0873268e19;
  species _cell__CCNA_promoter_E2F_ in cell = 5.0873268e19;
  species _cell__E2F_promoter_E2F_ in cell = 5.0873268e19;
  species _cell__FBXO5_promoter_E2F_ in cell = 5.0873268e19;
  species _cell__FOXM1_promoter_E2F_ in cell = 5.0873268e19;
  species _cell__CCNE_promoter_E2F_1__E2F_DBD_1_RB1_Ser332u_ in cell = 9.3467317e18;
  species _cell__CCNA_promoter_E2F_1__E2F_DBD_1_RB1_Ser332u_ in cell = 9.3467317e18;
  species _cell__E2F_DBD_1_RB1_Ser332u__E2F_promoter_E2F_1_ in cell = 9.3467317e18;
  species _cell__E2F_DBD_1_RB1_Ser332u__FBXO5_promoter_E2F_1_ in cell = 9.3467317e18;
  species _cell__E2F_DBD_1_RB1_Ser332u__FOXM1_promoter_E2F_1_ in cell = 9.3467317e18;
  species _cell__iWEE in cell = 0;

  // Parameters:
  kPhRbD = 9.206253e-27;
  kPhRbE = 1.1507816e-26;
  kDpRb = 0.0013860014;
  kPhRb = 3.4523449e-26;
  kSyCe1 = 8.3465003e18;
  kSyCe2 = 4.1580042;
  kDeCe = 0.00013860014;
  kDiE2fRb = 0.00034650035;
  kAsE2fRb = 5.7539081e-25;
  kSyE2f1 = 4.1732502e18;
  kSyE2f2 = 0.69300069;
  kDeE2f1 = 6.9300069e-5;
  kDeE2f2 = 0.0013860014;
  kPhE2f = 2.3015632e-27;
  kDpE2f2 = 1.1507816e-25;
  kSyEmi1 = 2.0866251e19;
  kSyEmi2 = 3.4650035;
  kDeEmi1 = 0.00034650035;
  kDeEmi2 = 0.00034650035;
  kDeEmi3 = 0.0034650035;
  kPhEmiA = 5.7539081e-29;
  kPhEmiB = 2.8769541e-28;
  kDpEmi = 3.4650035e-6;
  kSyCa1 = 4.1732502e18;
  kSyCa2 = 0.51975052;
  kDeCa1 = 6.9300069e-6;
  kDeCa2 = 4.6031265e-27;
  kDeCa3 = 1.1507816e-27;
  kDpCdh = 0.0034650035;
  kPhCdhA = 2.8769541e-26;
  kPhCdhE = 1.1507816e-27;
  kPhCdhB = 2.8769541e-25;
  kDiACE = 0.00034650035;
  kAsACE = 5.7539081e-25;
  kDiACdh = 0.00034650035;
  kAsACdh = 5.7539081e-25;
  kPhCeA = 1.1507816e-26;
  kPhCeE = 1.1507816e-28;
  kPhFoxE = 1.1507816e-27;
  kPhFoxA = 1.1507816e-27;
  kPhFoxB = 5.7539081e-27;
  kDpFox = 3.4650035e-5;
  kSyCb1 = 4.1732502e18;
  kSyCb2 = 0.51975052;
  kDeCb1 = 6.9300069e-6;
  kDeCb2 = 1.438477e-27;
  kDeCb3 = 1.438477e-27;
  kPhEnsa = 1.1507816e-27;
  kDpEnsa = 0.00034650035;
  kPhGw = 1.1507816e-26;
  kDpGw1 = 0.0017325017;
  kDpGw2 = 1.1507816e-25;
  kWee1 = 6.9300069e-5;
  kWee2 = 0.0069300069;
  kPhWeeA = 1.1507816e-27;
  kPhWeeB = 1.1507816e-26;
  kDpWee = 1.1507816e-25;
  kCdc25_1 = 1.1507816e-27;
  kCdc25_2 = 1.1507816e-26;
  kDpCdc25 = 1.1507816e-25;
  kDipEB55 = 4.7124047e-5;
  kAspEB55 = 6.5594552e-25;
  kSyCdc_1 = 4.1732502e18;
  kSyCdc_2 = 0.69300069;
  kDeCdc_1 = 2.7720028e-5;
  kDeCdc_2 = 4.6031265e-28;
  kDipACdc = 0.00086625087;
  kAspACdc = 1.1507816e-26;
  kPhApcA = 1.1507816e-28;
  kDpApc = 5.7539081e-26;
  kSyFox1 = 4.1732502e18;
  kSyFox2 = 0.51975052;
  kDeFox1 = 6.9300069e-6;
  kDeFox2 = 5.7539081e-27;
  kAsEPx = 5.7539081e-25;
  kDiEPx = 0.034650035;
  kAsFPcb = 5.7539081e-25;
  kDiFPcb = 0.069300069;
  kAsFPcdc = 5.7539081e-25;
  kDiFPcdc = 0.17325017;
  kPhC25B = 1.1507816e-26;
  kPhCAEE = 9.2062529e-28;
  kPhCAEA = 2.3015632e-26;
  kPhCAEB = 2.3015632e-25;
  ikSyCb = 1;
  jiWee = 6.022e22;
  kDpE2f1 = 0;
  kPhC25A = 0;
  _InitialConc1 = 6.022e23;
  _InitialConc2 = 1.3986043e23;
  _InitialConc3 = 1.1128068e22;
  _InitialConc4 = 2.2932894e19;
  _InitialConc5 = 4.2325597e21;
  _InitialConc6 = 1.133559e21;
  _InitialConc7 = 4.3034014e22;
  _InitialConc8 = 9.065434e19;
  _InitialConc9 = 5.2778426e22;
  _InitialConc10 = 5.0629691e23;
  _InitialConc11 = 4.6484797e22;
  _InitialConc12 = 2.4260911e24;
  _InitialConc13 = 1.3847757e23;
  _InitialConc14 = 4.2087805e22;
  _InitialConc15 = 3.7993439e22;
  _InitialConc16 = 4.2969631e23;
  _InitialConc17 = 3.4406152e20;
  _InitialConc18 = 9.7028319e22;
  _InitialConc19 = 6.5604459e22;
  _InitialConc20 = 4.3226888e20;
  _InitialConc21 = 1.3323959e21;
  _InitialConc22 = 8.1944566e21;
  _InitialConc23 = 1.1324333e19;
  _InitialConc24 = 3.3510826e21;
  _InitialConc25 = 2.2950816e20;
  _InitialConc26 = 1.1461427e17;
  _InitialConc27 = 6.0105386e19;
  _InitialConc28 = 6.0174121e19;
  _InitialConc29 = 4.5878816e16;
  _InitialConc30 = 5.9042195e23;
  _InitialConc31 = 4.5242773e21;
  _InitialConc32 = 1.1778049e22;
  _InitialConc33 = 1.1103404e22;
  _InitialConc34 = 5.910966e23;
  _InitialConc35 = 6.0070998e23;
  _InitialConc36 = 1.4900204e21;
  _InitialConc37 = 4.9793694e23;
  _InitialConc38 = 1.9785953e20;
  _InitialConc39 = 1.040652e23;
  _InitialConc40 = 5.0873268e19;
  _InitialConc41 = 5.0873268e19;
  _InitialConc42 = 5.0873268e19;
  _InitialConc43 = 5.0873268e19;
  _InitialConc44 = 5.0873268e19;
  _InitialConc45 = 9.3467317e18;
  _InitialConc46 = 9.3467317e18;
  _InitialConc47 = 9.3467317e18;
  _InitialConc48 = 9.3467317e18;
  _InitialConc49 = 9.3467317e18;
  _InitialConc50 = 0;
  _rateLaw1 = kSyCb1*ikSyCb;
  _rateLaw2 = kSyCb2*ikSyCb;

  // Assignment rules:
  Ce_compartment := 0 + _cell__CCNE;
  Wee_compartment := 0 + _cell__WEE1_Ser123u_;
  pWee_compartment := 0 + _cell__WEE1_Ser123p_;
  iWee_compartment := 0 + _cell__iWEE;
  functionRate01 := piecewise(kWee2*0.5*(Wee_compartment - iWee_compartment - jiWee + ((-Wee_compartment + iWee_compartment + jiWee)^2 + 4*jiWee*Wee_compartment)^(1/2))/Wee_compartment, Wee_compartment > 0, 0)/6.022e23;
  functionRate02 := piecewise(kWee1*0.5*(pWee_compartment - iWee_compartment - jiWee + ((-pWee_compartment + iWee_compartment + jiWee)^2 + 4*jiWee*pWee_compartment)^(1/2))/pWee_compartment, pWee_compartment > 0, 0)/6.022e23;

  // Reactions:
  R1: => _cell__E2F_DBD_RB1_Ser332u_; kSyE2f1;
  R2: _cell__FOXM1_DBD_Thr600p_ + _cell__CCNB_promoter_FOXM1_ => _cell__CCNB_promoter_FOXM1_1__FOXM1_DBD_1_Thr600p_; kAsFPcb*_cell__FOXM1_DBD_Thr600p_*_cell__CCNB_promoter_FOXM1_;
  R3: _cell__CCNB_promoter_FOXM1_1__FOXM1_DBD_1_Thr600p_ => _cell__FOXM1_DBD_Thr600p_ + _cell__CCNB_promoter_FOXM1_; kDiFPcb*_cell__CCNB_promoter_FOXM1_1__FOXM1_DBD_1_Thr600p_;
  R4: _cell__E2F_DBD_1_RB1_Ser332u__E2F_promoter_E2F_1_ => _cell__E2F_DBD_RB1_Ser332u_ + _cell__E2F_DBD_1_RB1_Ser332u__E2F_promoter_E2F_1_; kSyE2f2*_cell__E2F_DBD_1_RB1_Ser332u__E2F_promoter_E2F_1_;
  R5: _cell__E2F_DBD_RB1_Ser332u_ => ; kDeE2f1*_cell__E2F_DBD_RB1_Ser332u_;
  R6: _cell__E2F_DBD_RB1_Ser332p_ => ; kDeE2f1*_cell__E2F_DBD_RB1_Ser332p_;
  R7: _cell__E2F_DBD_RB1_1_Ser332u__RB1_E2F_1_Ser807_Ser811u_ => _cell__RB1_E2F_Ser807_Ser811u_; kDeE2f1*_cell__E2F_DBD_RB1_1_Ser332u__RB1_E2F_1_Ser807_Ser811u_;
  R8: _cell__E2F_DBD_RB1_1_Ser332p__RB1_E2F_1_Ser807_Ser811u_ => _cell__RB1_E2F_Ser807_Ser811u_; kDeE2f1*_cell__E2F_DBD_RB1_1_Ser332p__RB1_E2F_1_Ser807_Ser811u_;
  R9: _cell__CCND + _cell__E2F_DBD_RB1_1_Ser332u__RB1_E2F_1_Ser807_Ser811u_ => _cell__CCND + _cell__E2F_DBD_RB1_Ser332u_ + _cell__RB1_E2F_Ser807_Ser811p_; kPhRbD*_cell__CCND*_cell__E2F_DBD_RB1_1_Ser332u__RB1_E2F_1_Ser807_Ser811u_;
  R10: _cell__CCND + _cell__E2F_DBD_RB1_1_Ser332p__RB1_E2F_1_Ser807_Ser811u_ => _cell__CCND + _cell__E2F_DBD_RB1_Ser332p_ + _cell__RB1_E2F_Ser807_Ser811p_; kPhRbD*_cell__CCND*_cell__E2F_DBD_RB1_1_Ser332p__RB1_E2F_1_Ser807_Ser811u_;
  R11: _cell__CCNE + _cell__E2F_DBD_RB1_1_Ser332u__RB1_E2F_1_Ser807_Ser811u_ => _cell__CCNE + _cell__E2F_DBD_RB1_Ser332u_ + _cell__RB1_E2F_Ser807_Ser811p_; kPhRbE*_cell__CCNE*_cell__E2F_DBD_RB1_1_Ser332u__RB1_E2F_1_Ser807_Ser811u_;
  R12: _cell__CCNE + _cell__E2F_DBD_RB1_1_Ser332p__RB1_E2F_1_Ser807_Ser811u_ => _cell__CCNE + _cell__E2F_DBD_RB1_Ser332p_ + _cell__RB1_E2F_Ser807_Ser811p_; kPhRbE*_cell__CCNE*_cell__E2F_DBD_RB1_1_Ser332p__RB1_E2F_1_Ser807_Ser811u_;
  R13: _cell__CCNA + _cell__E2F_DBD_RB1_1_Ser332u__RB1_E2F_1_Ser807_Ser811u_ => _cell__E2F_DBD_RB1_Ser332u_ + _cell__CCNA + _cell__RB1_E2F_Ser807_Ser811p_; kPhRb*_cell__CCNA*_cell__E2F_DBD_RB1_1_Ser332u__RB1_E2F_1_Ser807_Ser811u_;
  R14: _cell__CCNA + _cell__E2F_DBD_RB1_1_Ser332p__RB1_E2F_1_Ser807_Ser811u_ => _cell__E2F_DBD_RB1_Ser332p_ + _cell__CCNA + _cell__RB1_E2F_Ser807_Ser811p_; kPhRb*_cell__CCNA*_cell__E2F_DBD_RB1_1_Ser332p__RB1_E2F_1_Ser807_Ser811u_;
  R15: _cell__CCNB_CDK1_Thr14_Tyr15u_ + _cell__E2F_DBD_RB1_1_Ser332u__RB1_E2F_1_Ser807_Ser811u_ => _cell__E2F_DBD_RB1_Ser332u_ + _cell__CCNB_CDK1_Thr14_Tyr15u_ + _cell__RB1_E2F_Ser807_Ser811p_; kPhRb*_cell__CCNB_CDK1_Thr14_Tyr15u_*_cell__E2F_DBD_RB1_1_Ser332u__RB1_E2F_1_Ser807_Ser811u_;
  R16: _cell__CCNB_CDK1_Thr14_Tyr15u_ + _cell__E2F_DBD_RB1_1_Ser332p__RB1_E2F_1_Ser807_Ser811u_ => _cell__E2F_DBD_RB1_Ser332p_ + _cell__CCNB_CDK1_Thr14_Tyr15u_ + _cell__RB1_E2F_Ser807_Ser811p_; kPhRb*_cell__CCNB_CDK1_Thr14_Tyr15u_*_cell__E2F_DBD_RB1_1_Ser332p__RB1_E2F_1_Ser807_Ser811u_;
  R17: _cell__E2F_DBD_RB1_Ser332u_ + _cell__CCNA => _cell__E2F_DBD_RB1_Ser332p_ + _cell__CCNA; kPhE2f*_cell__E2F_DBD_RB1_Ser332u_*_cell__CCNA;
  R18: _cell__CCNA + _cell__E2F_DBD_RB1_1_Ser332u__RB1_E2F_1_Ser807_Ser811u_ => _cell__CCNA + _cell__E2F_DBD_RB1_1_Ser332p__RB1_E2F_1_Ser807_Ser811u_; kPhE2f*_cell__CCNA*_cell__E2F_DBD_RB1_1_Ser332u__RB1_E2F_1_Ser807_Ser811u_;
  R19: _cell__E2F_DBD_RB1_Ser332u_ + _cell__CCNB_CDK1_Thr14_Tyr15u_ => _cell__E2F_DBD_RB1_Ser332p_ + _cell__CCNB_CDK1_Thr14_Tyr15u_; kPhE2f*_cell__E2F_DBD_RB1_Ser332u_*_cell__CCNB_CDK1_Thr14_Tyr15u_;
  R20: _cell__CCNB_CDK1_Thr14_Tyr15u_ + _cell__E2F_DBD_RB1_1_Ser332u__RB1_E2F_1_Ser807_Ser811u_ => _cell__CCNB_CDK1_Thr14_Tyr15u_ + _cell__E2F_DBD_RB1_1_Ser332p__RB1_E2F_1_Ser807_Ser811u_; kPhE2f*_cell__CCNB_CDK1_Thr14_Tyr15u_*_cell__E2F_DBD_RB1_1_Ser332u__RB1_E2F_1_Ser807_Ser811u_;
  R21: _cell__E2F_DBD_RB1_Ser332p_ => _cell__E2F_DBD_RB1_Ser332u_; kDpE2f1*_cell__E2F_DBD_RB1_Ser332p_;
  R22: _cell__E2F_DBD_RB1_1_Ser332p__RB1_E2F_1_Ser807_Ser811u_ => _cell__E2F_DBD_RB1_1_Ser332u__RB1_E2F_1_Ser807_Ser811u_; kDpE2f1*_cell__E2F_DBD_RB1_1_Ser332p__RB1_E2F_1_Ser807_Ser811u_;
  R23: _cell__E2F_DBD_RB1_Ser332p_ + _cell__PPP2R2B_ENSA_ARPP19_ => _cell__E2F_DBD_RB1_Ser332u_ + _cell__PPP2R2B_ENSA_ARPP19_; kDpE2f2*_cell__E2F_DBD_RB1_Ser332p_*_cell__PPP2R2B_ENSA_ARPP19_;
  R24: _cell__E2F_DBD_RB1_1_Ser332p__RB1_E2F_1_Ser807_Ser811u_ + _cell__PPP2R2B_ENSA_ARPP19_ => _cell__E2F_DBD_RB1_1_Ser332u__RB1_E2F_1_Ser807_Ser811u_ + _cell__PPP2R2B_ENSA_ARPP19_; kDpE2f2*_cell__E2F_DBD_RB1_1_Ser332p__RB1_E2F_1_Ser807_Ser811u_*_cell__PPP2R2B_ENSA_ARPP19_;
  R25: _cell__E2F_DBD_RB1_Ser332p_ => ; kDeE2f2*_cell__E2F_DBD_RB1_Ser332p_;
  R26: _cell__E2F_DBD_RB1_1_Ser332p__RB1_E2F_1_Ser807_Ser811u_ => _cell__RB1_E2F_Ser807_Ser811u_; kDeE2f2*_cell__E2F_DBD_RB1_1_Ser332p__RB1_E2F_1_Ser807_Ser811u_;
  R27: _cell__CCND + _cell__RB1_E2F_Ser807_Ser811u_ => _cell__CCND + _cell__RB1_E2F_Ser807_Ser811p_; kPhRbD*_cell__CCND*_cell__RB1_E2F_Ser807_Ser811u_;
  R28: _cell__CCNE + _cell__RB1_E2F_Ser807_Ser811u_ => _cell__CCNE + _cell__RB1_E2F_Ser807_Ser811p_; kPhRbE*_cell__CCNE*_cell__RB1_E2F_Ser807_Ser811u_;
  R29: _cell__CCNA + _cell__RB1_E2F_Ser807_Ser811u_ => _cell__CCNA + _cell__RB1_E2F_Ser807_Ser811p_; kPhRb*_cell__CCNA*_cell__RB1_E2F_Ser807_Ser811u_;
  R30: _cell__CCNB_CDK1_Thr14_Tyr15u_ + _cell__RB1_E2F_Ser807_Ser811u_ => _cell__CCNB_CDK1_Thr14_Tyr15u_ + _cell__RB1_E2F_Ser807_Ser811p_; kPhRb*_cell__CCNB_CDK1_Thr14_Tyr15u_*_cell__RB1_E2F_Ser807_Ser811u_;
  R31: => _cell__CCNE; kSyCe1;
  R32: _cell__CCNA_promoter_E2F_1__E2F_DBD_1_RB1_Ser332u_ => _cell__CCNA + _cell__CCNA_promoter_E2F_1__E2F_DBD_1_RB1_Ser332u_; kSyCa2*_cell__CCNA_promoter_E2F_1__E2F_DBD_1_RB1_Ser332u_;
  R33: _cell__CCNE => ; kDeCe*_cell__CCNE;
  R34: _cell__CCNE + _cell__CCNE => _cell__CCNE; kPhCeE*_cell__CCNE*_cell__CCNE;
  R35: _cell__RB1_E2F_Ser807_Ser811p_ => _cell__RB1_E2F_Ser807_Ser811u_; kDpRb*_cell__RB1_E2F_Ser807_Ser811p_;
  R36: _cell__PPP2R2B_ENSA_ARPP19_ + _cell__APC_FBXO5_FZR1_CDC20_1_Ser355p__CDC20_APC_1_ => _cell__PPP2R2B_ENSA_ARPP19_ + _cell__APC_FBXO5_FZR1_CDC20_Ser355u_ + _cell__CDC20_APC_; kDpApc*_cell__PPP2R2B_ENSA_ARPP19_*_cell__APC_FBXO5_FZR1_CDC20_1_Ser355p__CDC20_APC_1_;
  R37: _cell__CCNA + _cell__APC_FBXO5_FZR1_CDC20_Ser355u_ => _cell__CCNA + _cell__APC_FBXO5_FZR1_CDC20_Ser355p_; kPhApcA*_cell__CCNA*_cell__APC_FBXO5_FZR1_CDC20_Ser355u_;
  R38: _cell__CCNA + _cell__APC_FBXO5_FZR1_CDC20_1_Ser355u__FZR1_APC_1_FBXO5_nTermu_ => _cell__CCNA + _cell__APC_FBXO5_FZR1_CDC20_1_Ser355p__FZR1_APC_1_FBXO5_nTermu_; kPhApcA*_cell__CCNA*_cell__APC_FBXO5_FZR1_CDC20_1_Ser355u__FZR1_APC_1_FBXO5_nTermu_;
  R39: _cell__CCNA + _cell__APC_FBXO5_1_FZR1_CDC20_2_Ser355u__FBXO5_APC_1_FZR1_3_Ser182u__FZR1_APC_2_FBXO5_3_nTermu_ => _cell__CCNA + _cell__APC_FBXO5_1_FZR1_CDC20_2_Ser355p__FBXO5_APC_1_FZR1_3_Ser182u__FZR1_APC_2_FBXO5_3_nTermu_; kPhApcA*_cell__CCNA*_cell__APC_FBXO5_1_FZR1_CDC20_2_Ser355u__FBXO5_APC_1_FZR1_3_Ser182u__FZR1_APC_2_FBXO5_3_nTermu_;
  R40: _cell__CCNB_CDK1_Thr14_Tyr15u_ + _cell__APC_FBXO5_FZR1_CDC20_Ser355u_ => _cell__CCNB_CDK1_Thr14_Tyr15u_ + _cell__APC_FBXO5_FZR1_CDC20_Ser355p_; kPhApcA*_cell__CCNB_CDK1_Thr14_Tyr15u_*_cell__APC_FBXO5_FZR1_CDC20_Ser355u_;
  R41: _cell__CCNB_CDK1_Thr14_Tyr15u_ + _cell__APC_FBXO5_FZR1_CDC20_1_Ser355u__FZR1_APC_1_FBXO5_nTermu_ => _cell__CCNB_CDK1_Thr14_Tyr15u_ + _cell__APC_FBXO5_FZR1_CDC20_1_Ser355p__FZR1_APC_1_FBXO5_nTermu_; kPhApcA*_cell__CCNB_CDK1_Thr14_Tyr15u_*_cell__APC_FBXO5_FZR1_CDC20_1_Ser355u__FZR1_APC_1_FBXO5_nTermu_;
  R42: _cell__CCNB_CDK1_Thr14_Tyr15u_ + _cell__APC_FBXO5_1_FZR1_CDC20_2_Ser355u__FBXO5_APC_1_FZR1_3_Ser182u__FZR1_APC_2_FBXO5_3_nTermu_ => _cell__CCNB_CDK1_Thr14_Tyr15u_ + _cell__APC_FBXO5_1_FZR1_CDC20_2_Ser355p__FBXO5_APC_1_FZR1_3_Ser182u__FZR1_APC_2_FBXO5_3_nTermu_; kPhApcA*_cell__CCNB_CDK1_Thr14_Tyr15u_*_cell__APC_FBXO5_1_FZR1_CDC20_2_Ser355u__FBXO5_APC_1_FZR1_3_Ser182u__FZR1_APC_2_FBXO5_3_nTermu_;
  R43: _cell__PPP2R2B_ENSA_ARPP19_ + _cell__APC_FBXO5_FZR1_CDC20_Ser355p_ => _cell__PPP2R2B_ENSA_ARPP19_ + _cell__APC_FBXO5_FZR1_CDC20_Ser355u_; kDpApc*_cell__PPP2R2B_ENSA_ARPP19_*_cell__APC_FBXO5_FZR1_CDC20_Ser355p_;
  R44: _cell__PPP2R2B_ENSA_ARPP19_ + _cell__APC_FBXO5_1_FZR1_CDC20_2_Ser355p__FBXO5_APC_1_FZR1_3_Ser182u__FZR1_APC_2_FBXO5_3_nTermu_ => _cell__PPP2R2B_ENSA_ARPP19_ + _cell__APC_FBXO5_1_FZR1_CDC20_2_Ser355u__FBXO5_APC_1_FZR1_3_Ser182u__FZR1_APC_2_FBXO5_3_nTermu_; kDpApc*_cell__PPP2R2B_ENSA_ARPP19_*_cell__APC_FBXO5_1_FZR1_CDC20_2_Ser355p__FBXO5_APC_1_FZR1_3_Ser182u__FZR1_APC_2_FBXO5_3_nTermu_;
  R45: _cell__PPP2R2B_ENSA_ARPP19_ + _cell__APC_FBXO5_FZR1_CDC20_1_Ser355p__FZR1_APC_1_FBXO5_nTermu_ => _cell__PPP2R2B_ENSA_ARPP19_ + _cell__APC_FBXO5_FZR1_CDC20_1_Ser355u__FZR1_APC_1_FBXO5_nTermu_; kDpApc*_cell__PPP2R2B_ENSA_ARPP19_*_cell__APC_FBXO5_FZR1_CDC20_1_Ser355p__FZR1_APC_1_FBXO5_nTermu_;
  R46: _cell__CCNA + _cell__APC_FBXO5_FZR1_CDC20_1_Ser355u__FZR1_APC_1_FBXO5_nTermu_ => _cell__CCNA + _cell__APC_FBXO5_FZR1_CDC20_Ser355u_ + _cell__FZR1_APC_FBXO5_nTermp_; kPhCdhA*_cell__CCNA*_cell__APC_FBXO5_FZR1_CDC20_1_Ser355u__FZR1_APC_1_FBXO5_nTermu_;
  R47: _cell__CCNA + _cell__APC_FBXO5_FZR1_CDC20_1_Ser355p__FZR1_APC_1_FBXO5_nTermu_ => _cell__CCNA + _cell__APC_FBXO5_FZR1_CDC20_Ser355p_ + _cell__FZR1_APC_FBXO5_nTermp_; kPhCdhA*_cell__CCNA*_cell__APC_FBXO5_FZR1_CDC20_1_Ser355p__FZR1_APC_1_FBXO5_nTermu_;
  R48: _cell__CCNE + _cell__APC_FBXO5_1_FZR1_CDC20_2_Ser355u__FBXO5_APC_1_FZR1_3_Ser182u__FZR1_APC_2_FBXO5_3_nTermu_ => _cell__CCNE + _cell__APC_FBXO5_FZR1_CDC20_Ser355u_ + _cell__FZR1_APC_FBXO5_nTermp_ + _cell__FBXO5_APC_FZR1_Ser182u_; kPhCAEE*_cell__CCNE*_cell__APC_FBXO5_1_FZR1_CDC20_2_Ser355u__FBXO5_APC_1_FZR1_3_Ser182u__FZR1_APC_2_FBXO5_3_nTermu_;
  R49: _cell__CCNE + _cell__APC_FBXO5_1_FZR1_CDC20_2_Ser355p__FBXO5_APC_1_FZR1_3_Ser182u__FZR1_APC_2_FBXO5_3_nTermu_ => _cell__CCNE + _cell__APC_FBXO5_FZR1_CDC20_Ser355p_ + _cell__FZR1_APC_FBXO5_nTermp_ + _cell__FBXO5_APC_FZR1_Ser182u_; kPhCAEE*_cell__CCNE*_cell__APC_FBXO5_1_FZR1_CDC20_2_Ser355p__FBXO5_APC_1_FZR1_3_Ser182u__FZR1_APC_2_FBXO5_3_nTermu_;
  R50: _cell__CCNA + _cell__APC_FBXO5_1_FZR1_CDC20_2_Ser355u__FBXO5_APC_1_FZR1_3_Ser182u__FZR1_APC_2_FBXO5_3_nTermu_ => _cell__CCNA + _cell__APC_FBXO5_FZR1_CDC20_Ser355u_ + _cell__FZR1_APC_FBXO5_nTermp_ + _cell__FBXO5_APC_FZR1_Ser182u_; kPhCAEA*_cell__CCNA*_cell__APC_FBXO5_1_FZR1_CDC20_2_Ser355u__FBXO5_APC_1_FZR1_3_Ser182u__FZR1_APC_2_FBXO5_3_nTermu_;
  R51: _cell__CCNA + _cell__APC_FBXO5_1_FZR1_CDC20_2_Ser355p__FBXO5_APC_1_FZR1_3_Ser182u__FZR1_APC_2_FBXO5_3_nTermu_ => _cell__CCNA + _cell__APC_FBXO5_FZR1_CDC20_Ser355p_ + _cell__FZR1_APC_FBXO5_nTermp_ + _cell__FBXO5_APC_FZR1_Ser182u_; kPhCAEA*_cell__CCNA*_cell__APC_FBXO5_1_FZR1_CDC20_2_Ser355p__FBXO5_APC_1_FZR1_3_Ser182u__FZR1_APC_2_FBXO5_3_nTermu_;
  R52: _cell__CCNB_CDK1_Thr14_Tyr15u_ + _cell__APC_FBXO5_1_FZR1_CDC20_2_Ser355u__FBXO5_APC_1_FZR1_3_Ser182u__FZR1_APC_2_FBXO5_3_nTermu_ => _cell__CCNB_CDK1_Thr14_Tyr15u_ + _cell__APC_FBXO5_FZR1_CDC20_Ser355u_ + _cell__FZR1_APC_FBXO5_nTermp_ + _cell__FBXO5_APC_FZR1_Ser182u_; kPhCAEB*_cell__CCNB_CDK1_Thr14_Tyr15u_*_cell__APC_FBXO5_1_FZR1_CDC20_2_Ser355u__FBXO5_APC_1_FZR1_3_Ser182u__FZR1_APC_2_FBXO5_3_nTermu_;
  R53: _cell__CCNB_CDK1_Thr14_Tyr15u_ + _cell__APC_FBXO5_1_FZR1_CDC20_2_Ser355p__FBXO5_APC_1_FZR1_3_Ser182u__FZR1_APC_2_FBXO5_3_nTermu_ => _cell__CCNB_CDK1_Thr14_Tyr15u_ + _cell__APC_FBXO5_FZR1_CDC20_Ser355p_ + _cell__FZR1_APC_FBXO5_nTermp_ + _cell__FBXO5_APC_FZR1_Ser182u_; kPhCAEB*_cell__CCNB_CDK1_Thr14_Tyr15u_*_cell__APC_FBXO5_1_FZR1_CDC20_2_Ser355p__FBXO5_APC_1_FZR1_3_Ser182u__FZR1_APC_2_FBXO5_3_nTermu_;
  R54: _cell__CCNE + _cell__APC_FBXO5_FZR1_CDC20_1_Ser355u__FZR1_APC_1_FBXO5_nTermu_ => _cell__CCNE + _cell__APC_FBXO5_FZR1_CDC20_Ser355u_ + _cell__FZR1_APC_FBXO5_nTermp_; kPhCdhE*_cell__CCNE*_cell__APC_FBXO5_FZR1_CDC20_1_Ser355u__FZR1_APC_1_FBXO5_nTermu_;
  R55: _cell__CCNE + _cell__APC_FBXO5_FZR1_CDC20_1_Ser355p__FZR1_APC_1_FBXO5_nTermu_ => _cell__CCNE + _cell__APC_FBXO5_FZR1_CDC20_Ser355p_ + _cell__FZR1_APC_FBXO5_nTermp_; kPhCdhE*_cell__CCNE*_cell__APC_FBXO5_FZR1_CDC20_1_Ser355p__FZR1_APC_1_FBXO5_nTermu_;
  R56: _cell__APC_FBXO5_1_FZR1_CDC20_2_Ser355u__FBXO5_APC_1_FZR1_3_Ser182u__FZR1_APC_2_FBXO5_3_nTermu_ => _cell__APC_FBXO5_FZR1_CDC20_1_Ser355u__FZR1_APC_1_FBXO5_nTermu_; kDeEmi1*_cell__APC_FBXO5_1_FZR1_CDC20_2_Ser355u__FBXO5_APC_1_FZR1_3_Ser182u__FZR1_APC_2_FBXO5_3_nTermu_;
  R57: _cell__FBXO5_APC_FZR1_Ser182u_ => ; kDeEmi1*_cell__FBXO5_APC_FZR1_Ser182u_;
  R58: _cell__APC_FBXO5_1_FZR1_CDC20_2_Ser355p__FBXO5_APC_1_FZR1_3_Ser182u__FZR1_APC_2_FBXO5_3_nTermu_ => _cell__APC_FBXO5_FZR1_CDC20_1_Ser355p__FZR1_APC_1_FBXO5_nTermu_; kDeEmi1*_cell__APC_FBXO5_1_FZR1_CDC20_2_Ser355p__FBXO5_APC_1_FZR1_3_Ser182u__FZR1_APC_2_FBXO5_3_nTermu_;
  R59: _cell__FBXO5_APC_FZR1_Ser182p_ => ; kDeEmi1*_cell__FBXO5_APC_FZR1_Ser182p_;
  R60: _cell__APC_FBXO5_1_FZR1_CDC20_2_Ser355u__FBXO5_APC_1_FZR1_3_Ser182u__FZR1_APC_2_FBXO5_3_nTermu_ => _cell__APC_FBXO5_FZR1_CDC20_1_Ser355u__FZR1_APC_1_FBXO5_nTermu_; kDeEmi2*_cell__APC_FBXO5_1_FZR1_CDC20_2_Ser355u__FBXO5_APC_1_FZR1_3_Ser182u__FZR1_APC_2_FBXO5_3_nTermu_;
  R61: _cell__APC_FBXO5_1_FZR1_CDC20_2_Ser355p__FBXO5_APC_1_FZR1_3_Ser182u__FZR1_APC_2_FBXO5_3_nTermu_ => _cell__APC_FBXO5_FZR1_CDC20_1_Ser355p__FZR1_APC_1_FBXO5_nTermu_; kDeEmi2*_cell__APC_FBXO5_1_FZR1_CDC20_2_Ser355p__FBXO5_APC_1_FZR1_3_Ser182u__FZR1_APC_2_FBXO5_3_nTermu_;
  R62: _cell__CCNA + _cell__APC_FBXO5_1_FZR1_CDC20_2_Ser355u__FBXO5_APC_1_FZR1_3_Ser182u__FZR1_APC_2_FBXO5_3_nTermu_ => _cell__CCNA + _cell__APC_FBXO5_FZR1_CDC20_1_Ser355u__FZR1_APC_1_FBXO5_nTermu_ + _cell__FBXO5_APC_FZR1_Ser182p_; kPhEmiA*_cell__CCNA*_cell__APC_FBXO5_1_FZR1_CDC20_2_Ser355u__FBXO5_APC_1_FZR1_3_Ser182u__FZR1_APC_2_FBXO5_3_nTermu_;
  R63: _cell__CCNA + _cell__APC_FBXO5_1_FZR1_CDC20_2_Ser355p__FBXO5_APC_1_FZR1_3_Ser182u__FZR1_APC_2_FBXO5_3_nTermu_ => _cell__CCNA + _cell__APC_FBXO5_FZR1_CDC20_1_Ser355p__FZR1_APC_1_FBXO5_nTermu_ + _cell__FBXO5_APC_FZR1_Ser182p_; kPhEmiA*_cell__CCNA*_cell__APC_FBXO5_1_FZR1_CDC20_2_Ser355p__FBXO5_APC_1_FZR1_3_Ser182u__FZR1_APC_2_FBXO5_3_nTermu_;
  R64: _cell__CCNB_CDK1_Thr14_Tyr15u_ + _cell__APC_FBXO5_1_FZR1_CDC20_2_Ser355u__FBXO5_APC_1_FZR1_3_Ser182u__FZR1_APC_2_FBXO5_3_nTermu_ => _cell__CCNB_CDK1_Thr14_Tyr15u_ + _cell__APC_FBXO5_FZR1_CDC20_1_Ser355u__FZR1_APC_1_FBXO5_nTermu_ + _cell__FBXO5_APC_FZR1_Ser182p_; kPhEmiB*_cell__CCNB_CDK1_Thr14_Tyr15u_*_cell__APC_FBXO5_1_FZR1_CDC20_2_Ser355u__FBXO5_APC_1_FZR1_3_Ser182u__FZR1_APC_2_FBXO5_3_nTermu_;
  R65: _cell__CCNB_CDK1_Thr14_Tyr15u_ + _cell__APC_FBXO5_1_FZR1_CDC20_2_Ser355p__FBXO5_APC_1_FZR1_3_Ser182u__FZR1_APC_2_FBXO5_3_nTermu_ => _cell__CCNB_CDK1_Thr14_Tyr15u_ + _cell__APC_FBXO5_FZR1_CDC20_1_Ser355p__FZR1_APC_1_FBXO5_nTermu_ + _cell__FBXO5_APC_FZR1_Ser182p_; kPhEmiB*_cell__CCNB_CDK1_Thr14_Tyr15u_*_cell__APC_FBXO5_1_FZR1_CDC20_2_Ser355p__FBXO5_APC_1_FZR1_3_Ser182u__FZR1_APC_2_FBXO5_3_nTermu_;
  R66: _cell__CCNA + _cell__FBXO5_APC_FZR1_Ser182u_ => _cell__CCNA + _cell__FBXO5_APC_FZR1_Ser182p_; kPhEmiA*_cell__CCNA*_cell__FBXO5_APC_FZR1_Ser182u_;
  R67: _cell__CCNB_CDK1_Thr14_Tyr15u_ + _cell__FBXO5_APC_FZR1_Ser182u_ => _cell__CCNB_CDK1_Thr14_Tyr15u_ + _cell__FBXO5_APC_FZR1_Ser182p_; kPhEmiB*_cell__CCNB_CDK1_Thr14_Tyr15u_*_cell__FBXO5_APC_FZR1_Ser182u_;
  R68: _cell__FBXO5_APC_FZR1_Ser182p_ => _cell__FBXO5_APC_FZR1_Ser182u_; kDpEmi*_cell__FBXO5_APC_FZR1_Ser182p_;
  R69: _cell__FBXO5_APC_FZR1_Ser182p_ => ; kDeEmi3*_cell__FBXO5_APC_FZR1_Ser182p_;
  R70: => _cell__FOXM1_DBD_Thr600u_; kSyFox1;
  R71: _cell__E2F_DBD_1_RB1_Ser332u__FBXO5_promoter_E2F_1_ => _cell__FBXO5_APC_FZR1_Ser182u_ + _cell__E2F_DBD_1_RB1_Ser332u__FBXO5_promoter_E2F_1_; kSyEmi2*_cell__E2F_DBD_1_RB1_Ser332u__FBXO5_promoter_E2F_1_;
  R72: _cell__CCNE + _cell__FZR1_APC_FBXO5_nTermu_ => _cell__CCNE + _cell__FZR1_APC_FBXO5_nTermp_; kPhCdhE*_cell__CCNE*_cell__FZR1_APC_FBXO5_nTermu_;
  R73: _cell__CCNA + _cell__FZR1_APC_FBXO5_nTermu_ => _cell__CCNA + _cell__FZR1_APC_FBXO5_nTermp_; kPhCdhA*_cell__CCNA*_cell__FZR1_APC_FBXO5_nTermu_;
  R74: _cell__CCNB_CDK1_Thr14_Tyr15u_ + _cell__FZR1_APC_FBXO5_nTermu_ => _cell__CCNB_CDK1_Thr14_Tyr15u_ + _cell__FZR1_APC_FBXO5_nTermp_; kPhCdhB*_cell__CCNB_CDK1_Thr14_Tyr15u_*_cell__FZR1_APC_FBXO5_nTermu_;
  R75: _cell__FZR1_APC_FBXO5_nTermp_ => _cell__FZR1_APC_FBXO5_nTermu_; kDpCdh*_cell__FZR1_APC_FBXO5_nTermp_;
  R76: => _cell__CCNA; kSyCa1;
  R77: _cell__CCNA => ; kDeCa1*_cell__CCNA;
  R78: _cell__CCNE + _cell__CCNA => _cell__CCNA; kPhCeA*_cell__CCNE*_cell__CCNA;
  R79: _cell__CCNA + _cell__APC_FBXO5_FZR1_CDC20_1_Ser355u__FZR1_APC_1_FBXO5_nTermu_ => _cell__APC_FBXO5_FZR1_CDC20_1_Ser355u__FZR1_APC_1_FBXO5_nTermu_; kDeCa2*_cell__CCNA*_cell__APC_FBXO5_FZR1_CDC20_1_Ser355u__FZR1_APC_1_FBXO5_nTermu_;
  R80: _cell__CCNA + _cell__APC_FBXO5_FZR1_CDC20_1_Ser355p__FZR1_APC_1_FBXO5_nTermu_ => _cell__APC_FBXO5_FZR1_CDC20_1_Ser355p__FZR1_APC_1_FBXO5_nTermu_; kDeCa2*_cell__CCNA*_cell__APC_FBXO5_FZR1_CDC20_1_Ser355p__FZR1_APC_1_FBXO5_nTermu_;
  R81: _cell__CCNA + _cell__APC_FBXO5_FZR1_CDC20_1_Ser355p__CDC20_APC_1_ => _cell__APC_FBXO5_FZR1_CDC20_1_Ser355p__CDC20_APC_1_; kDeCa3*_cell__CCNA*_cell__APC_FBXO5_FZR1_CDC20_1_Ser355p__CDC20_APC_1_;
  R82: _cell__E2F_DBD_1_RB1_Ser332u__FOXM1_promoter_E2F_1_ => _cell__FOXM1_DBD_Thr600u_ + _cell__E2F_DBD_1_RB1_Ser332u__FOXM1_promoter_E2F_1_; kSyFox2*_cell__E2F_DBD_1_RB1_Ser332u__FOXM1_promoter_E2F_1_;
  R83: _cell__FOXM1_DBD_Thr600u_ => ; kDeFox1*_cell__FOXM1_DBD_Thr600u_;
  R84: _cell__FOXM1_DBD_Thr600p_ => ; kDeFox1*_cell__FOXM1_DBD_Thr600p_;
  R85: _cell__APC_FBXO5_FZR1_CDC20_1_Ser355u__FZR1_APC_1_FBXO5_nTermu_ + _cell__FOXM1_DBD_Thr600u_ => _cell__APC_FBXO5_FZR1_CDC20_1_Ser355u__FZR1_APC_1_FBXO5_nTermu_; kDeFox2*_cell__APC_FBXO5_FZR1_CDC20_1_Ser355u__FZR1_APC_1_FBXO5_nTermu_*_cell__FOXM1_DBD_Thr600u_;
  R86: _cell__APC_FBXO5_FZR1_CDC20_1_Ser355p__FZR1_APC_1_FBXO5_nTermu_ + _cell__FOXM1_DBD_Thr600u_ => _cell__APC_FBXO5_FZR1_CDC20_1_Ser355p__FZR1_APC_1_FBXO5_nTermu_; kDeFox2*_cell__APC_FBXO5_FZR1_CDC20_1_Ser355p__FZR1_APC_1_FBXO5_nTermu_*_cell__FOXM1_DBD_Thr600u_;
  R87: _cell__APC_FBXO5_FZR1_CDC20_1_Ser355u__FZR1_APC_1_FBXO5_nTermu_ + _cell__FOXM1_DBD_Thr600p_ => _cell__APC_FBXO5_FZR1_CDC20_1_Ser355u__FZR1_APC_1_FBXO5_nTermu_; kDeFox2*_cell__APC_FBXO5_FZR1_CDC20_1_Ser355u__FZR1_APC_1_FBXO5_nTermu_*_cell__FOXM1_DBD_Thr600p_;
  R88: _cell__APC_FBXO5_FZR1_CDC20_1_Ser355p__FZR1_APC_1_FBXO5_nTermu_ + _cell__FOXM1_DBD_Thr600p_ => _cell__APC_FBXO5_FZR1_CDC20_1_Ser355p__FZR1_APC_1_FBXO5_nTermu_; kDeFox2*_cell__APC_FBXO5_FZR1_CDC20_1_Ser355p__FZR1_APC_1_FBXO5_nTermu_*_cell__FOXM1_DBD_Thr600p_;
  R89: _cell__CCNE + _cell__FOXM1_DBD_Thr600u_ => _cell__CCNE + _cell__FOXM1_DBD_Thr600p_; kPhFoxE*_cell__CCNE*_cell__FOXM1_DBD_Thr600u_;
  R90: _cell__CCNA + _cell__FOXM1_DBD_Thr600u_ => _cell__CCNA + _cell__FOXM1_DBD_Thr600p_; kPhFoxA*_cell__CCNA*_cell__FOXM1_DBD_Thr600u_;
  R91: _cell__CCNB_CDK1_Thr14_Tyr15u_ + _cell__FOXM1_DBD_Thr600u_ => _cell__CCNB_CDK1_Thr14_Tyr15u_ + _cell__FOXM1_DBD_Thr600p_; kPhFoxB*_cell__CCNB_CDK1_Thr14_Tyr15u_*_cell__FOXM1_DBD_Thr600u_;
  R92: _cell__FOXM1_DBD_Thr600p_ => _cell__FOXM1_DBD_Thr600u_; kDpFox*_cell__FOXM1_DBD_Thr600p_;
  R93: => _cell__CCNB_CDK1_Thr14_Tyr15u_; _rateLaw1;
  R94: _cell__CCNB_promoter_FOXM1_1__FOXM1_DBD_1_Thr600p_ => _cell__CCNB_CDK1_Thr14_Tyr15u_ + _cell__CCNB_promoter_FOXM1_1__FOXM1_DBD_1_Thr600p_; _rateLaw2*_cell__CCNB_promoter_FOXM1_1__FOXM1_DBD_1_Thr600p_;
  R95: _cell__CCNB_CDK1_Thr14_Tyr15u_ => ; kDeCb1*_cell__CCNB_CDK1_Thr14_Tyr15u_;
  R96: _cell__CCNB_CDK1_Thr14_Tyr15p_ => ; kDeCb1*_cell__CCNB_CDK1_Thr14_Tyr15p_;
  R97: _cell__CCNB_CDK1_Thr14_Tyr15u_ + _cell__APC_FBXO5_FZR1_CDC20_1_Ser355u__FZR1_APC_1_FBXO5_nTermu_ => _cell__APC_FBXO5_FZR1_CDC20_1_Ser355u__FZR1_APC_1_FBXO5_nTermu_; kDeCb2*_cell__CCNB_CDK1_Thr14_Tyr15u_*_cell__APC_FBXO5_FZR1_CDC20_1_Ser355u__FZR1_APC_1_FBXO5_nTermu_;
  R98: _cell__CCNB_CDK1_Thr14_Tyr15u_ + _cell__APC_FBXO5_FZR1_CDC20_1_Ser355p__FZR1_APC_1_FBXO5_nTermu_ => _cell__APC_FBXO5_FZR1_CDC20_1_Ser355p__FZR1_APC_1_FBXO5_nTermu_; kDeCb2*_cell__CCNB_CDK1_Thr14_Tyr15u_*_cell__APC_FBXO5_FZR1_CDC20_1_Ser355p__FZR1_APC_1_FBXO5_nTermu_;
  R99: _cell__APC_FBXO5_FZR1_CDC20_1_Ser355u__FZR1_APC_1_FBXO5_nTermu_ + _cell__CCNB_CDK1_Thr14_Tyr15p_ => _cell__APC_FBXO5_FZR1_CDC20_1_Ser355u__FZR1_APC_1_FBXO5_nTermu_; kDeCb2*_cell__APC_FBXO5_FZR1_CDC20_1_Ser355u__FZR1_APC_1_FBXO5_nTermu_*_cell__CCNB_CDK1_Thr14_Tyr15p_;
  R100: _cell__APC_FBXO5_FZR1_CDC20_1_Ser355p__FZR1_APC_1_FBXO5_nTermu_ + _cell__CCNB_CDK1_Thr14_Tyr15p_ => _cell__APC_FBXO5_FZR1_CDC20_1_Ser355p__FZR1_APC_1_FBXO5_nTermu_; kDeCb2*_cell__APC_FBXO5_FZR1_CDC20_1_Ser355p__FZR1_APC_1_FBXO5_nTermu_*_cell__CCNB_CDK1_Thr14_Tyr15p_;
  R101: _cell__CCNB_CDK1_Thr14_Tyr15u_ + _cell__APC_FBXO5_FZR1_CDC20_1_Ser355p__CDC20_APC_1_ => _cell__APC_FBXO5_FZR1_CDC20_1_Ser355p__CDC20_APC_1_; kDeCb3*_cell__CCNB_CDK1_Thr14_Tyr15u_*_cell__APC_FBXO5_FZR1_CDC20_1_Ser355p__CDC20_APC_1_;
  R102: _cell__APC_FBXO5_FZR1_CDC20_1_Ser355p__CDC20_APC_1_ + _cell__CCNB_CDK1_Thr14_Tyr15p_ => _cell__APC_FBXO5_FZR1_CDC20_1_Ser355p__CDC20_APC_1_; kDeCb3*_cell__APC_FBXO5_FZR1_CDC20_1_Ser355p__CDC20_APC_1_*_cell__CCNB_CDK1_Thr14_Tyr15p_;
  R103: _cell__CDC20_APC_ => ; kDeCdc_1*_cell__CDC20_APC_;
  R104: _cell__APC_FBXO5_FZR1_CDC20_1_Ser355p__CDC20_APC_1_ => _cell__APC_FBXO5_FZR1_CDC20_Ser355p_; kDeCdc_1*_cell__APC_FBXO5_FZR1_CDC20_1_Ser355p__CDC20_APC_1_;
  R105: _cell__CDC20_APC_ + _cell__APC_FBXO5_FZR1_CDC20_1_Ser355u__FZR1_APC_1_FBXO5_nTermu_ => _cell__APC_FBXO5_FZR1_CDC20_1_Ser355u__FZR1_APC_1_FBXO5_nTermu_; kDeCdc_2*_cell__CDC20_APC_*_cell__APC_FBXO5_FZR1_CDC20_1_Ser355u__FZR1_APC_1_FBXO5_nTermu_;
  R106: _cell__CDC20_APC_ + _cell__APC_FBXO5_FZR1_CDC20_1_Ser355p__FZR1_APC_1_FBXO5_nTermu_ => _cell__APC_FBXO5_FZR1_CDC20_1_Ser355p__FZR1_APC_1_FBXO5_nTermu_; kDeCdc_2*_cell__CDC20_APC_*_cell__APC_FBXO5_FZR1_CDC20_1_Ser355p__FZR1_APC_1_FBXO5_nTermu_;
  R107: _cell__APC_FBXO5_FZR1_CDC20_1_Ser355p__CDC20_APC_1_ + _cell__APC_FBXO5_FZR1_CDC20_1_Ser355u__FZR1_APC_1_FBXO5_nTermu_ => _cell__APC_FBXO5_FZR1_CDC20_Ser355p_ + _cell__APC_FBXO5_FZR1_CDC20_1_Ser355u__FZR1_APC_1_FBXO5_nTermu_; kDeCdc_2*_cell__APC_FBXO5_FZR1_CDC20_1_Ser355p__CDC20_APC_1_*_cell__APC_FBXO5_FZR1_CDC20_1_Ser355u__FZR1_APC_1_FBXO5_nTermu_;
  R108: _cell__APC_FBXO5_FZR1_CDC20_1_Ser355p__CDC20_APC_1_ + _cell__APC_FBXO5_FZR1_CDC20_1_Ser355p__FZR1_APC_1_FBXO5_nTermu_ => _cell__APC_FBXO5_FZR1_CDC20_Ser355p_ + _cell__APC_FBXO5_FZR1_CDC20_1_Ser355p__FZR1_APC_1_FBXO5_nTermu_; kDeCdc_2*_cell__APC_FBXO5_FZR1_CDC20_1_Ser355p__CDC20_APC_1_*_cell__APC_FBXO5_FZR1_CDC20_1_Ser355p__FZR1_APC_1_FBXO5_nTermu_;
  R109: => _cell__CDC20_APC_; kSyCdc_1;
  R110: _cell__CDC20_promoter_FOXM1_1__FOXM1_DBD_1_Thr600p_ => _cell__CDC20_APC_ + _cell__CDC20_promoter_FOXM1_1__FOXM1_DBD_1_Thr600p_; kSyCdc_2*_cell__CDC20_promoter_FOXM1_1__FOXM1_DBD_1_Thr600p_;
  R111: _cell__FOXM1_DBD_Thr600p_ + _cell__CDC20_promoter_FOXM1_ => _cell__CDC20_promoter_FOXM1_1__FOXM1_DBD_1_Thr600p_; kAsFPcdc*_cell__FOXM1_DBD_Thr600p_*_cell__CDC20_promoter_FOXM1_;
  R112: _cell__CDC20_promoter_FOXM1_1__FOXM1_DBD_1_Thr600p_ => _cell__FOXM1_DBD_Thr600p_ + _cell__CDC20_promoter_FOXM1_; kDiFPcdc*_cell__CDC20_promoter_FOXM1_1__FOXM1_DBD_1_Thr600p_;
  R113: _cell__CCNB_CDK1_Thr14_Tyr15u_ + _cell__WEE1_Ser123u_ => _cell__WEE1_Ser123u_ + _cell__CCNB_CDK1_Thr14_Tyr15p_; functionRate01*_cell__CCNB_CDK1_Thr14_Tyr15u_*_cell__WEE1_Ser123u_;
  R114: _cell__CCNB_CDK1_Thr14_Tyr15u_ + _cell__WEE1_Ser123p_ => _cell__CCNB_CDK1_Thr14_Tyr15p_ + _cell__WEE1_Ser123p_; functionRate02*_cell__CCNB_CDK1_Thr14_Tyr15u_*_cell__WEE1_Ser123p_;
  R115: _cell__CCNB_CDK1_Thr14_Tyr15p_ + _cell__CDC25_pSitesp_ => _cell__CCNB_CDK1_Thr14_Tyr15u_ + _cell__CDC25_pSitesp_; kCdc25_2*_cell__CCNB_CDK1_Thr14_Tyr15p_*_cell__CDC25_pSitesp_;
  R116: _cell__CCNB_CDK1_Thr14_Tyr15p_ + _cell__CDC25_pSitesu_ => _cell__CCNB_CDK1_Thr14_Tyr15u_ + _cell__CDC25_pSitesu_; kCdc25_1*_cell__CCNB_CDK1_Thr14_Tyr15p_*_cell__CDC25_pSitesu_;
  R117: _cell__CCNB_CDK1_Thr14_Tyr15u_ + _cell__CDC25_pSitesu_ => _cell__CCNB_CDK1_Thr14_Tyr15u_ + _cell__CDC25_pSitesp_; kPhC25B*_cell__CCNB_CDK1_Thr14_Tyr15u_*_cell__CDC25_pSitesu_;
  R118: _cell__CCNA + _cell__CDC25_pSitesu_ => _cell__CCNA + _cell__CDC25_pSitesp_; kPhC25A*_cell__CCNA*_cell__CDC25_pSitesu_;
  R119: _cell__PPP2R2B_ENSA_ARPP19_ + _cell__CDC25_pSitesp_ => _cell__PPP2R2B_ENSA_ARPP19_ + _cell__CDC25_pSitesu_; kDpCdc25*_cell__PPP2R2B_ENSA_ARPP19_*_cell__CDC25_pSitesp_;
  R120: _cell__PPP2R2B_ENSA_ARPP19_ + _cell__WEE1_Ser123p_ => _cell__PPP2R2B_ENSA_ARPP19_ + _cell__WEE1_Ser123u_; kDpWee*_cell__PPP2R2B_ENSA_ARPP19_*_cell__WEE1_Ser123p_;
  R121: _cell__CCNA + _cell__WEE1_Ser123u_ => _cell__CCNA + _cell__WEE1_Ser123p_; kPhWeeA*_cell__CCNA*_cell__WEE1_Ser123u_;
  R122: _cell__CCNB_CDK1_Thr14_Tyr15u_ + _cell__WEE1_Ser123u_ => _cell__CCNB_CDK1_Thr14_Tyr15u_ + _cell__WEE1_Ser123p_; kPhWeeB*_cell__CCNB_CDK1_Thr14_Tyr15u_*_cell__WEE1_Ser123u_;
  R123: _cell__CCNB_CDK1_Thr14_Tyr15u_ + _cell__MASTL_Thr198u_ => _cell__CCNB_CDK1_Thr14_Tyr15u_ + _cell__MASTL_Thr198p_; kPhGw*_cell__CCNB_CDK1_Thr14_Tyr15u_*_cell__MASTL_Thr198u_;
  R124: _cell__MASTL_Thr198p_ => _cell__MASTL_Thr198u_; kDpGw1*_cell__MASTL_Thr198p_;
  R125: _cell__PPP2R2B_ENSA_ARPP19_ + _cell__MASTL_Thr198p_ => _cell__PPP2R2B_ENSA_ARPP19_ + _cell__MASTL_Thr198u_; kDpGw2*_cell__PPP2R2B_ENSA_ARPP19_*_cell__MASTL_Thr198p_;
  R126: _cell__MASTL_Thr198p_ + _cell__ENSA_ARPP19_PPP2R2B_Ser62_Ser67u_ => _cell__MASTL_Thr198p_ + _cell__ENSA_ARPP19_PPP2R2B_Ser62_Ser67p_; kPhEnsa*_cell__MASTL_Thr198p_*_cell__ENSA_ARPP19_PPP2R2B_Ser62_Ser67u_;
  R127: _cell__ENSA_ARPP19_PPP2R2B_1_Ser62_Ser67p__PPP2R2B_ENSA_ARPP19_1_ => _cell__PPP2R2B_ENSA_ARPP19_ + _cell__ENSA_ARPP19_PPP2R2B_Ser62_Ser67u_; kDpEnsa*_cell__ENSA_ARPP19_PPP2R2B_1_Ser62_Ser67p__PPP2R2B_ENSA_ARPP19_1_;
  R128: => _cell__FBXO5_APC_FZR1_Ser182u_; kSyEmi1;
  R129: _cell__CCNE_promoter_E2F_1__E2F_DBD_1_RB1_Ser332u_ => _cell__CCNE + _cell__CCNE_promoter_E2F_1__E2F_DBD_1_RB1_Ser332u_; kSyCe2*_cell__CCNE_promoter_E2F_1__E2F_DBD_1_RB1_Ser332u_;
  R130: _cell__CCNB_CDK1_Thr14_Tyr15u_ + _cell__APC_FBXO5_FZR1_CDC20_1_Ser355u__FZR1_APC_1_FBXO5_nTermu_ => _cell__CCNB_CDK1_Thr14_Tyr15u_ + _cell__APC_FBXO5_FZR1_CDC20_Ser355u_ + _cell__FZR1_APC_FBXO5_nTermp_; kPhCdhB*_cell__CCNB_CDK1_Thr14_Tyr15u_*_cell__APC_FBXO5_FZR1_CDC20_1_Ser355u__FZR1_APC_1_FBXO5_nTermu_;
  R131: _cell__CCNB_CDK1_Thr14_Tyr15u_ + _cell__APC_FBXO5_FZR1_CDC20_1_Ser355p__FZR1_APC_1_FBXO5_nTermu_ => _cell__CCNB_CDK1_Thr14_Tyr15u_ + _cell__APC_FBXO5_FZR1_CDC20_Ser355p_ + _cell__FZR1_APC_FBXO5_nTermp_; kPhCdhB*_cell__CCNB_CDK1_Thr14_Tyr15u_*_cell__APC_FBXO5_FZR1_CDC20_1_Ser355p__FZR1_APC_1_FBXO5_nTermu_;
  R132: _cell__E2F_DBD_RB1_Ser332u_ + _cell__RB1_E2F_Ser807_Ser811u_ => _cell__E2F_DBD_RB1_1_Ser332u__RB1_E2F_1_Ser807_Ser811u_; kAsE2fRb*_cell__E2F_DBD_RB1_Ser332u_*_cell__RB1_E2F_Ser807_Ser811u_;
  R133: _cell__E2F_DBD_RB1_Ser332p_ + _cell__RB1_E2F_Ser807_Ser811u_ => _cell__E2F_DBD_RB1_1_Ser332p__RB1_E2F_1_Ser807_Ser811u_; kAsE2fRb*_cell__E2F_DBD_RB1_Ser332p_*_cell__RB1_E2F_Ser807_Ser811u_;
  R134: _cell__E2F_DBD_RB1_1_Ser332u__RB1_E2F_1_Ser807_Ser811u_ => _cell__E2F_DBD_RB1_Ser332u_ + _cell__RB1_E2F_Ser807_Ser811u_; kDiE2fRb*_cell__E2F_DBD_RB1_1_Ser332u__RB1_E2F_1_Ser807_Ser811u_;
  R135: _cell__E2F_DBD_RB1_1_Ser332p__RB1_E2F_1_Ser807_Ser811u_ => _cell__E2F_DBD_RB1_Ser332p_ + _cell__RB1_E2F_Ser807_Ser811u_; kDiE2fRb*_cell__E2F_DBD_RB1_1_Ser332p__RB1_E2F_1_Ser807_Ser811u_;
  R136: _cell__APC_FBXO5_FZR1_CDC20_Ser355u_ + _cell__FZR1_APC_FBXO5_nTermu_ => _cell__APC_FBXO5_FZR1_CDC20_1_Ser355u__FZR1_APC_1_FBXO5_nTermu_; kAsACdh*_cell__APC_FBXO5_FZR1_CDC20_Ser355u_*_cell__FZR1_APC_FBXO5_nTermu_;
  R137: _cell__APC_FBXO5_FZR1_CDC20_Ser355p_ + _cell__FZR1_APC_FBXO5_nTermu_ => _cell__APC_FBXO5_FZR1_CDC20_1_Ser355p__FZR1_APC_1_FBXO5_nTermu_; kAsACdh*_cell__APC_FBXO5_FZR1_CDC20_Ser355p_*_cell__FZR1_APC_FBXO5_nTermu_;
  R138: _cell__APC_FBXO5_FZR1_CDC20_1_Ser355u__FZR1_APC_1_FBXO5_nTermu_ => _cell__APC_FBXO5_FZR1_CDC20_Ser355u_ + _cell__FZR1_APC_FBXO5_nTermu_; kDiACdh*_cell__APC_FBXO5_FZR1_CDC20_1_Ser355u__FZR1_APC_1_FBXO5_nTermu_;
  R139: _cell__APC_FBXO5_FZR1_CDC20_1_Ser355p__FZR1_APC_1_FBXO5_nTermu_ => _cell__APC_FBXO5_FZR1_CDC20_Ser355p_ + _cell__FZR1_APC_FBXO5_nTermu_; kDiACdh*_cell__APC_FBXO5_FZR1_CDC20_1_Ser355p__FZR1_APC_1_FBXO5_nTermu_;
  R140: _cell__APC_FBXO5_FZR1_CDC20_1_Ser355u__FZR1_APC_1_FBXO5_nTermu_ + _cell__FBXO5_APC_FZR1_Ser182u_ => _cell__APC_FBXO5_1_FZR1_CDC20_2_Ser355u__FBXO5_APC_1_FZR1_3_Ser182u__FZR1_APC_2_FBXO5_3_nTermu_; kAsACE*_cell__APC_FBXO5_FZR1_CDC20_1_Ser355u__FZR1_APC_1_FBXO5_nTermu_*_cell__FBXO5_APC_FZR1_Ser182u_;
  R141: _cell__FBXO5_APC_FZR1_Ser182u_ + _cell__APC_FBXO5_FZR1_CDC20_1_Ser355p__FZR1_APC_1_FBXO5_nTermu_ => _cell__APC_FBXO5_1_FZR1_CDC20_2_Ser355p__FBXO5_APC_1_FZR1_3_Ser182u__FZR1_APC_2_FBXO5_3_nTermu_; kAsACE*_cell__FBXO5_APC_FZR1_Ser182u_*_cell__APC_FBXO5_FZR1_CDC20_1_Ser355p__FZR1_APC_1_FBXO5_nTermu_;
  R142: _cell__APC_FBXO5_1_FZR1_CDC20_2_Ser355u__FBXO5_APC_1_FZR1_3_Ser182u__FZR1_APC_2_FBXO5_3_nTermu_ => _cell__APC_FBXO5_FZR1_CDC20_1_Ser355u__FZR1_APC_1_FBXO5_nTermu_ + _cell__FBXO5_APC_FZR1_Ser182u_; kDiACE*_cell__APC_FBXO5_1_FZR1_CDC20_2_Ser355u__FBXO5_APC_1_FZR1_3_Ser182u__FZR1_APC_2_FBXO5_3_nTermu_;
  R143: _cell__APC_FBXO5_1_FZR1_CDC20_2_Ser355p__FBXO5_APC_1_FZR1_3_Ser182u__FZR1_APC_2_FBXO5_3_nTermu_ => _cell__FBXO5_APC_FZR1_Ser182u_ + _cell__APC_FBXO5_FZR1_CDC20_1_Ser355p__FZR1_APC_1_FBXO5_nTermu_; kDiACE*_cell__APC_FBXO5_1_FZR1_CDC20_2_Ser355p__FBXO5_APC_1_FZR1_3_Ser182u__FZR1_APC_2_FBXO5_3_nTermu_;
  R144: _cell__CDC20_APC_ + _cell__APC_FBXO5_FZR1_CDC20_Ser355p_ => _cell__APC_FBXO5_FZR1_CDC20_1_Ser355p__CDC20_APC_1_; kAspACdc*_cell__CDC20_APC_*_cell__APC_FBXO5_FZR1_CDC20_Ser355p_;
  R145: _cell__APC_FBXO5_FZR1_CDC20_1_Ser355p__CDC20_APC_1_ => _cell__CDC20_APC_ + _cell__APC_FBXO5_FZR1_CDC20_Ser355p_; kDipACdc*_cell__APC_FBXO5_FZR1_CDC20_1_Ser355p__CDC20_APC_1_;
  R146: _cell__PPP2R2B_ENSA_ARPP19_ + _cell__ENSA_ARPP19_PPP2R2B_Ser62_Ser67p_ => _cell__ENSA_ARPP19_PPP2R2B_1_Ser62_Ser67p__PPP2R2B_ENSA_ARPP19_1_; kAspEB55*_cell__PPP2R2B_ENSA_ARPP19_*_cell__ENSA_ARPP19_PPP2R2B_Ser62_Ser67p_;
  R147: _cell__ENSA_ARPP19_PPP2R2B_1_Ser62_Ser67p__PPP2R2B_ENSA_ARPP19_1_ => _cell__PPP2R2B_ENSA_ARPP19_ + _cell__ENSA_ARPP19_PPP2R2B_Ser62_Ser67p_; kDipEB55*_cell__ENSA_ARPP19_PPP2R2B_1_Ser62_Ser67p__PPP2R2B_ENSA_ARPP19_1_;
  R148: _cell__E2F_DBD_RB1_Ser332u_ + _cell__CCNE_promoter_E2F_ => _cell__CCNE_promoter_E2F_1__E2F_DBD_1_RB1_Ser332u_; kAsEPx*_cell__E2F_DBD_RB1_Ser332u_*_cell__CCNE_promoter_E2F_;
  R149: _cell__CCNE_promoter_E2F_1__E2F_DBD_1_RB1_Ser332u_ => _cell__E2F_DBD_RB1_Ser332u_ + _cell__CCNE_promoter_E2F_; kDiEPx*_cell__CCNE_promoter_E2F_1__E2F_DBD_1_RB1_Ser332u_;
  R150: _cell__E2F_DBD_RB1_Ser332u_ + _cell__CCNA_promoter_E2F_ => _cell__CCNA_promoter_E2F_1__E2F_DBD_1_RB1_Ser332u_; kAsEPx*_cell__E2F_DBD_RB1_Ser332u_*_cell__CCNA_promoter_E2F_;
  R151: _cell__CCNA_promoter_E2F_1__E2F_DBD_1_RB1_Ser332u_ => _cell__E2F_DBD_RB1_Ser332u_ + _cell__CCNA_promoter_E2F_; kDiEPx*_cell__CCNA_promoter_E2F_1__E2F_DBD_1_RB1_Ser332u_;
  R152: _cell__E2F_DBD_RB1_Ser332u_ + _cell__E2F_promoter_E2F_ => _cell__E2F_DBD_1_RB1_Ser332u__E2F_promoter_E2F_1_; kAsEPx*_cell__E2F_DBD_RB1_Ser332u_*_cell__E2F_promoter_E2F_;
  R153: _cell__E2F_DBD_1_RB1_Ser332u__E2F_promoter_E2F_1_ => _cell__E2F_DBD_RB1_Ser332u_ + _cell__E2F_promoter_E2F_; kDiEPx*_cell__E2F_DBD_1_RB1_Ser332u__E2F_promoter_E2F_1_;
  R154: _cell__E2F_DBD_RB1_Ser332u_ + _cell__FBXO5_promoter_E2F_ => _cell__E2F_DBD_1_RB1_Ser332u__FBXO5_promoter_E2F_1_; kAsEPx*_cell__E2F_DBD_RB1_Ser332u_*_cell__FBXO5_promoter_E2F_;
  R155: _cell__E2F_DBD_1_RB1_Ser332u__FBXO5_promoter_E2F_1_ => _cell__E2F_DBD_RB1_Ser332u_ + _cell__FBXO5_promoter_E2F_; kDiEPx*_cell__E2F_DBD_1_RB1_Ser332u__FBXO5_promoter_E2F_1_;
  R156: _cell__E2F_DBD_RB1_Ser332u_ + _cell__FOXM1_promoter_E2F_ => _cell__E2F_DBD_1_RB1_Ser332u__FOXM1_promoter_E2F_1_; kAsEPx*_cell__E2F_DBD_RB1_Ser332u_*_cell__FOXM1_promoter_E2F_;
  R157: _cell__E2F_DBD_1_RB1_Ser332u__FOXM1_promoter_E2F_1_ => _cell__E2F_DBD_RB1_Ser332u_ + _cell__FOXM1_promoter_E2F_; kDiEPx*_cell__E2F_DBD_1_RB1_Ser332u__FOXM1_promoter_E2F_1_;
end
