// SBML level 2 version 3

model cell_cycle_v3.0.0()

  // Compartments:
  compartment compartment = 1e-13;

  // Species:
  species compartment_CCND in compartment = 6.022e10; compartment_CCND is "@compartment::CCND()";
  species compartment_CCNE in compartment = 1.3986043e10; compartment_CCNE is "@compartment::CCNE()";
  species compartment_E2F_DBD_RB1_Ser332_u in compartment = 1.1128068e9; compartment_E2F_DBD_RB1_Ser332_u is "@compartment::E2F(DBD,RB1,Ser332~u)";
  species compartment_E2F_DBD_RB1_Ser332_p in compartment = 2293289.4; compartment_E2F_DBD_RB1_Ser332_p is "@compartment::E2F(DBD,RB1,Ser332~p)";
  species compartment_CCNA in compartment = 4.2325597e8; compartment_CCNA is "@compartment::CCNA()";
  species S6 in compartment = 1.133559e8; S6 is "@compartment::CCNB(CDK1_Thr14_Tyr15~u)";
  species S7 in compartment = 4.3034014e9; S7 is "@compartment::E2F(DBD,RB1!1,Ser332~u).RB1(E2F!1,Ser807_Ser811~u)";
  species S8 in compartment = 9065434; S8 is "@compartment::E2F(DBD,RB1!1,Ser332~p).RB1(E2F!1,Ser807_Ser811~u)";
  species S9 in compartment = 5.2778426e9; S9 is "@compartment::RB1(E2F,Ser807_Ser811~u)";
  species S10 in compartment = 5.0629691e10; S10 is "@compartment::RB1(E2F,Ser807_Ser811~p)";
  species compartment_PPP2R2B_ENSA_ARPP19 in compartment = 4.6484797e9; compartment_PPP2R2B_ENSA_ARPP19 is "@compartment::PPP2R2B(ENSA_ARPP19)";
  species S12 in compartment = 2.4260911e11; S12 is "@compartment::APC(FBXO5,FZR1_CDC20,Ser355~u)";
  species compartment_CDC20_APC in compartment = 1.3847757e10; compartment_CDC20_APC is "@compartment::CDC20(APC)";
  species S14 in compartment = 4.2087805e9; S14 is "@compartment::APC(FBXO5,FZR1_CDC20!1,Ser355~p).CDC20(APC!1)";
  species S15 in compartment = 3.7993439e9; S15 is "@compartment::APC(FBXO5,FZR1_CDC20,Ser355~p)";
  species S16 in compartment = 4.2969631e10; S16 is "@compartment::APC(FBXO5,FZR1_CDC20!1,Ser355~u).FZR1(APC!1,FBXO5,nTerm~u)";
  species S17 in compartment = 34406152; S17 is "@compartment::FZR1(APC,FBXO5,nTerm~u)";
  species S18 in compartment = 9.7028319e9; S18 is "@compartment::FZR1(APC,FBXO5,nTerm~p)";
  species S19 in compartment = 6.5604459e9; S19 is "@compartment::APC(FBXO5!1,FZR1_CDC20!2,Ser355~u).FBXO5(APC!1,FZR1!3,Ser182~u).FZR1(APC!2,FBXO5!3,nTerm~u)";
  species S20 in compartment = 43226888; S20 is "@compartment::FBXO5(APC,FZR1,Ser182~u)";
  species S21 in compartment = 1.3323959e8; S21 is "@compartment::APC(FBXO5!1,FZR1_CDC20!2,Ser355~p).FBXO5(APC!1,FZR1!3,Ser182~u).FZR1(APC!2,FBXO5!3,nTerm~u)";
  species S22 in compartment = 8.1944566e8; S22 is "@compartment::APC(FBXO5,FZR1_CDC20!1,Ser355~p).FZR1(APC!1,FBXO5,nTerm~u)";
  species S23 in compartment = 1132433.3; S23 is "@compartment::FBXO5(APC,FZR1,Ser182~p)";
  species compartment_FOXM1_DBD_Thr600_u in compartment = 3.3510826e8; compartment_FOXM1_DBD_Thr600_u is "@compartment::FOXM1(DBD,Thr600~u)";
  species compartment_FOXM1_DBD_Thr600_p in compartment = 22950816; compartment_FOXM1_DBD_Thr600_p is "@compartment::FOXM1(DBD,Thr600~p)";
  species S26 in compartment = 11461.427; S26 is "@compartment::CCNB_promoter(FOXM1!1).FOXM1(DBD!1,Thr600~p)";
  species compartment_CCNB_promoter_FOXM1 in compartment = 6010538.6; compartment_CCNB_promoter_FOXM1 is "@compartment::CCNB_promoter(FOXM1)";
  species compartment_CDC20_promoter_FOXM1 in compartment = 6017412.1; compartment_CDC20_promoter_FOXM1 is "@compartment::CDC20_promoter(FOXM1)";
  species S29 in compartment = 4587.8816; S29 is "@compartment::CDC20_promoter(FOXM1!1).FOXM1(DBD!1,Thr600~p)";
  species compartment_WEE1_Ser123_u in compartment = 5.9042195e10; compartment_WEE1_Ser123_u is "@compartment::WEE1(Ser123~u)";
  species S31 in compartment = 4.5242773e8; S31 is "@compartment::CCNB(CDK1_Thr14_Tyr15~p)";
  species compartment_WEE1_Ser123_p in compartment = 1.1778049e9; compartment_WEE1_Ser123_p is "@compartment::WEE1(Ser123~p)";
  species compartment_CDC25_pSites_p in compartment = 1.1103404e9; compartment_CDC25_pSites_p is "@compartment::CDC25(pSites~p)";
  species compartment_CDC25_pSites_u in compartment = 5.910966e10; compartment_CDC25_pSites_u is "@compartment::CDC25(pSites~u)";
  species compartment_MASTL_Thr198_u in compartment = 6.0070998e10; compartment_MASTL_Thr198_u is "@compartment::MASTL(Thr198~u)";
  species compartment_MASTL_Thr198_p in compartment = 1.4900204e8; compartment_MASTL_Thr198_p is "@compartment::MASTL(Thr198~p)";
  species S37 in compartment = 4.9793694e10; S37 is "@compartment::ENSA_ARPP19(PPP2R2B,Ser62_Ser67~u)";
  species S38 in compartment = 19785953; S38 is "@compartment::ENSA_ARPP19(PPP2R2B,Ser62_Ser67~p)";
  species S39 in compartment = 1.040652e10; S39 is "@compartment::ENSA_ARPP19(PPP2R2B!1,Ser62_Ser67~p).PPP2R2B(ENSA_ARPP19!1)";
  species compartment_CCNE_promoter_E2F in compartment = 5087326.8; compartment_CCNE_promoter_E2F is "@compartment::CCNE_promoter(E2F)";
  species compartment_CCNA_promoter_E2F in compartment = 5087326.8; compartment_CCNA_promoter_E2F is "@compartment::CCNA_promoter(E2F)";
  species compartment_E2F_promoter_E2F in compartment = 5087326.8; compartment_E2F_promoter_E2F is "@compartment::E2F_promoter(E2F)";
  species compartment_FBXO5_promoter_E2F in compartment = 5087326.8; compartment_FBXO5_promoter_E2F is "@compartment::FBXO5_promoter(E2F)";
  species compartment_FOXM1_promoter_E2F in compartment = 5087326.8; compartment_FOXM1_promoter_E2F is "@compartment::FOXM1_promoter(E2F)";
  species S45 in compartment = 934673.17; S45 is "@compartment::CCNE_promoter(E2F!1).E2F(DBD!1,RB1,Ser332~u)";
  species S46 in compartment = 934673.17; S46 is "@compartment::CCNA_promoter(E2F!1).E2F(DBD!1,RB1,Ser332~u)";
  species S47 in compartment = 934673.17; S47 is "@compartment::E2F(DBD!1,RB1,Ser332~u).E2F_promoter(E2F!1)";
  species S48 in compartment = 934673.17; S48 is "@compartment::E2F(DBD!1,RB1,Ser332~u).FBXO5_promoter(E2F!1)";
  species S49 in compartment = 934673.17; S49 is "@compartment::E2F(DBD!1,RB1,Ser332~u).FOXM1_promoter(E2F!1)";
  species compartment_iWEE in compartment = 0; compartment_iWEE is "@compartment::iWEE()";

  // Parameters:
  kPhRbD = 0.0055440055;
  kPhRbE = 0.0069300069;
  kDpRb = 0.0013860014;
  kPhRb = 0.020790021;
  kSyCe1 = 1.3860014e-5;
  kSyCe2 = 4.1580042;
  kDeCe = 0.00013860014;
  kDiE2fRb = 0.00034650035;
  kAsE2fRb = 0.34650035;
  kSyE2f1 = 6.9300069e-6;
  kSyE2f2 = 0.69300069;
  kDeE2f1 = 6.9300069e-5;
  kDeE2f2 = 0.0013860014;
  kPhE2f = 0.0013860014;
  kDpE2f2 = 0.069300069;
  kSyEmi1 = 3.4650035e-5;
  kSyEmi2 = 3.4650035;
  kDeEmi1 = 0.00034650035;
  kDeEmi2 = 0.00034650035;
  kDeEmi3 = 0.0034650035;
  kPhEmiA = 3.4650035e-5;
  kPhEmiB = 0.00017325017;
  kDpEmi = 3.4650035e-6;
  kSyCa1 = 6.9300069e-6;
  kSyCa2 = 0.51975052;
  kDeCa1 = 6.9300069e-6;
  kDeCa2 = 0.0027720028;
  kDeCa3 = 0.00069300069;
  kDpCdh = 0.0034650035;
  kPhCdhA = 0.017325017;
  kPhCdhE = 0.00069300069;
  kPhCdhB = 0.17325017;
  kDiACE = 0.00034650035;
  kAsACE = 0.34650035;
  kDiACdh = 0.00034650035;
  kAsACdh = 0.34650035;
  kPhCeA = 0.0069300069;
  kPhCeE = 6.9300069e-5;
  kPhFoxE = 0.00069300069;
  kPhFoxA = 0.00069300069;
  kPhFoxB = 0.0034650035;
  kDpFox = 3.4650035e-5;
  kSyCb1 = 6.9300069e-6;
  kSyCb2 = 0.51975052;
  kDeCb1 = 6.9300069e-6;
  kDeCb2 = 0.00086625087;
  kDeCb3 = 0.00086625087;
  kPhEnsa = 0.00069300069;
  kDpEnsa = 0.00034650035;
  kPhGw = 0.0069300069;
  kDpGw1 = 0.0017325017;
  kDpGw2 = 0.069300069;
  kWee1 = 6.9300069e-5;
  kWee2 = 0.0069300069;
  kPhWeeA = 0.00069300069;
  kPhWeeB = 0.0069300069;
  kDpWee = 0.069300069;
  kCdc25_1 = 0.00069300069;
  kCdc25_2 = 0.0069300069;
  kDpCdc25 = 0.069300069;
  kDipEB55 = 4.7124047e-5;
  kAspEB55 = 0.3950104;
  kSyCdc_1 = 6.9300069e-6;
  kSyCdc_2 = 0.69300069;
  kDeCdc_1 = 2.7720028e-5;
  kDeCdc_2 = 0.00027720028;
  kDipACdc = 0.00086625087;
  kAspACdc = 0.0069300069;
  kPhApcA = 6.9300069e-5;
  kPhApcB = 6.9300069e-5;
  kDpApc = 0.034650035;
  kSyFox1 = 6.9300069e-6;
  kSyFox2 = 0.51975052;
  kDeFox1 = 6.9300069e-6;
  kDeFox2 = 0.0034650035;
  kAsEPx = 0.34650035;
  kDiEPx = 0.034650035;
  kAsFPcb = 0.34650035;
  kDiFPcb = 0.069300069;
  kAsFPcdc = 0.34650035;
  kDiFPcdc = 0.17325017;
  kPhC25B = 0.0069300069;
  kPhCdhEf4 = 0.00055440055;
  kPhCdhAf4 = 0.013860014;
  kPhCdhBf4 = 0.13860014;
  ikSyCb = 1;
  jiWee = 6.022e22;
  ModelValue_128 = 2;
  ModelValue_132 = 6;
  ModelValue_130 = 4;
  ModelValue_129 = 3;
  ModelValue_131 = 5;
  kDpE2f1 = 0;
  kPhC25A = 0;
  iWee_0 = 0;
  _InitialConc1 = 6.022e10;
  _InitialConc2 = 1.3986043e10;
  _InitialConc3 = 1.1128068e9;
  _InitialConc4 = 2293289.4;
  _InitialConc5 = 4.2325597e8;
  _InitialConc6 = 1.133559e8;
  _InitialConc7 = 4.3034014e9;
  _InitialConc8 = 9065434;
  _InitialConc9 = 5.2778426e9;
  _InitialConc10 = 5.0629691e10;
  _InitialConc11 = 4.6484797e9;
  _InitialConc12 = 2.4260911e11;
  _InitialConc13 = 1.3847757e10;
  _InitialConc14 = 4.2087805e9;
  _InitialConc15 = 3.7993439e9;
  _InitialConc16 = 4.2969631e10;
  _InitialConc17 = 34406152;
  _InitialConc18 = 9.7028319e9;
  _InitialConc19 = 6.5604459e9;
  _InitialConc20 = 43226888;
  _InitialConc21 = 1.3323959e8;
  _InitialConc22 = 8.1944566e8;
  _InitialConc23 = 1132433.3;
  _InitialConc24 = 3.3510826e8;
  _InitialConc25 = 22950816;
  _InitialConc26 = 11461.427;
  _InitialConc27 = 6010538.6;
  _InitialConc28 = 6017412.1;
  _InitialConc29 = 4587.8816;
  _InitialConc30 = 5.9042195e10;
  _InitialConc31 = 4.5242773e8;
  _InitialConc32 = 1.1778049e9;
  _InitialConc33 = 1.1103404e9;
  _InitialConc34 = 5.910966e10;
  _InitialConc35 = 6.0070998e10;
  _InitialConc36 = 1.4900204e8;
  _InitialConc37 = 4.9793694e10;
  _InitialConc38 = 19785953;
  _InitialConc39 = 1.040652e10;
  _InitialConc40 = 5087326.8;
  _InitialConc41 = 5087326.8;
  _InitialConc42 = 5087326.8;
  _InitialConc43 = 5087326.8;
  _InitialConc44 = 5087326.8;
  _InitialConc45 = 934673.17;
  _InitialConc46 = 934673.17;
  _InitialConc47 = 934673.17;
  _InitialConc48 = 934673.17;
  _InitialConc49 = 934673.17;
  _InitialConc50 = 0;
  _rateLaw1 = kSyE2f1*6.022e23;
  _rateLaw2 = kAsFPcb/6.022e23;
  _rateLaw3 = kPhRbD/6.022e23;
  _rateLaw4 = kPhRbE/6.022e23;
  _rateLaw5 = kPhRb/6.022e23;
  _rateLaw6 = kPhRb/6.022e23;
  _rateLaw7 = kPhE2f/6.022e23;
  _rateLaw8 = kPhE2f/6.022e23;
  _rateLaw9 = kDpE2f2/6.022e23;
  _rateLaw10 = kPhRbD/6.022e23;
  _rateLaw11 = kPhRbE/6.022e23;
  _rateLaw12 = kPhRb/6.022e23;
  _rateLaw13 = kPhRb/6.022e23;
  _rateLaw14 = kSyCe1*6.022e23;
  _rateLaw15 = kPhCeE/6.022e23;
  _rateLaw16 = kDpApc/6.022e23;
  _rateLaw17 = kPhApcA/6.022e23;
  _rateLaw18 = kPhApcA/6.022e23;
  _rateLaw19 = kDpApc/6.022e23;
  _rateLaw20 = kPhCdhA/6.022e23;
  _rateLaw21 = kPhCdhEf4/6.022e23;
  _rateLaw22 = kPhCdhAf4/6.022e23;
  _rateLaw23 = kPhCdhBf4/6.022e23;
  _rateLaw24 = kPhCdhE/6.022e23;
  _rateLaw25 = kPhEmiA/6.022e23;
  _rateLaw26 = kPhEmiB/6.022e23;
  _rateLaw27 = kPhEmiA/6.022e23;
  _rateLaw28 = kPhEmiB/6.022e23;
  _rateLaw29 = kSyFox1*6.022e23;
  _rateLaw30 = kPhCdhE/6.022e23;
  _rateLaw31 = kPhCdhA/6.022e23;
  _rateLaw32 = kPhCdhB/6.022e23;
  _rateLaw33 = kSyCa1*6.022e23;
  _rateLaw34 = kPhCeA/6.022e23;
  _rateLaw35 = kDeCa2/6.022e23;
  _rateLaw36 = kDeCa3/6.022e23;
  _rateLaw37 = kDeFox2/6.022e23;
  _rateLaw38 = kPhFoxE/6.022e23;
  _rateLaw39 = kPhFoxA/6.022e23;
  _rateLaw40 = kPhFoxB/6.022e23;
  _rateLaw41 = kSyCb1*ikSyCb*6.022e23;
  _rateLaw42 = kSyCb2*ikSyCb;
  _rateLaw43 = kDeCb2/6.022e23;
  _rateLaw44 = kDeCb3/6.022e23;
  _rateLaw45 = kDeCdc_2/6.022e23;
  _rateLaw46 = kSyCdc_1*6.022e23;
  _rateLaw47 = kAsFPcdc/6.022e23;
  _rateLaw48 = kCdc25_2/6.022e23;
  _rateLaw49 = kCdc25_1/6.022e23;
  _rateLaw50 = kPhC25B/6.022e23;
  _rateLaw51 = kPhC25A/6.022e23;
  _rateLaw52 = kDpCdc25/6.022e23;
  _rateLaw53 = kDpWee/6.022e23;
  _rateLaw54 = kPhWeeA/6.022e23;
  _rateLaw55 = kPhWeeB/6.022e23;
  _rateLaw56 = kPhGw/6.022e23;
  _rateLaw57 = kDpGw2/6.022e23;
  _rateLaw58 = kPhEnsa/6.022e23;
  _rateLaw59 = kSyEmi1*6.022e23;
  _rateLaw60 = kPhCdhB/6.022e23;
  _rateLaw61 = kAsE2fRb/6.022e23;
  _rateLaw62 = kAsACdh/6.022e23;
  _rateLaw63 = kAsACE/6.022e23;
  _rateLaw64 = kAspACdc/6.022e23;
  _rateLaw65 = kAspEB55/6.022e23;
  _rateLaw66 = kAsEPx/6.022e23;
  _rateLaw67 = kAsEPx/6.022e23;
  _rateLaw68 = kAsEPx/6.022e23;
  _rateLaw69 = kAsEPx/6.022e23;
  _rateLaw70 = kAsEPx/6.022e23;

  // Assignment rules:
  Ce_compartment := 0 + compartment_CCNE;
  Wee_compartment := 0 + compartment_WEE1_Ser123_u;
  pWee_compartment := 0 + compartment_WEE1_Ser123_p;
  iWee_compartment := 0 + compartment_iWEE;
  functionRate01 := piecewise(kWee2*0.5*(Wee_compartment - iWee_compartment - jiWee + ((-Wee_compartment + iWee_compartment + jiWee)^2 + 4*jiWee*Wee_compartment)^(1/2))/Wee_compartment, Wee_compartment > 0, 0)/6.022e23;
  functionRate02 := piecewise(kWee1*0.5*(pWee_compartment - iWee_compartment - jiWee + ((-pWee_compartment + iWee_compartment + jiWee)^2 + 4*jiWee*pWee_compartment)^(1/2))/pWee_compartment, pWee_compartment > 0, 0)/6.022e23;

  // Reactions:
  R1: => compartment_E2F_DBD_RB1_Ser332_u; _rateLaw1;
  R2: compartment_FOXM1_DBD_Thr600_p + compartment_CCNB_promoter_FOXM1 => S26; _rateLaw2*compartment_FOXM1_DBD_Thr600_p*compartment_CCNB_promoter_FOXM1;
  R3: S26 => compartment_FOXM1_DBD_Thr600_p + compartment_CCNB_promoter_FOXM1; kDiFPcb*S26;
  R4: S47 => compartment_E2F_DBD_RB1_Ser332_u + S47; kSyE2f2*S47;
  R5: compartment_E2F_DBD_RB1_Ser332_u => ; kDeE2f1*compartment_E2F_DBD_RB1_Ser332_u;
  R6: compartment_E2F_DBD_RB1_Ser332_p => ; kDeE2f1*compartment_E2F_DBD_RB1_Ser332_p;
  R7: S7 => S9; kDeE2f1*S7;
  R8: S8 => S9; kDeE2f1*S8;
  R9: compartment_CCND + S7 => compartment_CCND + compartment_E2F_DBD_RB1_Ser332_u + S10; _rateLaw3*compartment_CCND*S7;
  R10: compartment_CCND + S8 => compartment_CCND + compartment_E2F_DBD_RB1_Ser332_p + S10; _rateLaw3*compartment_CCND*S8;
  R11: compartment_CCNE + S7 => compartment_CCNE + compartment_E2F_DBD_RB1_Ser332_u + S10; _rateLaw4*compartment_CCNE*S7;
  R12: compartment_CCNE + S8 => compartment_CCNE + compartment_E2F_DBD_RB1_Ser332_p + S10; _rateLaw4*compartment_CCNE*S8;
  R13: compartment_CCNA + S7 => compartment_E2F_DBD_RB1_Ser332_u + compartment_CCNA + S10; _rateLaw5*compartment_CCNA*S7;
  R14: compartment_CCNA + S8 => compartment_E2F_DBD_RB1_Ser332_p + compartment_CCNA + S10; _rateLaw5*compartment_CCNA*S8;
  R15: S6 + S7 => compartment_E2F_DBD_RB1_Ser332_u + S6 + S10; _rateLaw6*S6*S7;
  R16: S6 + S8 => compartment_E2F_DBD_RB1_Ser332_p + S6 + S10; _rateLaw6*S6*S8;
  R17: compartment_E2F_DBD_RB1_Ser332_u + compartment_CCNA => compartment_E2F_DBD_RB1_Ser332_p + compartment_CCNA; _rateLaw7*compartment_E2F_DBD_RB1_Ser332_u*compartment_CCNA;
  R18: compartment_CCNA + S7 => compartment_CCNA + S8; _rateLaw7*compartment_CCNA*S7;
  R19: compartment_E2F_DBD_RB1_Ser332_u + S6 => compartment_E2F_DBD_RB1_Ser332_p + S6; _rateLaw8*compartment_E2F_DBD_RB1_Ser332_u*S6;
  R20: S6 + S7 => S6 + S8; _rateLaw8*S6*S7;
  R21: compartment_E2F_DBD_RB1_Ser332_p => compartment_E2F_DBD_RB1_Ser332_u; kDpE2f1*compartment_E2F_DBD_RB1_Ser332_p;
  R22: S8 => S7; kDpE2f1*S8;
  R23: compartment_E2F_DBD_RB1_Ser332_p + compartment_PPP2R2B_ENSA_ARPP19 => compartment_E2F_DBD_RB1_Ser332_u + compartment_PPP2R2B_ENSA_ARPP19; _rateLaw9*compartment_E2F_DBD_RB1_Ser332_p*compartment_PPP2R2B_ENSA_ARPP19;
  R24: S8 + compartment_PPP2R2B_ENSA_ARPP19 => S7 + compartment_PPP2R2B_ENSA_ARPP19; _rateLaw9*S8*compartment_PPP2R2B_ENSA_ARPP19;
  R25: compartment_E2F_DBD_RB1_Ser332_p => ; kDeE2f2*compartment_E2F_DBD_RB1_Ser332_p;
  R26: S8 => S9; kDeE2f2*S8;
  R27: compartment_CCND + S9 => compartment_CCND + S10; _rateLaw10*compartment_CCND*S9;
  R28: compartment_CCNE + S9 => compartment_CCNE + S10; _rateLaw11*compartment_CCNE*S9;
  R29: compartment_CCNA + S9 => compartment_CCNA + S10; _rateLaw12*compartment_CCNA*S9;
  R30: S6 + S9 => S6 + S10; _rateLaw13*S6*S9;
  R31: => compartment_CCNE; _rateLaw14;
  R32: S46 => compartment_CCNA + S46; kSyCa2*S46;
  R33: compartment_CCNE => ; kDeCe*compartment_CCNE;
  R34: compartment_CCNE + compartment_CCNE => compartment_CCNE; _rateLaw15*compartment_CCNE*compartment_CCNE;
  R35: S10 => S9; kDpRb*S10;
  R36: compartment_PPP2R2B_ENSA_ARPP19 + S14 => compartment_PPP2R2B_ENSA_ARPP19 + S12 + compartment_CDC20_APC; _rateLaw16*compartment_PPP2R2B_ENSA_ARPP19*S14;
  R37: compartment_CCNA + S12 => compartment_CCNA + S15; _rateLaw17*compartment_CCNA*S12;
  R38: compartment_CCNA + S16 => compartment_CCNA + S22; _rateLaw17*compartment_CCNA*S16;
  R39: compartment_CCNA + S19 => compartment_CCNA + S21; _rateLaw17*compartment_CCNA*S19;
  R40: S6 + S12 => S6 + S15; _rateLaw18*S6*S12;
  R41: S6 + S16 => S6 + S22; _rateLaw18*S6*S16;
  R42: S6 + S19 => S6 + S21; _rateLaw18*S6*S19;
  R43: compartment_PPP2R2B_ENSA_ARPP19 + S15 => compartment_PPP2R2B_ENSA_ARPP19 + S12; _rateLaw19*compartment_PPP2R2B_ENSA_ARPP19*S15;
  R44: compartment_PPP2R2B_ENSA_ARPP19 + S21 => compartment_PPP2R2B_ENSA_ARPP19 + S19; _rateLaw19*compartment_PPP2R2B_ENSA_ARPP19*S21;
  R45: compartment_PPP2R2B_ENSA_ARPP19 + S22 => compartment_PPP2R2B_ENSA_ARPP19 + S16; _rateLaw19*compartment_PPP2R2B_ENSA_ARPP19*S22;
  R46: compartment_CCNA + S16 => compartment_CCNA + S12 + S18; _rateLaw20*compartment_CCNA*S16;
  R47: compartment_CCNA + S22 => compartment_CCNA + S15 + S18; _rateLaw20*compartment_CCNA*S22;
  R48: compartment_CCNE + S19 => compartment_CCNE + S12 + S18 + S20; _rateLaw21*compartment_CCNE*S19;
  R49: compartment_CCNE + S21 => compartment_CCNE + S15 + S18 + S20; _rateLaw21*compartment_CCNE*S21;
  R50: compartment_CCNA + S19 => compartment_CCNA + S12 + S18 + S20; _rateLaw22*compartment_CCNA*S19;
  R51: compartment_CCNA + S21 => compartment_CCNA + S15 + S18 + S20; _rateLaw22*compartment_CCNA*S21;
  R52: S6 + S19 => S6 + S12 + S18 + S20; _rateLaw23*S6*S19;
  R53: S6 + S21 => S6 + S15 + S18 + S20; _rateLaw23*S6*S21;
  R54: compartment_CCNE + S16 => compartment_CCNE + S12 + S18; _rateLaw24*compartment_CCNE*S16;
  R55: compartment_CCNE + S22 => compartment_CCNE + S15 + S18; _rateLaw24*compartment_CCNE*S22;
  R56: S19 => S16; kDeEmi1*S19;
  R57: S20 => ; kDeEmi1*S20;
  R58: S21 => S22; kDeEmi1*S21;
  R59: S23 => ; kDeEmi1*S23;
  R60: S19 => S16; kDeEmi2*S19;
  R61: S21 => S22; kDeEmi2*S21;
  R62: compartment_CCNA + S19 => compartment_CCNA + S16 + S23; _rateLaw25*compartment_CCNA*S19;
  R63: compartment_CCNA + S21 => compartment_CCNA + S22 + S23; _rateLaw25*compartment_CCNA*S21;
  R64: S6 + S19 => S6 + S16 + S23; _rateLaw26*S6*S19;
  R65: S6 + S21 => S6 + S22 + S23; _rateLaw26*S6*S21;
  R66: compartment_CCNA + S20 => compartment_CCNA + S23; _rateLaw27*compartment_CCNA*S20;
  R67: S6 + S20 => S6 + S23; _rateLaw28*S6*S20;
  R68: S23 => S20; kDpEmi*S23;
  R69: S23 => ; kDeEmi3*S23;
  R70: => compartment_FOXM1_DBD_Thr600_u; _rateLaw29;
  R71: S48 => S20 + S48; kSyEmi2*S48;
  R72: compartment_CCNE + S17 => compartment_CCNE + S18; _rateLaw30*compartment_CCNE*S17;
  R73: compartment_CCNA + S17 => compartment_CCNA + S18; _rateLaw31*compartment_CCNA*S17;
  R74: S6 + S17 => S6 + S18; _rateLaw32*S6*S17;
  R75: S18 => S17; kDpCdh*S18;
  R76: => compartment_CCNA; _rateLaw33;
  R77: compartment_CCNA => ; kDeCa1*compartment_CCNA;
  R78: compartment_CCNE + compartment_CCNA => compartment_CCNA; _rateLaw34*compartment_CCNE*compartment_CCNA;
  R79: compartment_CCNA + S16 => S16; _rateLaw35*compartment_CCNA*S16;
  R80: compartment_CCNA + S22 => S22; _rateLaw35*compartment_CCNA*S22;
  R81: compartment_CCNA + S14 => S14; _rateLaw36*compartment_CCNA*S14;
  R82: S49 => compartment_FOXM1_DBD_Thr600_u + S49; kSyFox2*S49;
  R83: compartment_FOXM1_DBD_Thr600_u => ; kDeFox1*compartment_FOXM1_DBD_Thr600_u;
  R84: compartment_FOXM1_DBD_Thr600_p => ; kDeFox1*compartment_FOXM1_DBD_Thr600_p;
  R85: S16 + compartment_FOXM1_DBD_Thr600_u => S16; _rateLaw37*S16*compartment_FOXM1_DBD_Thr600_u;
  R86: S22 + compartment_FOXM1_DBD_Thr600_u => S22; _rateLaw37*S22*compartment_FOXM1_DBD_Thr600_u;
  R87: S16 + compartment_FOXM1_DBD_Thr600_p => S16; _rateLaw37*S16*compartment_FOXM1_DBD_Thr600_p;
  R88: S22 + compartment_FOXM1_DBD_Thr600_p => S22; _rateLaw37*S22*compartment_FOXM1_DBD_Thr600_p;
  R89: compartment_CCNE + compartment_FOXM1_DBD_Thr600_u => compartment_CCNE + compartment_FOXM1_DBD_Thr600_p; _rateLaw38*compartment_CCNE*compartment_FOXM1_DBD_Thr600_u;
  R90: compartment_CCNA + compartment_FOXM1_DBD_Thr600_u => compartment_CCNA + compartment_FOXM1_DBD_Thr600_p; _rateLaw39*compartment_CCNA*compartment_FOXM1_DBD_Thr600_u;
  R91: S6 + compartment_FOXM1_DBD_Thr600_u => S6 + compartment_FOXM1_DBD_Thr600_p; _rateLaw40*S6*compartment_FOXM1_DBD_Thr600_u;
  R92: compartment_FOXM1_DBD_Thr600_p => compartment_FOXM1_DBD_Thr600_u; kDpFox*compartment_FOXM1_DBD_Thr600_p;
  R93: => S6; _rateLaw41;
  R94: S26 => S6 + S26; _rateLaw42*S26;
  R95: S6 => ; kDeCb1*S6;
  R96: S31 => ; kDeCb1*S31;
  R97: S6 + S16 => S16; _rateLaw43*S6*S16;
  R98: S6 + S22 => S22; _rateLaw43*S6*S22;
  R99: S16 + S31 => S16; _rateLaw43*S16*S31;
  R100: S22 + S31 => S22; _rateLaw43*S22*S31;
  R101: S6 + S14 => S14; _rateLaw44*S6*S14;
  R102: S14 + S31 => S14; _rateLaw44*S14*S31;
  R103: compartment_CDC20_APC => ; kDeCdc_1*compartment_CDC20_APC;
  R104: S14 => S15; kDeCdc_1*S14;
  R105: compartment_CDC20_APC + S16 => S16; _rateLaw45*compartment_CDC20_APC*S16;
  R106: compartment_CDC20_APC + S22 => S22; _rateLaw45*compartment_CDC20_APC*S22;
  R107: S14 + S16 => S15 + S16; _rateLaw45*S14*S16;
  R108: S14 + S22 => S15 + S22; _rateLaw45*S14*S22;
  R109: => compartment_CDC20_APC; _rateLaw46;
  R110: S29 => compartment_CDC20_APC + S29; kSyCdc_2*S29;
  R111: compartment_FOXM1_DBD_Thr600_p + compartment_CDC20_promoter_FOXM1 => S29; _rateLaw47*compartment_FOXM1_DBD_Thr600_p*compartment_CDC20_promoter_FOXM1;
  R112: S29 => compartment_FOXM1_DBD_Thr600_p + compartment_CDC20_promoter_FOXM1; kDiFPcdc*S29;
  R113: S6 + compartment_WEE1_Ser123_u => compartment_WEE1_Ser123_u + S31; functionRate01*S6*compartment_WEE1_Ser123_u;
  R114: S6 + compartment_WEE1_Ser123_p => S31 + compartment_WEE1_Ser123_p; functionRate02*S6*compartment_WEE1_Ser123_p;
  R115: S31 + compartment_CDC25_pSites_p => S6 + compartment_CDC25_pSites_p; _rateLaw48*S31*compartment_CDC25_pSites_p;
  R116: S31 + compartment_CDC25_pSites_u => S6 + compartment_CDC25_pSites_u; _rateLaw49*S31*compartment_CDC25_pSites_u;
  R117: S6 + compartment_CDC25_pSites_u => S6 + compartment_CDC25_pSites_p; _rateLaw50*S6*compartment_CDC25_pSites_u;
  R118: compartment_CCNA + compartment_CDC25_pSites_u => compartment_CCNA + compartment_CDC25_pSites_p; _rateLaw51*compartment_CCNA*compartment_CDC25_pSites_u;
  R119: compartment_PPP2R2B_ENSA_ARPP19 + compartment_CDC25_pSites_p => compartment_PPP2R2B_ENSA_ARPP19 + compartment_CDC25_pSites_u; _rateLaw52*compartment_PPP2R2B_ENSA_ARPP19*compartment_CDC25_pSites_p;
  R120: compartment_PPP2R2B_ENSA_ARPP19 + compartment_WEE1_Ser123_p => compartment_PPP2R2B_ENSA_ARPP19 + compartment_WEE1_Ser123_u; _rateLaw53*compartment_PPP2R2B_ENSA_ARPP19*compartment_WEE1_Ser123_p;
  R121: compartment_CCNA + compartment_WEE1_Ser123_u => compartment_CCNA + compartment_WEE1_Ser123_p; _rateLaw54*compartment_CCNA*compartment_WEE1_Ser123_u;
  R122: S6 + compartment_WEE1_Ser123_u => S6 + compartment_WEE1_Ser123_p; _rateLaw55*S6*compartment_WEE1_Ser123_u;
  R123: S6 + compartment_MASTL_Thr198_u => S6 + compartment_MASTL_Thr198_p; _rateLaw56*S6*compartment_MASTL_Thr198_u;
  R124: compartment_MASTL_Thr198_p => compartment_MASTL_Thr198_u; kDpGw1*compartment_MASTL_Thr198_p;
  R125: compartment_PPP2R2B_ENSA_ARPP19 + compartment_MASTL_Thr198_p => compartment_PPP2R2B_ENSA_ARPP19 + compartment_MASTL_Thr198_u; _rateLaw57*compartment_PPP2R2B_ENSA_ARPP19*compartment_MASTL_Thr198_p;
  R126: compartment_MASTL_Thr198_p + S37 => compartment_MASTL_Thr198_p + S38; _rateLaw58*compartment_MASTL_Thr198_p*S37;
  R127: S39 => compartment_PPP2R2B_ENSA_ARPP19 + S37; kDpEnsa*S39;
  R128: => S20; _rateLaw59;
  R129: S45 => compartment_CCNE + S45; kSyCe2*S45;
  R130: S6 + S16 => S6 + S12 + S18; _rateLaw60*S6*S16;
  R131: S6 + S22 => S6 + S15 + S18; _rateLaw60*S6*S22;
  R132: compartment_E2F_DBD_RB1_Ser332_u + S9 => S7; _rateLaw61*compartment_E2F_DBD_RB1_Ser332_u*S9;
  R133: compartment_E2F_DBD_RB1_Ser332_p + S9 => S8; _rateLaw61*compartment_E2F_DBD_RB1_Ser332_p*S9;
  R134: S7 => compartment_E2F_DBD_RB1_Ser332_u + S9; kDiE2fRb*S7;
  R135: S8 => compartment_E2F_DBD_RB1_Ser332_p + S9; kDiE2fRb*S8;
  R136: S12 + S17 => S16; _rateLaw62*S12*S17;
  R137: S15 + S17 => S22; _rateLaw62*S15*S17;
  R138: S16 => S12 + S17; kDiACdh*S16;
  R139: S22 => S15 + S17; kDiACdh*S22;
  R140: S16 + S20 => S19; _rateLaw63*S16*S20;
  R141: S20 + S22 => S21; _rateLaw63*S20*S22;
  R142: S19 => S16 + S20; kDiACE*S19;
  R143: S21 => S20 + S22; kDiACE*S21;
  R144: compartment_CDC20_APC + S15 => S14; _rateLaw64*compartment_CDC20_APC*S15;
  R145: S14 => compartment_CDC20_APC + S15; kDipACdc*S14;
  R146: compartment_PPP2R2B_ENSA_ARPP19 + S38 => S39; _rateLaw65*compartment_PPP2R2B_ENSA_ARPP19*S38;
  R147: S39 => compartment_PPP2R2B_ENSA_ARPP19 + S38; kDipEB55*S39;
  R148: compartment_E2F_DBD_RB1_Ser332_u + compartment_CCNE_promoter_E2F => S45; _rateLaw66*compartment_E2F_DBD_RB1_Ser332_u*compartment_CCNE_promoter_E2F;
  R149: S45 => compartment_E2F_DBD_RB1_Ser332_u + compartment_CCNE_promoter_E2F; kDiEPx*S45;
  R150: compartment_E2F_DBD_RB1_Ser332_u + compartment_CCNA_promoter_E2F => S46; _rateLaw67*compartment_E2F_DBD_RB1_Ser332_u*compartment_CCNA_promoter_E2F;
  R151: S46 => compartment_E2F_DBD_RB1_Ser332_u + compartment_CCNA_promoter_E2F; kDiEPx*S46;
  R152: compartment_E2F_DBD_RB1_Ser332_u + compartment_E2F_promoter_E2F => S47; _rateLaw68*compartment_E2F_DBD_RB1_Ser332_u*compartment_E2F_promoter_E2F;
  R153: S47 => compartment_E2F_DBD_RB1_Ser332_u + compartment_E2F_promoter_E2F; kDiEPx*S47;
  R154: compartment_E2F_DBD_RB1_Ser332_u + compartment_FBXO5_promoter_E2F => S48; _rateLaw69*compartment_E2F_DBD_RB1_Ser332_u*compartment_FBXO5_promoter_E2F;
  R155: S48 => compartment_E2F_DBD_RB1_Ser332_u + compartment_FBXO5_promoter_E2F; kDiEPx*S48;
  R156: compartment_E2F_DBD_RB1_Ser332_u + compartment_FOXM1_promoter_E2F => S49; _rateLaw70*compartment_E2F_DBD_RB1_Ser332_u*compartment_FOXM1_promoter_E2F;
  R157: S49 => compartment_E2F_DBD_RB1_Ser332_u + compartment_FOXM1_promoter_E2F; kDiEPx*S49;
end
