// SBML level 2 version 3

model cell_cycle_v3_0_0()

  // Compartments:
  compartment cell = 1;

  // Species:
  species cell_CCND in cell = 6.022e23; cell_CCND is "@cell::CCND()";
  species cell_CCNE in cell = 1.3986043e23; cell_CCNE is "@cell::CCNE()";
  species cell_E2F_DBD_RB1_Ser332_u in cell = 1.1128068e22; cell_E2F_DBD_RB1_Ser332_u is "@cell::E2F(DBD,RB1,Ser332~u)";
  species cell_E2F_DBD_RB1_Ser332_p in cell = 2.2932894e19; cell_E2F_DBD_RB1_Ser332_p is "@cell::E2F(DBD,RB1,Ser332~p)";
  species cell_CCNA in cell = 4.2325597e21; cell_CCNA is "@cell::CCNA()";
  species cell_CCNB_CDK1_Thr14_Tyr15_u in cell = 1.133559e21; cell_CCNB_CDK1_Thr14_Tyr15_u is "@cell::CCNB(CDK1_Thr14_Tyr15~u)";
  species S7 in cell = 4.3034014e22; S7 is "@cell::E2F(DBD,RB1!1,Ser332~u).RB1(E2F!1,Ser807_Ser811~u)";
  species S8 in cell = 9.065434e19; S8 is "@cell::E2F(DBD,RB1!1,Ser332~p).RB1(E2F!1,Ser807_Ser811~u)";
  species cell_RB1_E2F_Ser807_Ser811_u in cell = 5.2778426e22; cell_RB1_E2F_Ser807_Ser811_u is "@cell::RB1(E2F,Ser807_Ser811~u)";
  species cell_RB1_E2F_Ser807_Ser811_p in cell = 5.0629691e23; cell_RB1_E2F_Ser807_Ser811_p is "@cell::RB1(E2F,Ser807_Ser811~p)";
  species cell_PPP2R2B_ENSA_ARPP19 in cell = 4.6484797e22; cell_PPP2R2B_ENSA_ARPP19 is "@cell::PPP2R2B(ENSA_ARPP19)";
  species S12 in cell = 2.4260911e24; S12 is "@cell::APC(FBXO5,FZR1_CDC20,Ser355~u)";
  species cell_CDC20_APC in cell = 1.3847757e23; cell_CDC20_APC is "@cell::CDC20(APC)";
  species S14 in cell = 4.2087805e22; S14 is "@cell::APC(FBXO5,FZR1_CDC20!1,Ser355~p).CDC20(APC!1)";
  species S15 in cell = 3.7993439e22; S15 is "@cell::APC(FBXO5,FZR1_CDC20,Ser355~p)";
  species S16 in cell = 4.2969631e23; S16 is "@cell::APC(FBXO5,FZR1_CDC20!1,Ser355~u).FZR1(APC!1,FBXO5,nTerm~u)";
  species cell_FZR1_APC_FBXO5_nTerm_u in cell = 3.4406152e20; cell_FZR1_APC_FBXO5_nTerm_u is "@cell::FZR1(APC,FBXO5,nTerm~u)";
  species cell_FZR1_APC_FBXO5_nTerm_p in cell = 9.7028319e22; cell_FZR1_APC_FBXO5_nTerm_p is "@cell::FZR1(APC,FBXO5,nTerm~p)";
  species S19 in cell = 6.5604459e22; S19 is "@cell::APC(FBXO5!1,FZR1_CDC20!2,Ser355~u).FBXO5(APC!1,FZR1!3,Ser182~u).FZR1(APC!2,FBXO5!3,nTerm~u)";
  species cell_FBXO5_APC_FZR1_Ser182_u in cell = 4.3226888e20; cell_FBXO5_APC_FZR1_Ser182_u is "@cell::FBXO5(APC,FZR1,Ser182~u)";
  species S21 in cell = 1.3323959e21; S21 is "@cell::APC(FBXO5!1,FZR1_CDC20!2,Ser355~p).FBXO5(APC!1,FZR1!3,Ser182~u).FZR1(APC!2,FBXO5!3,nTerm~u)";
  species S22 in cell = 8.1944566e21; S22 is "@cell::APC(FBXO5,FZR1_CDC20!1,Ser355~p).FZR1(APC!1,FBXO5,nTerm~u)";
  species cell_FBXO5_APC_FZR1_Ser182_p in cell = 1.1324333e19; cell_FBXO5_APC_FZR1_Ser182_p is "@cell::FBXO5(APC,FZR1,Ser182~p)";
  species cell_FOXM1_DBD_Thr600_u in cell = 3.3510826e21; cell_FOXM1_DBD_Thr600_u is "@cell::FOXM1(DBD,Thr600~u)";
  species cell_FOXM1_DBD_Thr600_p in cell = 2.2950816e20; cell_FOXM1_DBD_Thr600_p is "@cell::FOXM1(DBD,Thr600~p)";
  species S26 in cell = 1.1461427e17; S26 is "@cell::CCNB_promoter(FOXM1!1).FOXM1(DBD!1,Thr600~p)";
  species cell_CCNB_promoter_FOXM1 in cell = 6.0105386e19; cell_CCNB_promoter_FOXM1 is "@cell::CCNB_promoter(FOXM1)";
  species cell_CDC20_promoter_FOXM1 in cell = 6.0174121e19; cell_CDC20_promoter_FOXM1 is "@cell::CDC20_promoter(FOXM1)";
  species S29 in cell = 4.5878816e16; S29 is "@cell::CDC20_promoter(FOXM1!1).FOXM1(DBD!1,Thr600~p)";
  species cell_WEE1_Ser123_u in cell = 5.9042195e23; cell_WEE1_Ser123_u is "@cell::WEE1(Ser123~u)";
  species cell_CCNB_CDK1_Thr14_Tyr15_p in cell = 4.5242773e21; cell_CCNB_CDK1_Thr14_Tyr15_p is "@cell::CCNB(CDK1_Thr14_Tyr15~p)";
  species cell_WEE1_Ser123_p in cell = 1.1778049e22; cell_WEE1_Ser123_p is "@cell::WEE1(Ser123~p)";
  species cell_CDC25_pSites_p in cell = 1.1103404e22; cell_CDC25_pSites_p is "@cell::CDC25(pSites~p)";
  species cell_CDC25_pSites_u in cell = 5.910966e23; cell_CDC25_pSites_u is "@cell::CDC25(pSites~u)";
  species cell_MASTL_Thr198_u in cell = 6.0070998e23; cell_MASTL_Thr198_u is "@cell::MASTL(Thr198~u)";
  species cell_MASTL_Thr198_p in cell = 1.4900204e21; cell_MASTL_Thr198_p is "@cell::MASTL(Thr198~p)";
  species S37 in cell = 4.9793694e23; S37 is "@cell::ENSA_ARPP19(PPP2R2B,Ser62_Ser67~u)";
  species S38 in cell = 1.9785953e20; S38 is "@cell::ENSA_ARPP19(PPP2R2B,Ser62_Ser67~p)";
  species S39 in cell = 1.040652e23; S39 is "@cell::ENSA_ARPP19(PPP2R2B!1,Ser62_Ser67~p).PPP2R2B(ENSA_ARPP19!1)";
  species cell_CCNE_promoter_E2F in cell = 5.0873268e19; cell_CCNE_promoter_E2F is "@cell::CCNE_promoter(E2F)";
  species cell_CCNA_promoter_E2F in cell = 5.0873268e19; cell_CCNA_promoter_E2F is "@cell::CCNA_promoter(E2F)";
  species cell_E2F_promoter_E2F in cell = 5.0873268e19; cell_E2F_promoter_E2F is "@cell::E2F_promoter(E2F)";
  species cell_FBXO5_promoter_E2F in cell = 5.0873268e19; cell_FBXO5_promoter_E2F is "@cell::FBXO5_promoter(E2F)";
  species cell_FOXM1_promoter_E2F in cell = 5.0873268e19; cell_FOXM1_promoter_E2F is "@cell::FOXM1_promoter(E2F)";
  species S45 in cell = 9.3467317e18; S45 is "@cell::CCNE_promoter(E2F!1).E2F(DBD!1,RB1,Ser332~u)";
  species S46 in cell = 9.3467317e18; S46 is "@cell::CCNA_promoter(E2F!1).E2F(DBD!1,RB1,Ser332~u)";
  species S47 in cell = 9.3467317e18; S47 is "@cell::E2F(DBD!1,RB1,Ser332~u).E2F_promoter(E2F!1)";
  species S48 in cell = 9.3467317e18; S48 is "@cell::E2F(DBD!1,RB1,Ser332~u).FBXO5_promoter(E2F!1)";
  species S49 in cell = 9.3467317e18; S49 is "@cell::E2F(DBD!1,RB1,Ser332~u).FOXM1_promoter(E2F!1)";
  species cell_iWEE in cell = 0; cell_iWEE is "@cell::iWEE()";

  // Parameters:
  kPhRbD = 9.206253e-27;
  kPhRbE = 1.1507816e-26;
  kDpRb = 0.0013860014;
  kPhRb = 3.4523449e-26;
  kSyCe1 = 8.3465003e18;
  kSyCe2 = 4.1580042;
  kDeCe = 0.00013860014;
  kDiE2fRb = 0.00034650035;
  kAsE2fRb = 5.7539081e-25;
  kSyE2f1 = 4.1732502e18;
  kSyE2f2 = 0.69300069;
  kDeE2f1 = 6.9300069e-5;
  kDeE2f2 = 0.0013860014;
  kPhE2f = 2.3015632e-27;
  kDpE2f2 = 1.1507816e-25;
  kSyEmi1 = 2.0866251e19;
  kSyEmi2 = 3.4650035;
  kDeEmi1 = 0.00034650035;
  kDeEmi2 = 0.00034650035;
  kDeEmi3 = 0.0034650035;
  kPhEmiA = 5.7539081e-29;
  kPhEmiB = 2.8769541e-28;
  kDpEmi = 3.4650035e-6;
  kSyCa1 = 4.1732502e18;
  kSyCa2 = 0.51975052;
  kDeCa1 = 6.9300069e-6;
  kDeCa2 = 4.6031265e-27;
  kDeCa3 = 1.1507816e-27;
  kDpCdh = 0.0034650035;
  kPhCdhA = 2.8769541e-26;
  kPhCdhE = 1.1507816e-27;
  kPhCdhB = 2.8769541e-25;
  kDiACE = 0.00034650035;
  kAsACE = 5.7539081e-25;
  kDiACdh = 0.00034650035;
  kAsACdh = 5.7539081e-25;
  kPhCeA = 1.1507816e-26;
  kPhCeE = 1.1507816e-28;
  kPhFoxE = 1.1507816e-27;
  kPhFoxA = 1.1507816e-27;
  kPhFoxB = 5.7539081e-27;
  kDpFox = 3.4650035e-5;
  kSyCb1 = 4.1732502e18;
  kSyCb2 = 0.51975052;
  kDeCb1 = 6.9300069e-6;
  kDeCb2 = 1.438477e-27;
  kDeCb3 = 1.438477e-27;
  kPhEnsa = 1.1507816e-27;
  kDpEnsa = 0.00034650035;
  kPhGw = 1.1507816e-26;
  kDpGw1 = 0.0017325017;
  kDpGw2 = 1.1507816e-25;
  kWee1 = 6.9300069e-5;
  kWee2 = 0.0069300069;
  kPhWeeA = 1.1507816e-27;
  kPhWeeB = 1.1507816e-26;
  kDpWee = 1.1507816e-25;
  kCdc25_1 = 1.1507816e-27;
  kCdc25_2 = 1.1507816e-26;
  kDpCdc25 = 1.1507816e-25;
  kDipEB55 = 4.7124047e-5;
  kAspEB55 = 6.5594552e-25;
  kSyCdc_1 = 4.1732502e18;
  kSyCdc_2 = 0.69300069;
  kDeCdc_1 = 2.7720028e-5;
  kDeCdc_2 = 4.6031265e-28;
  kDipACdc = 0.00086625087;
  kAspACdc = 1.1507816e-26;
  kPhApcA = 1.1507816e-28;
  kDpApc = 5.7539081e-26;
  kSyFox1 = 4.1732502e18;
  kSyFox2 = 0.51975052;
  kDeFox1 = 6.9300069e-6;
  kDeFox2 = 5.7539081e-27;
  kAsEPx = 5.7539081e-25;
  kDiEPx = 0.034650035;
  kAsFPcb = 5.7539081e-25;
  kDiFPcb = 0.069300069;
  kAsFPcdc = 5.7539081e-25;
  kDiFPcdc = 0.17325017;
  kPhC25B = 1.1507816e-26;
  kPhCAEE = 9.2062529e-28;
  kPhCAEA = 2.3015632e-26;
  kPhCAEB = 2.3015632e-25;
  ikSyCb = 1;
  jiWee = 6.022e22;
  kDpE2f1 = 0;
  kPhC25A = 0;
  _InitialConc1 = 6.022e23;
  _InitialConc2 = 1.3986043e23;
  _InitialConc3 = 1.1128068e22;
  _InitialConc4 = 2.2932894e19;
  _InitialConc5 = 4.2325597e21;
  _InitialConc6 = 1.133559e21;
  _InitialConc7 = 4.3034014e22;
  _InitialConc8 = 9.065434e19;
  _InitialConc9 = 5.2778426e22;
  _InitialConc10 = 5.0629691e23;
  _InitialConc11 = 4.6484797e22;
  _InitialConc12 = 2.4260911e24;
  _InitialConc13 = 1.3847757e23;
  _InitialConc14 = 4.2087805e22;
  _InitialConc15 = 3.7993439e22;
  _InitialConc16 = 4.2969631e23;
  _InitialConc17 = 3.4406152e20;
  _InitialConc18 = 9.7028319e22;
  _InitialConc19 = 6.5604459e22;
  _InitialConc20 = 4.3226888e20;
  _InitialConc21 = 1.3323959e21;
  _InitialConc22 = 8.1944566e21;
  _InitialConc23 = 1.1324333e19;
  _InitialConc24 = 3.3510826e21;
  _InitialConc25 = 2.2950816e20;
  _InitialConc26 = 1.1461427e17;
  _InitialConc27 = 6.0105386e19;
  _InitialConc28 = 6.0174121e19;
  _InitialConc29 = 4.5878816e16;
  _InitialConc30 = 5.9042195e23;
  _InitialConc31 = 4.5242773e21;
  _InitialConc32 = 1.1778049e22;
  _InitialConc33 = 1.1103404e22;
  _InitialConc34 = 5.910966e23;
  _InitialConc35 = 6.0070998e23;
  _InitialConc36 = 1.4900204e21;
  _InitialConc37 = 4.9793694e23;
  _InitialConc38 = 1.9785953e20;
  _InitialConc39 = 1.040652e23;
  _InitialConc40 = 5.0873268e19;
  _InitialConc41 = 5.0873268e19;
  _InitialConc42 = 5.0873268e19;
  _InitialConc43 = 5.0873268e19;
  _InitialConc44 = 5.0873268e19;
  _InitialConc45 = 9.3467317e18;
  _InitialConc46 = 9.3467317e18;
  _InitialConc47 = 9.3467317e18;
  _InitialConc48 = 9.3467317e18;
  _InitialConc49 = 9.3467317e18;
  _InitialConc50 = 0;
  _rateLaw1 = kSyCb1*ikSyCb;
  _rateLaw2 = kSyCb2*ikSyCb;

  // Assignment rules:
  Ce_compartment := 0 + cell_CCNE;
  Wee_compartment := 0 + cell_WEE1_Ser123_u;
  pWee_compartment := 0 + cell_WEE1_Ser123_p;
  iWee_compartment := 0 + cell_iWEE;
  functionRate01 := piecewise(kWee2*0.5*(Wee_compartment - iWee_compartment - jiWee + ((-Wee_compartment + iWee_compartment + jiWee)^2 + 4*jiWee*Wee_compartment)^(1/2))/Wee_compartment, Wee_compartment > 0, 0)/6.022e23;
  functionRate02 := piecewise(kWee1*0.5*(pWee_compartment - iWee_compartment - jiWee + ((-pWee_compartment + iWee_compartment + jiWee)^2 + 4*jiWee*pWee_compartment)^(1/2))/pWee_compartment, pWee_compartment > 0, 0)/6.022e23;

  // Reactions:
  R1: => cell_E2F_DBD_RB1_Ser332_u; kSyE2f1;
  R2: cell_FOXM1_DBD_Thr600_p + cell_CCNB_promoter_FOXM1 => S26; kAsFPcb*cell_FOXM1_DBD_Thr600_p*cell_CCNB_promoter_FOXM1;
  R3: S26 => cell_FOXM1_DBD_Thr600_p + cell_CCNB_promoter_FOXM1; kDiFPcb*S26;
  R4: S47 => cell_E2F_DBD_RB1_Ser332_u + S47; kSyE2f2*S47;
  R5: cell_E2F_DBD_RB1_Ser332_u => ; kDeE2f1*cell_E2F_DBD_RB1_Ser332_u;
  R6: cell_E2F_DBD_RB1_Ser332_p => ; kDeE2f1*cell_E2F_DBD_RB1_Ser332_p;
  R7: S7 => cell_RB1_E2F_Ser807_Ser811_u; kDeE2f1*S7;
  R8: S8 => cell_RB1_E2F_Ser807_Ser811_u; kDeE2f1*S8;
  R9: cell_CCND + S7 => cell_CCND + cell_E2F_DBD_RB1_Ser332_u + cell_RB1_E2F_Ser807_Ser811_p; kPhRbD*cell_CCND*S7;
  R10: cell_CCND + S8 => cell_CCND + cell_E2F_DBD_RB1_Ser332_p + cell_RB1_E2F_Ser807_Ser811_p; kPhRbD*cell_CCND*S8;
  R11: cell_CCNE + S7 => cell_CCNE + cell_E2F_DBD_RB1_Ser332_u + cell_RB1_E2F_Ser807_Ser811_p; kPhRbE*cell_CCNE*S7;
  R12: cell_CCNE + S8 => cell_CCNE + cell_E2F_DBD_RB1_Ser332_p + cell_RB1_E2F_Ser807_Ser811_p; kPhRbE*cell_CCNE*S8;
  R13: cell_CCNA + S7 => cell_E2F_DBD_RB1_Ser332_u + cell_CCNA + cell_RB1_E2F_Ser807_Ser811_p; kPhRb*cell_CCNA*S7;
  R14: cell_CCNA + S8 => cell_E2F_DBD_RB1_Ser332_p + cell_CCNA + cell_RB1_E2F_Ser807_Ser811_p; kPhRb*cell_CCNA*S8;
  R15: cell_CCNB_CDK1_Thr14_Tyr15_u + S7 => cell_E2F_DBD_RB1_Ser332_u + cell_CCNB_CDK1_Thr14_Tyr15_u + cell_RB1_E2F_Ser807_Ser811_p; kPhRb*cell_CCNB_CDK1_Thr14_Tyr15_u*S7;
  R16: cell_CCNB_CDK1_Thr14_Tyr15_u + S8 => cell_E2F_DBD_RB1_Ser332_p + cell_CCNB_CDK1_Thr14_Tyr15_u + cell_RB1_E2F_Ser807_Ser811_p; kPhRb*cell_CCNB_CDK1_Thr14_Tyr15_u*S8;
  R17: cell_E2F_DBD_RB1_Ser332_u + cell_CCNA => cell_E2F_DBD_RB1_Ser332_p + cell_CCNA; kPhE2f*cell_E2F_DBD_RB1_Ser332_u*cell_CCNA;
  R18: cell_CCNA + S7 => cell_CCNA + S8; kPhE2f*cell_CCNA*S7;
  R19: cell_E2F_DBD_RB1_Ser332_u + cell_CCNB_CDK1_Thr14_Tyr15_u => cell_E2F_DBD_RB1_Ser332_p + cell_CCNB_CDK1_Thr14_Tyr15_u; kPhE2f*cell_E2F_DBD_RB1_Ser332_u*cell_CCNB_CDK1_Thr14_Tyr15_u;
  R20: cell_CCNB_CDK1_Thr14_Tyr15_u + S7 => cell_CCNB_CDK1_Thr14_Tyr15_u + S8; kPhE2f*cell_CCNB_CDK1_Thr14_Tyr15_u*S7;
  R21: cell_E2F_DBD_RB1_Ser332_p => cell_E2F_DBD_RB1_Ser332_u; kDpE2f1*cell_E2F_DBD_RB1_Ser332_p;
  R22: S8 => S7; kDpE2f1*S8;
  R23: cell_E2F_DBD_RB1_Ser332_p + cell_PPP2R2B_ENSA_ARPP19 => cell_E2F_DBD_RB1_Ser332_u + cell_PPP2R2B_ENSA_ARPP19; kDpE2f2*cell_E2F_DBD_RB1_Ser332_p*cell_PPP2R2B_ENSA_ARPP19;
  R24: S8 + cell_PPP2R2B_ENSA_ARPP19 => S7 + cell_PPP2R2B_ENSA_ARPP19; kDpE2f2*S8*cell_PPP2R2B_ENSA_ARPP19;
  R25: cell_E2F_DBD_RB1_Ser332_p => ; kDeE2f2*cell_E2F_DBD_RB1_Ser332_p;
  R26: S8 => cell_RB1_E2F_Ser807_Ser811_u; kDeE2f2*S8;
  R27: cell_CCND + cell_RB1_E2F_Ser807_Ser811_u => cell_CCND + cell_RB1_E2F_Ser807_Ser811_p; kPhRbD*cell_CCND*cell_RB1_E2F_Ser807_Ser811_u;
  R28: cell_CCNE + cell_RB1_E2F_Ser807_Ser811_u => cell_CCNE + cell_RB1_E2F_Ser807_Ser811_p; kPhRbE*cell_CCNE*cell_RB1_E2F_Ser807_Ser811_u;
  R29: cell_CCNA + cell_RB1_E2F_Ser807_Ser811_u => cell_CCNA + cell_RB1_E2F_Ser807_Ser811_p; kPhRb*cell_CCNA*cell_RB1_E2F_Ser807_Ser811_u;
  R30: cell_CCNB_CDK1_Thr14_Tyr15_u + cell_RB1_E2F_Ser807_Ser811_u => cell_CCNB_CDK1_Thr14_Tyr15_u + cell_RB1_E2F_Ser807_Ser811_p; kPhRb*cell_CCNB_CDK1_Thr14_Tyr15_u*cell_RB1_E2F_Ser807_Ser811_u;
  R31: => cell_CCNE; kSyCe1;
  R32: S46 => cell_CCNA + S46; kSyCa2*S46;
  R33: cell_CCNE => ; kDeCe*cell_CCNE;
  R34: cell_CCNE + cell_CCNE => cell_CCNE; kPhCeE*cell_CCNE*cell_CCNE;
  R35: cell_RB1_E2F_Ser807_Ser811_p => cell_RB1_E2F_Ser807_Ser811_u; kDpRb*cell_RB1_E2F_Ser807_Ser811_p;
  R36: cell_PPP2R2B_ENSA_ARPP19 + S14 => cell_PPP2R2B_ENSA_ARPP19 + S12 + cell_CDC20_APC; kDpApc*cell_PPP2R2B_ENSA_ARPP19*S14;
  R37: cell_CCNA + S12 => cell_CCNA + S15; kPhApcA*cell_CCNA*S12;
  R38: cell_CCNA + S16 => cell_CCNA + S22; kPhApcA*cell_CCNA*S16;
  R39: cell_CCNA + S19 => cell_CCNA + S21; kPhApcA*cell_CCNA*S19;
  R40: cell_CCNB_CDK1_Thr14_Tyr15_u + S12 => cell_CCNB_CDK1_Thr14_Tyr15_u + S15; kPhApcA*cell_CCNB_CDK1_Thr14_Tyr15_u*S12;
  R41: cell_CCNB_CDK1_Thr14_Tyr15_u + S16 => cell_CCNB_CDK1_Thr14_Tyr15_u + S22; kPhApcA*cell_CCNB_CDK1_Thr14_Tyr15_u*S16;
  R42: cell_CCNB_CDK1_Thr14_Tyr15_u + S19 => cell_CCNB_CDK1_Thr14_Tyr15_u + S21; kPhApcA*cell_CCNB_CDK1_Thr14_Tyr15_u*S19;
  R43: cell_PPP2R2B_ENSA_ARPP19 + S15 => cell_PPP2R2B_ENSA_ARPP19 + S12; kDpApc*cell_PPP2R2B_ENSA_ARPP19*S15;
  R44: cell_PPP2R2B_ENSA_ARPP19 + S21 => cell_PPP2R2B_ENSA_ARPP19 + S19; kDpApc*cell_PPP2R2B_ENSA_ARPP19*S21;
  R45: cell_PPP2R2B_ENSA_ARPP19 + S22 => cell_PPP2R2B_ENSA_ARPP19 + S16; kDpApc*cell_PPP2R2B_ENSA_ARPP19*S22;
  R46: cell_CCNA + S16 => cell_CCNA + S12 + cell_FZR1_APC_FBXO5_nTerm_p; kPhCdhA*cell_CCNA*S16;
  R47: cell_CCNA + S22 => cell_CCNA + S15 + cell_FZR1_APC_FBXO5_nTerm_p; kPhCdhA*cell_CCNA*S22;
  R48: cell_CCNE + S19 => cell_CCNE + S12 + cell_FZR1_APC_FBXO5_nTerm_p + cell_FBXO5_APC_FZR1_Ser182_u; kPhCAEE*cell_CCNE*S19;
  R49: cell_CCNE + S21 => cell_CCNE + S15 + cell_FZR1_APC_FBXO5_nTerm_p + cell_FBXO5_APC_FZR1_Ser182_u; kPhCAEE*cell_CCNE*S21;
  R50: cell_CCNA + S19 => cell_CCNA + S12 + cell_FZR1_APC_FBXO5_nTerm_p + cell_FBXO5_APC_FZR1_Ser182_u; kPhCAEA*cell_CCNA*S19;
  R51: cell_CCNA + S21 => cell_CCNA + S15 + cell_FZR1_APC_FBXO5_nTerm_p + cell_FBXO5_APC_FZR1_Ser182_u; kPhCAEA*cell_CCNA*S21;
  R52: cell_CCNB_CDK1_Thr14_Tyr15_u + S19 => cell_CCNB_CDK1_Thr14_Tyr15_u + S12 + cell_FZR1_APC_FBXO5_nTerm_p + cell_FBXO5_APC_FZR1_Ser182_u; kPhCAEB*cell_CCNB_CDK1_Thr14_Tyr15_u*S19;
  R53: cell_CCNB_CDK1_Thr14_Tyr15_u + S21 => cell_CCNB_CDK1_Thr14_Tyr15_u + S15 + cell_FZR1_APC_FBXO5_nTerm_p + cell_FBXO5_APC_FZR1_Ser182_u; kPhCAEB*cell_CCNB_CDK1_Thr14_Tyr15_u*S21;
  R54: cell_CCNE + S16 => cell_CCNE + S12 + cell_FZR1_APC_FBXO5_nTerm_p; kPhCdhE*cell_CCNE*S16;
  R55: cell_CCNE + S22 => cell_CCNE + S15 + cell_FZR1_APC_FBXO5_nTerm_p; kPhCdhE*cell_CCNE*S22;
  R56: S19 => S16; kDeEmi1*S19;
  R57: cell_FBXO5_APC_FZR1_Ser182_u => ; kDeEmi1*cell_FBXO5_APC_FZR1_Ser182_u;
  R58: S21 => S22; kDeEmi1*S21;
  R59: cell_FBXO5_APC_FZR1_Ser182_p => ; kDeEmi1*cell_FBXO5_APC_FZR1_Ser182_p;
  R60: S19 => S16; kDeEmi2*S19;
  R61: S21 => S22; kDeEmi2*S21;
  R62: cell_CCNA + S19 => cell_CCNA + S16 + cell_FBXO5_APC_FZR1_Ser182_p; kPhEmiA*cell_CCNA*S19;
  R63: cell_CCNA + S21 => cell_CCNA + S22 + cell_FBXO5_APC_FZR1_Ser182_p; kPhEmiA*cell_CCNA*S21;
  R64: cell_CCNB_CDK1_Thr14_Tyr15_u + S19 => cell_CCNB_CDK1_Thr14_Tyr15_u + S16 + cell_FBXO5_APC_FZR1_Ser182_p; kPhEmiB*cell_CCNB_CDK1_Thr14_Tyr15_u*S19;
  R65: cell_CCNB_CDK1_Thr14_Tyr15_u + S21 => cell_CCNB_CDK1_Thr14_Tyr15_u + S22 + cell_FBXO5_APC_FZR1_Ser182_p; kPhEmiB*cell_CCNB_CDK1_Thr14_Tyr15_u*S21;
  R66: cell_CCNA + cell_FBXO5_APC_FZR1_Ser182_u => cell_CCNA + cell_FBXO5_APC_FZR1_Ser182_p; kPhEmiA*cell_CCNA*cell_FBXO5_APC_FZR1_Ser182_u;
  R67: cell_CCNB_CDK1_Thr14_Tyr15_u + cell_FBXO5_APC_FZR1_Ser182_u => cell_CCNB_CDK1_Thr14_Tyr15_u + cell_FBXO5_APC_FZR1_Ser182_p; kPhEmiB*cell_CCNB_CDK1_Thr14_Tyr15_u*cell_FBXO5_APC_FZR1_Ser182_u;
  R68: cell_FBXO5_APC_FZR1_Ser182_p => cell_FBXO5_APC_FZR1_Ser182_u; kDpEmi*cell_FBXO5_APC_FZR1_Ser182_p;
  R69: cell_FBXO5_APC_FZR1_Ser182_p => ; kDeEmi3*cell_FBXO5_APC_FZR1_Ser182_p;
  R70: => cell_FOXM1_DBD_Thr600_u; kSyFox1;
  R71: S48 => cell_FBXO5_APC_FZR1_Ser182_u + S48; kSyEmi2*S48;
  R72: cell_CCNE + cell_FZR1_APC_FBXO5_nTerm_u => cell_CCNE + cell_FZR1_APC_FBXO5_nTerm_p; kPhCdhE*cell_CCNE*cell_FZR1_APC_FBXO5_nTerm_u;
  R73: cell_CCNA + cell_FZR1_APC_FBXO5_nTerm_u => cell_CCNA + cell_FZR1_APC_FBXO5_nTerm_p; kPhCdhA*cell_CCNA*cell_FZR1_APC_FBXO5_nTerm_u;
  R74: cell_CCNB_CDK1_Thr14_Tyr15_u + cell_FZR1_APC_FBXO5_nTerm_u => cell_CCNB_CDK1_Thr14_Tyr15_u + cell_FZR1_APC_FBXO5_nTerm_p; kPhCdhB*cell_CCNB_CDK1_Thr14_Tyr15_u*cell_FZR1_APC_FBXO5_nTerm_u;
  R75: cell_FZR1_APC_FBXO5_nTerm_p => cell_FZR1_APC_FBXO5_nTerm_u; kDpCdh*cell_FZR1_APC_FBXO5_nTerm_p;
  R76: => cell_CCNA; kSyCa1;
  R77: cell_CCNA => ; kDeCa1*cell_CCNA;
  R78: cell_CCNE + cell_CCNA => cell_CCNA; kPhCeA*cell_CCNE*cell_CCNA;
  R79: cell_CCNA + S16 => S16; kDeCa2*cell_CCNA*S16;
  R80: cell_CCNA + S22 => S22; kDeCa2*cell_CCNA*S22;
  R81: cell_CCNA + S14 => S14; kDeCa3*cell_CCNA*S14;
  R82: S49 => cell_FOXM1_DBD_Thr600_u + S49; kSyFox2*S49;
  R83: cell_FOXM1_DBD_Thr600_u => ; kDeFox1*cell_FOXM1_DBD_Thr600_u;
  R84: cell_FOXM1_DBD_Thr600_p => ; kDeFox1*cell_FOXM1_DBD_Thr600_p;
  R85: S16 + cell_FOXM1_DBD_Thr600_u => S16; kDeFox2*S16*cell_FOXM1_DBD_Thr600_u;
  R86: S22 + cell_FOXM1_DBD_Thr600_u => S22; kDeFox2*S22*cell_FOXM1_DBD_Thr600_u;
  R87: S16 + cell_FOXM1_DBD_Thr600_p => S16; kDeFox2*S16*cell_FOXM1_DBD_Thr600_p;
  R88: S22 + cell_FOXM1_DBD_Thr600_p => S22; kDeFox2*S22*cell_FOXM1_DBD_Thr600_p;
  R89: cell_CCNE + cell_FOXM1_DBD_Thr600_u => cell_CCNE + cell_FOXM1_DBD_Thr600_p; kPhFoxE*cell_CCNE*cell_FOXM1_DBD_Thr600_u;
  R90: cell_CCNA + cell_FOXM1_DBD_Thr600_u => cell_CCNA + cell_FOXM1_DBD_Thr600_p; kPhFoxA*cell_CCNA*cell_FOXM1_DBD_Thr600_u;
  R91: cell_CCNB_CDK1_Thr14_Tyr15_u + cell_FOXM1_DBD_Thr600_u => cell_CCNB_CDK1_Thr14_Tyr15_u + cell_FOXM1_DBD_Thr600_p; kPhFoxB*cell_CCNB_CDK1_Thr14_Tyr15_u*cell_FOXM1_DBD_Thr600_u;
  R92: cell_FOXM1_DBD_Thr600_p => cell_FOXM1_DBD_Thr600_u; kDpFox*cell_FOXM1_DBD_Thr600_p;
  R93: => cell_CCNB_CDK1_Thr14_Tyr15_u; _rateLaw1;
  R94: S26 => cell_CCNB_CDK1_Thr14_Tyr15_u + S26; _rateLaw2*S26;
  R95: cell_CCNB_CDK1_Thr14_Tyr15_u => ; kDeCb1*cell_CCNB_CDK1_Thr14_Tyr15_u;
  R96: cell_CCNB_CDK1_Thr14_Tyr15_p => ; kDeCb1*cell_CCNB_CDK1_Thr14_Tyr15_p;
  R97: cell_CCNB_CDK1_Thr14_Tyr15_u + S16 => S16; kDeCb2*cell_CCNB_CDK1_Thr14_Tyr15_u*S16;
  R98: cell_CCNB_CDK1_Thr14_Tyr15_u + S22 => S22; kDeCb2*cell_CCNB_CDK1_Thr14_Tyr15_u*S22;
  R99: S16 + cell_CCNB_CDK1_Thr14_Tyr15_p => S16; kDeCb2*S16*cell_CCNB_CDK1_Thr14_Tyr15_p;
  R100: S22 + cell_CCNB_CDK1_Thr14_Tyr15_p => S22; kDeCb2*S22*cell_CCNB_CDK1_Thr14_Tyr15_p;
  R101: cell_CCNB_CDK1_Thr14_Tyr15_u + S14 => S14; kDeCb3*cell_CCNB_CDK1_Thr14_Tyr15_u*S14;
  R102: S14 + cell_CCNB_CDK1_Thr14_Tyr15_p => S14; kDeCb3*S14*cell_CCNB_CDK1_Thr14_Tyr15_p;
  R103: cell_CDC20_APC => ; kDeCdc_1*cell_CDC20_APC;
  R104: S14 => S15; kDeCdc_1*S14;
  R105: cell_CDC20_APC + S16 => S16; kDeCdc_2*cell_CDC20_APC*S16;
  R106: cell_CDC20_APC + S22 => S22; kDeCdc_2*cell_CDC20_APC*S22;
  R107: S14 + S16 => S15 + S16; kDeCdc_2*S14*S16;
  R108: S14 + S22 => S15 + S22; kDeCdc_2*S14*S22;
  R109: => cell_CDC20_APC; kSyCdc_1;
  R110: S29 => cell_CDC20_APC + S29; kSyCdc_2*S29;
  R111: cell_FOXM1_DBD_Thr600_p + cell_CDC20_promoter_FOXM1 => S29; kAsFPcdc*cell_FOXM1_DBD_Thr600_p*cell_CDC20_promoter_FOXM1;
  R112: S29 => cell_FOXM1_DBD_Thr600_p + cell_CDC20_promoter_FOXM1; kDiFPcdc*S29;
  R113: cell_CCNB_CDK1_Thr14_Tyr15_u + cell_WEE1_Ser123_u => cell_WEE1_Ser123_u + cell_CCNB_CDK1_Thr14_Tyr15_p; functionRate01*cell_CCNB_CDK1_Thr14_Tyr15_u*cell_WEE1_Ser123_u;
  R114: cell_CCNB_CDK1_Thr14_Tyr15_u + cell_WEE1_Ser123_p => cell_CCNB_CDK1_Thr14_Tyr15_p + cell_WEE1_Ser123_p; functionRate02*cell_CCNB_CDK1_Thr14_Tyr15_u*cell_WEE1_Ser123_p;
  R115: cell_CCNB_CDK1_Thr14_Tyr15_p + cell_CDC25_pSites_p => cell_CCNB_CDK1_Thr14_Tyr15_u + cell_CDC25_pSites_p; kCdc25_2*cell_CCNB_CDK1_Thr14_Tyr15_p*cell_CDC25_pSites_p;
  R116: cell_CCNB_CDK1_Thr14_Tyr15_p + cell_CDC25_pSites_u => cell_CCNB_CDK1_Thr14_Tyr15_u + cell_CDC25_pSites_u; kCdc25_1*cell_CCNB_CDK1_Thr14_Tyr15_p*cell_CDC25_pSites_u;
  R117: cell_CCNB_CDK1_Thr14_Tyr15_u + cell_CDC25_pSites_u => cell_CCNB_CDK1_Thr14_Tyr15_u + cell_CDC25_pSites_p; kPhC25B*cell_CCNB_CDK1_Thr14_Tyr15_u*cell_CDC25_pSites_u;
  R118: cell_CCNA + cell_CDC25_pSites_u => cell_CCNA + cell_CDC25_pSites_p; kPhC25A*cell_CCNA*cell_CDC25_pSites_u;
  R119: cell_PPP2R2B_ENSA_ARPP19 + cell_CDC25_pSites_p => cell_PPP2R2B_ENSA_ARPP19 + cell_CDC25_pSites_u; kDpCdc25*cell_PPP2R2B_ENSA_ARPP19*cell_CDC25_pSites_p;
  R120: cell_PPP2R2B_ENSA_ARPP19 + cell_WEE1_Ser123_p => cell_PPP2R2B_ENSA_ARPP19 + cell_WEE1_Ser123_u; kDpWee*cell_PPP2R2B_ENSA_ARPP19*cell_WEE1_Ser123_p;
  R121: cell_CCNA + cell_WEE1_Ser123_u => cell_CCNA + cell_WEE1_Ser123_p; kPhWeeA*cell_CCNA*cell_WEE1_Ser123_u;
  R122: cell_CCNB_CDK1_Thr14_Tyr15_u + cell_WEE1_Ser123_u => cell_CCNB_CDK1_Thr14_Tyr15_u + cell_WEE1_Ser123_p; kPhWeeB*cell_CCNB_CDK1_Thr14_Tyr15_u*cell_WEE1_Ser123_u;
  R123: cell_CCNB_CDK1_Thr14_Tyr15_u + cell_MASTL_Thr198_u => cell_CCNB_CDK1_Thr14_Tyr15_u + cell_MASTL_Thr198_p; kPhGw*cell_CCNB_CDK1_Thr14_Tyr15_u*cell_MASTL_Thr198_u;
  R124: cell_MASTL_Thr198_p => cell_MASTL_Thr198_u; kDpGw1*cell_MASTL_Thr198_p;
  R125: cell_PPP2R2B_ENSA_ARPP19 + cell_MASTL_Thr198_p => cell_PPP2R2B_ENSA_ARPP19 + cell_MASTL_Thr198_u; kDpGw2*cell_PPP2R2B_ENSA_ARPP19*cell_MASTL_Thr198_p;
  R126: cell_MASTL_Thr198_p + S37 => cell_MASTL_Thr198_p + S38; kPhEnsa*cell_MASTL_Thr198_p*S37;
  R127: S39 => cell_PPP2R2B_ENSA_ARPP19 + S37; kDpEnsa*S39;
  R128: => cell_FBXO5_APC_FZR1_Ser182_u; kSyEmi1;
  R129: S45 => cell_CCNE + S45; kSyCe2*S45;
  R130: cell_CCNB_CDK1_Thr14_Tyr15_u + S16 => cell_CCNB_CDK1_Thr14_Tyr15_u + S12 + cell_FZR1_APC_FBXO5_nTerm_p; kPhCdhB*cell_CCNB_CDK1_Thr14_Tyr15_u*S16;
  R131: cell_CCNB_CDK1_Thr14_Tyr15_u + S22 => cell_CCNB_CDK1_Thr14_Tyr15_u + S15 + cell_FZR1_APC_FBXO5_nTerm_p; kPhCdhB*cell_CCNB_CDK1_Thr14_Tyr15_u*S22;
  R132: cell_E2F_DBD_RB1_Ser332_u + cell_RB1_E2F_Ser807_Ser811_u => S7; kAsE2fRb*cell_E2F_DBD_RB1_Ser332_u*cell_RB1_E2F_Ser807_Ser811_u;
  R133: cell_E2F_DBD_RB1_Ser332_p + cell_RB1_E2F_Ser807_Ser811_u => S8; kAsE2fRb*cell_E2F_DBD_RB1_Ser332_p*cell_RB1_E2F_Ser807_Ser811_u;
  R134: S7 => cell_E2F_DBD_RB1_Ser332_u + cell_RB1_E2F_Ser807_Ser811_u; kDiE2fRb*S7;
  R135: S8 => cell_E2F_DBD_RB1_Ser332_p + cell_RB1_E2F_Ser807_Ser811_u; kDiE2fRb*S8;
  R136: S12 + cell_FZR1_APC_FBXO5_nTerm_u => S16; kAsACdh*S12*cell_FZR1_APC_FBXO5_nTerm_u;
  R137: S15 + cell_FZR1_APC_FBXO5_nTerm_u => S22; kAsACdh*S15*cell_FZR1_APC_FBXO5_nTerm_u;
  R138: S16 => S12 + cell_FZR1_APC_FBXO5_nTerm_u; kDiACdh*S16;
  R139: S22 => S15 + cell_FZR1_APC_FBXO5_nTerm_u; kDiACdh*S22;
  R140: S16 + cell_FBXO5_APC_FZR1_Ser182_u => S19; kAsACE*S16*cell_FBXO5_APC_FZR1_Ser182_u;
  R141: cell_FBXO5_APC_FZR1_Ser182_u + S22 => S21; kAsACE*cell_FBXO5_APC_FZR1_Ser182_u*S22;
  R142: S19 => S16 + cell_FBXO5_APC_FZR1_Ser182_u; kDiACE*S19;
  R143: S21 => cell_FBXO5_APC_FZR1_Ser182_u + S22; kDiACE*S21;
  R144: cell_CDC20_APC + S15 => S14; kAspACdc*cell_CDC20_APC*S15;
  R145: S14 => cell_CDC20_APC + S15; kDipACdc*S14;
  R146: cell_PPP2R2B_ENSA_ARPP19 + S38 => S39; kAspEB55*cell_PPP2R2B_ENSA_ARPP19*S38;
  R147: S39 => cell_PPP2R2B_ENSA_ARPP19 + S38; kDipEB55*S39;
  R148: cell_E2F_DBD_RB1_Ser332_u + cell_CCNE_promoter_E2F => S45; kAsEPx*cell_E2F_DBD_RB1_Ser332_u*cell_CCNE_promoter_E2F;
  R149: S45 => cell_E2F_DBD_RB1_Ser332_u + cell_CCNE_promoter_E2F; kDiEPx*S45;
  R150: cell_E2F_DBD_RB1_Ser332_u + cell_CCNA_promoter_E2F => S46; kAsEPx*cell_E2F_DBD_RB1_Ser332_u*cell_CCNA_promoter_E2F;
  R151: S46 => cell_E2F_DBD_RB1_Ser332_u + cell_CCNA_promoter_E2F; kDiEPx*S46;
  R152: cell_E2F_DBD_RB1_Ser332_u + cell_E2F_promoter_E2F => S47; kAsEPx*cell_E2F_DBD_RB1_Ser332_u*cell_E2F_promoter_E2F;
  R153: S47 => cell_E2F_DBD_RB1_Ser332_u + cell_E2F_promoter_E2F; kDiEPx*S47;
  R154: cell_E2F_DBD_RB1_Ser332_u + cell_FBXO5_promoter_E2F => S48; kAsEPx*cell_E2F_DBD_RB1_Ser332_u*cell_FBXO5_promoter_E2F;
  R155: S48 => cell_E2F_DBD_RB1_Ser332_u + cell_FBXO5_promoter_E2F; kDiEPx*S48;
  R156: cell_E2F_DBD_RB1_Ser332_u + cell_FOXM1_promoter_E2F => S49; kAsEPx*cell_E2F_DBD_RB1_Ser332_u*cell_FOXM1_promoter_E2F;
  R157: S49 => cell_E2F_DBD_RB1_Ser332_u + cell_FOXM1_promoter_E2F; kDiEPx*S49;
end
