// SBML level 2 version 3

model cell_cycle_v3.1.0()

  // Compartments:
  compartment cell = 1;

  // Species:
  species cell_CCND in cell = 1; cell_CCND is "@cell::CCND()";
  species cell_CCNE in cell = 0.23224914; cell_CCNE is "@cell::CCNE()";
  species cell_E2F_DBD_RB1_Ser332_u in cell = 0.018479024; cell_E2F_DBD_RB1_Ser332_u is "@cell::E2F(DBD,RB1,Ser332~u)";
  species cell_E2F_DBD_RB1_Ser332_p in cell = 3.8081857e-5; cell_E2F_DBD_RB1_Ser332_p is "@cell::E2F(DBD,RB1,Ser332~p)";
  species cell_CCNA in cell = 0.0070284949; cell_CCNA is "@cell::CCNA()";
  species cell_CCNB_CDK1_Thr14_Tyr15_u in cell = 0.0018823629; cell_CCNB_CDK1_Thr14_Tyr15_u is "@cell::CCNB(CDK1_Thr14_Tyr15~u)";
  species S7 in cell = 0.071461332; S7 is "@cell::E2F(DBD,RB1!1,Ser332~u).RB1(E2F!1,Ser807_Ser811~u)";
  species S8 in cell = 0.00015053859; S8 is "@cell::E2F(DBD,RB1!1,Ser332~p).RB1(E2F!1,Ser807_Ser811~u)";
  species cell_RB1_E2F_Ser807_Ser811_u in cell = 0.087642687; cell_RB1_E2F_Ser807_Ser811_u is "@cell::RB1(E2F,Ser807_Ser811~u)";
  species cell_RB1_E2F_Ser807_Ser811_p in cell = 0.84074544; cell_RB1_E2F_Ser807_Ser811_p is "@cell::RB1(E2F,Ser807_Ser811~p)";
  species cell_PPP2R2B_ENSA_ARPP19 in cell = 0.077191625; cell_PPP2R2B_ENSA_ARPP19 is "@cell::PPP2R2B(ENSA_ARPP19)";
  species S12 in cell = 4.0287133; S12 is "@cell::APC(FBXO5,FZR1_CDC20,Ser355~u)";
  species cell_CDC20_APC in cell = 0.22995279; cell_CDC20_APC is "@cell::CDC20(APC)";
  species S14 in cell = 0.069890078; S14 is "@cell::APC(FBXO5,FZR1_CDC20!1,Ser355~p).CDC20(APC!1)";
  species S15 in cell = 0.063091065; S15 is "@cell::APC(FBXO5,FZR1_CDC20,Ser355~p)";
  species S16 in cell = 0.71354419; S16 is "@cell::APC(FBXO5,FZR1_CDC20!1,Ser355~u).FZR1(APC!1,FBXO5,nTerm~u)";
  species cell_FZR1_APC_FBXO5_nTerm_u in cell = 0.00057134095; cell_FZR1_APC_FBXO5_nTerm_u is "@cell::FZR1(APC,FBXO5,nTerm~u)";
  species cell_FZR1_APC_FBXO5_nTerm_p in cell = 0.16112308; cell_FZR1_APC_FBXO5_nTerm_p is "@cell::FZR1(APC,FBXO5,nTerm~p)";
  species S19 in cell = 0.10894131; S19 is "@cell::APC(FBXO5!1,FZR1_CDC20!2,Ser355~u).FBXO5(APC!1,FZR1!3,Ser182~u).FZR1(APC!2,FBXO5!3,nTerm~u)";
  species cell_FBXO5_APC_FZR1_Ser182_u in cell = 0.00071781614; cell_FBXO5_APC_FZR1_Ser182_u is "@cell::FBXO5(APC,FZR1,Ser182~u)";
  species S21 in cell = 0.0022125471; S21 is "@cell::APC(FBXO5!1,FZR1_CDC20!2,Ser355~p).FBXO5(APC!1,FZR1!3,Ser182~u).FZR1(APC!2,FBXO5!3,nTerm~u)";
  species S22 in cell = 0.013607533; S22 is "@cell::APC(FBXO5,FZR1_CDC20!1,Ser355~p).FZR1(APC!1,FBXO5,nTerm~u)";
  species cell_FBXO5_APC_FZR1_Ser182_p in cell = 1.8804937e-5; cell_FBXO5_APC_FZR1_Ser182_p is "@cell::FBXO5(APC,FZR1,Ser182~p)";
  species cell_FOXM1_DBD_Thr600_u in cell = 0.0055647336; cell_FOXM1_DBD_Thr600_u is "@cell::FOXM1(DBD,Thr600~u)";
  species cell_FOXM1_DBD_Thr600_p in cell = 0.00038111617; cell_FOXM1_DBD_Thr600_p is "@cell::FOXM1(DBD,Thr600~p)";
  species S26 in cell = 1.9032592e-7; S26 is "@cell::CCNB_promoter(FOXM1!1).FOXM1(DBD!1,Thr600~p)";
  species cell_CCNB_promoter_FOXM1 in cell = 9.9809674e-5; cell_CCNB_promoter_FOXM1 is "@cell::CCNB_promoter(FOXM1)";
  species cell_CDC20_promoter_FOXM1 in cell = 9.9923815e-5; cell_CDC20_promoter_FOXM1 is "@cell::CDC20_promoter(FOXM1)";
  species S29 in cell = 7.6185347e-8; S29 is "@cell::CDC20_promoter(FOXM1!1).FOXM1(DBD!1,Thr600~p)";
  species cell_WEE1_Ser123_u in cell = 0.98044163; cell_WEE1_Ser123_u is "@cell::WEE1(Ser123~u)";
  species cell_CCNB_CDK1_Thr14_Tyr15_p in cell = 0.0075129148; cell_CCNB_CDK1_Thr14_Tyr15_p is "@cell::CCNB(CDK1_Thr14_Tyr15~p)";
  species cell_WEE1_Ser123_p in cell = 0.019558367; cell_WEE1_Ser123_p is "@cell::WEE1(Ser123~p)";
  species cell_CDC25_pSites_p in cell = 0.018438067; cell_CDC25_pSites_p is "@cell::CDC25(pSites~p)";
  species cell_CDC25_pSites_u in cell = 0.98156193; cell_CDC25_pSites_u is "@cell::CDC25(pSites~u)";
  species cell_MASTL_Thr198_u in cell = 0.99752571; cell_MASTL_Thr198_u is "@cell::MASTL(Thr198~u)";
  species cell_MASTL_Thr198_p in cell = 0.002474295; cell_MASTL_Thr198_p is "@cell::MASTL(Thr198~p)";
  species S37 in cell = 0.82686306; S37 is "@cell::ENSA_ARPP19(PPP2R2B,Ser62_Ser67~u)";
  species S38 in cell = 0.00032856116; S38 is "@cell::ENSA_ARPP19(PPP2R2B,Ser62_Ser67~p)";
  species S39 in cell = 0.17280837; S39 is "@cell::ENSA_ARPP19(PPP2R2B!1,Ser62_Ser67~p).PPP2R2B(ENSA_ARPP19!1)";
  species cell_CCNE_promoter_E2F in cell = 8.4479024e-5; cell_CCNE_promoter_E2F is "@cell::CCNE_promoter(E2F)";
  species cell_CCNA_promoter_E2F in cell = 8.4479024e-5; cell_CCNA_promoter_E2F is "@cell::CCNA_promoter(E2F)";
  species cell_E2F_promoter_E2F in cell = 8.4479024e-5; cell_E2F_promoter_E2F is "@cell::E2F_promoter(E2F)";
  species cell_FBXO5_promoter_E2F in cell = 8.4479024e-5; cell_FBXO5_promoter_E2F is "@cell::FBXO5_promoter(E2F)";
  species cell_FOXM1_promoter_E2F in cell = 8.4479024e-5; cell_FOXM1_promoter_E2F is "@cell::FOXM1_promoter(E2F)";
  species S45 in cell = 1.5520976e-5; S45 is "@cell::CCNE_promoter(E2F!1).E2F(DBD!1,RB1,Ser332~u)";
  species S46 in cell = 1.5520976e-5; S46 is "@cell::CCNA_promoter(E2F!1).E2F(DBD!1,RB1,Ser332~u)";
  species S47 in cell = 1.5520976e-5; S47 is "@cell::E2F(DBD!1,RB1,Ser332~u).E2F_promoter(E2F!1)";
  species S48 in cell = 1.5520976e-5; S48 is "@cell::E2F(DBD!1,RB1,Ser332~u).FBXO5_promoter(E2F!1)";
  species S49 in cell = 1.5520976e-5; S49 is "@cell::E2F(DBD!1,RB1,Ser332~u).FOXM1_promoter(E2F!1)";
  species S50 in cell = 0; S50 is "@cell::CCNE_promoter(E2F!1).E2F(DBD!1,RB1,Ser332~p)";
  species S51 in cell = 0; S51 is "@cell::CCNA_promoter(E2F!1).E2F(DBD!1,RB1,Ser332~p)";
  species S52 in cell = 0; S52 is "@cell::E2F(DBD!1,RB1,Ser332~p).E2F_promoter(E2F!1)";
  species S53 in cell = 0; S53 is "@cell::E2F(DBD!1,RB1,Ser332~p).FBXO5_promoter(E2F!1)";
  species S54 in cell = 0; S54 is "@cell::E2F(DBD!1,RB1,Ser332~p).FOXM1_promoter(E2F!1)";
  species cell_iWEE in cell = 0; cell_iWEE is "@cell::iWEE()";
  species cell_SKP2 in cell = 1; cell_SKP2 is "@cell::SKP2()";

  // Parameters:
  kPhRbD = 0.0055440055;
  kPhRbE = 0.0069300069;
  kDpRb = 0.0013860014;
  kPhRb = 0.020790021;
  kSyCe1 = 1.3860014e-5;
  kSyCe2 = 4.1580042;
  kDeCe = 0.00013860014;
  kDiE2fRb = 0.00034650035;
  kAsE2fRb = 0.34650035;
  kSyE2f1 = 6.9300069e-6;
  kSyE2f2 = 0.69300069;
  kDeE2f1 = 6.9300069e-5;
  kDeE2f2 = 0.0013860014;
  kPhE2f = 0.0013860014;
  kDpE2f2 = 0.069300069;
  kSyEmi1 = 3.4650035e-5;
  kSyEmi2 = 3.4650035;
  kDeEmi1 = 0.00034650035;
  kDeEmi2 = 0.00034650035;
  kDeEmi3 = 0.0034650035;
  kPhEmiA = 3.4650035e-5;
  kPhEmiB = 0.00017325017;
  kDpEmi = 3.4650035e-6;
  kSyCa1 = 6.9300069e-6;
  kSyCa2 = 0.51975052;
  kDeCa1 = 6.9300069e-6;
  kDeCa2 = 0.0027720028;
  kDeCa3 = 0.00069300069;
  kDpCdh = 0.0034650035;
  kPhCdhA = 0.017325017;
  kPhCdhE = 0.00069300069;
  kPhCdhB = 0.17325017;
  kDiACE = 0.00034650035;
  kAsACE = 0.34650035;
  kDiACdh = 0.00034650035;
  kAsACdh = 0.34650035;
  kPhCeA = 0.0069300069;
  kPhCeE = 6.9300069e-5;
  kPhFoxE = 0.00069300069;
  kPhFoxA = 0.00069300069;
  kPhFoxB = 0.0034650035;
  kDpFox = 3.4650035e-5;
  kSyCb1 = 6.9300069e-6;
  kSyCb2 = 0.51975052;
  kDeCb1 = 6.9300069e-6;
  kDeCb2 = 0.00086625087;
  kDeCb3 = 0.00086625087;
  kPhEnsa = 0.00069300069;
  kDpEnsa = 0.00034650035;
  kPhGw = 0.0069300069;
  kDpGw1 = 0.0017325017;
  kDpGw2 = 0.069300069;
  kWee1 = 6.9300069e-5;
  kWee2 = 0.0069300069;
  kPhWeeA = 0.00069300069;
  kPhWeeB = 0.0069300069;
  kDpWee = 0.069300069;
  kCdc25_1 = 0.00069300069;
  kCdc25_2 = 0.0069300069;
  kDpCdc25 = 0.069300069;
  kDipEB55 = 4.7124047e-5;
  kAspEB55 = 0.3950104;
  kSyCdc_1 = 6.9300069e-6;
  kSyCdc_2 = 0.69300069;
  kDeCdc_1 = 2.7720028e-5;
  kDeCdc_2 = 0.00027720028;
  kDipACdc = 0.00086625087;
  kAspACdc = 0.0069300069;
  kPhApcA = 6.9300069e-5;
  kDpApc_1 = 0;
  kDpApc_2 = 0.034650035;
  kSyFox1 = 6.9300069e-6;
  kSyFox2 = 0.51975052;
  kDeFox1 = 6.9300069e-6;
  kDeFox2 = 0.0034650035;
  kAsEPx = 0.34650035;
  kDiEPx = 0.034650035;
  kAsFPcb = 0.34650035;
  kDiFPcb = 0.069300069;
  kAsFPcdc = 0.34650035;
  kDiFPcdc = 0.17325017;
  kPhC25B = 0.0069300069;
  kPhCAEE = 0.00055440055;
  kPhCAEA = 0.013860014;
  kPhCAEB = 0.13860014;
  ikSyCb = 1;
  jiWee = 0.1;
  kDpE2f1 = 0;
  kPhC25A = 0;
  kSySkp2 = 0.0001;
  kDeSkp2_1 = 0.0001;
  kDeSkp2_2 = 0.002;
  _InitialConc1 = 1;
  _InitialConc2 = 0.23224914;
  _InitialConc3 = 0.018479024;
  _InitialConc4 = 3.8081857e-5;
  _InitialConc5 = 0.0070284949;
  _InitialConc6 = 0.0018823629;
  _InitialConc7 = 0.071461332;
  _InitialConc8 = 0.00015053859;
  _InitialConc9 = 0.087642687;
  _InitialConc10 = 0.84074544;
  _InitialConc11 = 0.077191625;
  _InitialConc12 = 4.0287133;
  _InitialConc13 = 0.22995279;
  _InitialConc14 = 0.069890078;
  _InitialConc15 = 0.063091065;
  _InitialConc16 = 0.71354419;
  _InitialConc17 = 0.00057134095;
  _InitialConc18 = 0.16112308;
  _InitialConc19 = 0.10894131;
  _InitialConc20 = 0.00071781614;
  _InitialConc21 = 0.0022125471;
  _InitialConc22 = 0.013607533;
  _InitialConc23 = 1.8804937e-5;
  _InitialConc24 = 0.0055647336;
  _InitialConc25 = 0.00038111617;
  _InitialConc26 = 1.9032592e-7;
  _InitialConc27 = 9.9809674e-5;
  _InitialConc28 = 9.9923815e-5;
  _InitialConc29 = 7.6185347e-8;
  _InitialConc30 = 0.98044163;
  _InitialConc31 = 0.0075129148;
  _InitialConc32 = 0.019558367;
  _InitialConc33 = 0.018438067;
  _InitialConc34 = 0.98156193;
  _InitialConc35 = 0.99752571;
  _InitialConc36 = 0.002474295;
  _InitialConc37 = 0.82686306;
  _InitialConc38 = 0.00032856116;
  _InitialConc39 = 0.17280837;
  _InitialConc40 = 8.4479024e-5;
  _InitialConc41 = 8.4479024e-5;
  _InitialConc42 = 8.4479024e-5;
  _InitialConc43 = 8.4479024e-5;
  _InitialConc44 = 8.4479024e-5;
  _InitialConc45 = 1.5520976e-5;
  _InitialConc46 = 1.5520976e-5;
  _InitialConc47 = 1.5520976e-5;
  _InitialConc48 = 1.5520976e-5;
  _InitialConc49 = 1.5520976e-5;
  _InitialConc50 = 0;
  _InitialConc51 = 0;
  _InitialConc52 = 0;
  _InitialConc53 = 0;
  _InitialConc54 = 0;
  _InitialConc55 = 0;
  _InitialConc56 = 1;
  _rateLaw1 = kSyCb1*ikSyCb;
  _rateLaw2 = kSyCb2*ikSyCb;

  // Reactions:
  R1: => cell_E2F_DBD_RB1_Ser332_u; kSyE2f1;
  R2: cell_FOXM1_DBD_Thr600_p + cell_CCNB_promoter_FOXM1 => S26; kAsFPcb*cell_FOXM1_DBD_Thr600_p*cell_CCNB_promoter_FOXM1;
  R3: S26 => cell_FOXM1_DBD_Thr600_p + cell_CCNB_promoter_FOXM1; kDiFPcb*S26;
  R4: S47 => cell_E2F_DBD_RB1_Ser332_u + S47; kSyE2f2*S47;
  R5: S52 => cell_E2F_DBD_RB1_Ser332_u + S52; kSyE2f2*S52;
  R6: cell_E2F_DBD_RB1_Ser332_u => ; kDeE2f1*cell_E2F_DBD_RB1_Ser332_u;
  R7: cell_E2F_DBD_RB1_Ser332_p => ; kDeE2f1*cell_E2F_DBD_RB1_Ser332_p;
  R8: S7 => cell_RB1_E2F_Ser807_Ser811_u; kDeE2f1*S7;
  R9: S8 => cell_RB1_E2F_Ser807_Ser811_u; kDeE2f1*S8;
  R10: S45 => cell_CCNE_promoter_E2F; kDeE2f1*S45;
  R11: S46 => cell_CCNA_promoter_E2F; kDeE2f1*S46;
  R12: S47 => cell_E2F_promoter_E2F; kDeE2f1*S47;
  R13: S48 => cell_FBXO5_promoter_E2F; kDeE2f1*S48;
  R14: S49 => cell_FOXM1_promoter_E2F; kDeE2f1*S49;
  R15: S50 => cell_CCNE_promoter_E2F; kDeE2f1*S50;
  R16: S51 => cell_CCNA_promoter_E2F; kDeE2f1*S51;
  R17: S52 => cell_E2F_promoter_E2F; kDeE2f1*S52;
  R18: S53 => cell_FBXO5_promoter_E2F; kDeE2f1*S53;
  R19: S54 => cell_FOXM1_promoter_E2F; kDeE2f1*S54;
  R20: cell_CCND + S7 => cell_CCND + cell_E2F_DBD_RB1_Ser332_u + cell_RB1_E2F_Ser807_Ser811_p; kPhRbD*cell_CCND*S7;
  R21: cell_CCND + S8 => cell_CCND + cell_E2F_DBD_RB1_Ser332_p + cell_RB1_E2F_Ser807_Ser811_p; kPhRbD*cell_CCND*S8;
  R22: cell_CCNE + S7 => cell_CCNE + cell_E2F_DBD_RB1_Ser332_u + cell_RB1_E2F_Ser807_Ser811_p; kPhRbE*cell_CCNE*S7;
  R23: cell_CCNE + S8 => cell_CCNE + cell_E2F_DBD_RB1_Ser332_p + cell_RB1_E2F_Ser807_Ser811_p; kPhRbE*cell_CCNE*S8;
  R24: cell_CCNA + S7 => cell_E2F_DBD_RB1_Ser332_u + cell_CCNA + cell_RB1_E2F_Ser807_Ser811_p; kPhRb*cell_CCNA*S7;
  R25: cell_CCNA + S8 => cell_E2F_DBD_RB1_Ser332_p + cell_CCNA + cell_RB1_E2F_Ser807_Ser811_p; kPhRb*cell_CCNA*S8;
  R26: cell_CCNB_CDK1_Thr14_Tyr15_u + S7 => cell_E2F_DBD_RB1_Ser332_u + cell_CCNB_CDK1_Thr14_Tyr15_u + cell_RB1_E2F_Ser807_Ser811_p; kPhRb*cell_CCNB_CDK1_Thr14_Tyr15_u*S7;
  R27: cell_CCNB_CDK1_Thr14_Tyr15_u + S8 => cell_E2F_DBD_RB1_Ser332_p + cell_CCNB_CDK1_Thr14_Tyr15_u + cell_RB1_E2F_Ser807_Ser811_p; kPhRb*cell_CCNB_CDK1_Thr14_Tyr15_u*S8;
  R28: cell_E2F_DBD_RB1_Ser332_u + cell_CCNA => cell_E2F_DBD_RB1_Ser332_p + cell_CCNA; kPhE2f*cell_E2F_DBD_RB1_Ser332_u*cell_CCNA;
  R29: cell_CCNA + S7 => cell_CCNA + S8; kPhE2f*cell_CCNA*S7;
  R30: cell_CCNA + S45 => cell_CCNA + S50; kPhE2f*cell_CCNA*S45;
  R31: cell_CCNA + S46 => cell_CCNA + S51; kPhE2f*cell_CCNA*S46;
  R32: cell_CCNA + S47 => cell_CCNA + S52; kPhE2f*cell_CCNA*S47;
  R33: cell_CCNA + S48 => cell_CCNA + S53; kPhE2f*cell_CCNA*S48;
  R34: cell_CCNA + S49 => cell_CCNA + S54; kPhE2f*cell_CCNA*S49;
  R35: cell_E2F_DBD_RB1_Ser332_u + cell_CCNB_CDK1_Thr14_Tyr15_u => cell_E2F_DBD_RB1_Ser332_p + cell_CCNB_CDK1_Thr14_Tyr15_u; kPhE2f*cell_E2F_DBD_RB1_Ser332_u*cell_CCNB_CDK1_Thr14_Tyr15_u;
  R36: cell_CCNB_CDK1_Thr14_Tyr15_u + S7 => cell_CCNB_CDK1_Thr14_Tyr15_u + S8; kPhE2f*cell_CCNB_CDK1_Thr14_Tyr15_u*S7;
  R37: cell_CCNB_CDK1_Thr14_Tyr15_u + S45 => cell_CCNB_CDK1_Thr14_Tyr15_u + S50; kPhE2f*cell_CCNB_CDK1_Thr14_Tyr15_u*S45;
  R38: cell_CCNB_CDK1_Thr14_Tyr15_u + S46 => cell_CCNB_CDK1_Thr14_Tyr15_u + S51; kPhE2f*cell_CCNB_CDK1_Thr14_Tyr15_u*S46;
  R39: cell_CCNB_CDK1_Thr14_Tyr15_u + S47 => cell_CCNB_CDK1_Thr14_Tyr15_u + S52; kPhE2f*cell_CCNB_CDK1_Thr14_Tyr15_u*S47;
  R40: cell_CCNB_CDK1_Thr14_Tyr15_u + S48 => cell_CCNB_CDK1_Thr14_Tyr15_u + S53; kPhE2f*cell_CCNB_CDK1_Thr14_Tyr15_u*S48;
  R41: cell_CCNB_CDK1_Thr14_Tyr15_u + S49 => cell_CCNB_CDK1_Thr14_Tyr15_u + S54; kPhE2f*cell_CCNB_CDK1_Thr14_Tyr15_u*S49;
  R42: cell_E2F_DBD_RB1_Ser332_p => cell_E2F_DBD_RB1_Ser332_u; kDpE2f1*cell_E2F_DBD_RB1_Ser332_p;
  R43: S8 => S7; kDpE2f1*S8;
  R44: S50 => S45; kDpE2f1*S50;
  R45: S51 => S46; kDpE2f1*S51;
  R46: S52 => S47; kDpE2f1*S52;
  R47: S53 => S48; kDpE2f1*S53;
  R48: S54 => S49; kDpE2f1*S54;
  R49: cell_E2F_DBD_RB1_Ser332_p + cell_PPP2R2B_ENSA_ARPP19 => cell_E2F_DBD_RB1_Ser332_u + cell_PPP2R2B_ENSA_ARPP19; kDpE2f2*cell_E2F_DBD_RB1_Ser332_p*cell_PPP2R2B_ENSA_ARPP19;
  R50: S8 + cell_PPP2R2B_ENSA_ARPP19 => S7 + cell_PPP2R2B_ENSA_ARPP19; kDpE2f2*S8*cell_PPP2R2B_ENSA_ARPP19;
  R51: cell_PPP2R2B_ENSA_ARPP19 + S50 => cell_PPP2R2B_ENSA_ARPP19 + S45; kDpE2f2*cell_PPP2R2B_ENSA_ARPP19*S50;
  R52: cell_PPP2R2B_ENSA_ARPP19 + S51 => cell_PPP2R2B_ENSA_ARPP19 + S46; kDpE2f2*cell_PPP2R2B_ENSA_ARPP19*S51;
  R53: cell_PPP2R2B_ENSA_ARPP19 + S52 => cell_PPP2R2B_ENSA_ARPP19 + S47; kDpE2f2*cell_PPP2R2B_ENSA_ARPP19*S52;
  R54: cell_PPP2R2B_ENSA_ARPP19 + S53 => cell_PPP2R2B_ENSA_ARPP19 + S48; kDpE2f2*cell_PPP2R2B_ENSA_ARPP19*S53;
  R55: cell_PPP2R2B_ENSA_ARPP19 + S54 => cell_PPP2R2B_ENSA_ARPP19 + S49; kDpE2f2*cell_PPP2R2B_ENSA_ARPP19*S54;
  R56: cell_E2F_DBD_RB1_Ser332_p + cell_SKP2 => cell_SKP2; kDeE2f2*cell_E2F_DBD_RB1_Ser332_p*cell_SKP2;
  R57: S8 + cell_SKP2 => cell_RB1_E2F_Ser807_Ser811_u + cell_SKP2; kDeE2f2*S8*cell_SKP2;
  R58: S50 + cell_SKP2 => cell_CCNE_promoter_E2F + cell_SKP2; kDeE2f2*S50*cell_SKP2;
  R59: S51 + cell_SKP2 => cell_CCNA_promoter_E2F + cell_SKP2; kDeE2f2*S51*cell_SKP2;
  R60: S52 + cell_SKP2 => cell_E2F_promoter_E2F + cell_SKP2; kDeE2f2*S52*cell_SKP2;
  R61: S53 + cell_SKP2 => cell_FBXO5_promoter_E2F + cell_SKP2; kDeE2f2*S53*cell_SKP2;
  R62: S54 + cell_SKP2 => cell_FOXM1_promoter_E2F + cell_SKP2; kDeE2f2*S54*cell_SKP2;
  R63: cell_CCND + cell_RB1_E2F_Ser807_Ser811_u => cell_CCND + cell_RB1_E2F_Ser807_Ser811_p; kPhRbD*cell_CCND*cell_RB1_E2F_Ser807_Ser811_u;
  R64: cell_CCNE + cell_RB1_E2F_Ser807_Ser811_u => cell_CCNE + cell_RB1_E2F_Ser807_Ser811_p; kPhRbE*cell_CCNE*cell_RB1_E2F_Ser807_Ser811_u;
  R65: cell_CCNA + cell_RB1_E2F_Ser807_Ser811_u => cell_CCNA + cell_RB1_E2F_Ser807_Ser811_p; kPhRb*cell_CCNA*cell_RB1_E2F_Ser807_Ser811_u;
  R66: cell_CCNB_CDK1_Thr14_Tyr15_u + cell_RB1_E2F_Ser807_Ser811_u => cell_CCNB_CDK1_Thr14_Tyr15_u + cell_RB1_E2F_Ser807_Ser811_p; kPhRb*cell_CCNB_CDK1_Thr14_Tyr15_u*cell_RB1_E2F_Ser807_Ser811_u;
  R67: => cell_CCNE; kSyCe1;
  R68: S46 => cell_CCNA + S46; kSyCa2*S46;
  R69: S51 => cell_CCNA + S51; kSyCa2*S51;
  R70: cell_CCNE => ; kDeCe*cell_CCNE;
  R71: cell_CCNE + cell_CCNE => cell_CCNE; kPhCeE*cell_CCNE*cell_CCNE;
  R72: cell_RB1_E2F_Ser807_Ser811_p => cell_RB1_E2F_Ser807_Ser811_u; kDpRb*cell_RB1_E2F_Ser807_Ser811_p;
  R73: S14 => S12 + cell_CDC20_APC; kDpApc_1*S14;
  R74: cell_PPP2R2B_ENSA_ARPP19 + S14 => cell_PPP2R2B_ENSA_ARPP19 + S12 + cell_CDC20_APC; kDpApc_2*cell_PPP2R2B_ENSA_ARPP19*S14;
  R75: cell_CCNA + S12 => cell_CCNA + S15; kPhApcA*cell_CCNA*S12;
  R76: cell_CCNA + S16 => cell_CCNA + S22; kPhApcA*cell_CCNA*S16;
  R77: cell_CCNA + S19 => cell_CCNA + S21; kPhApcA*cell_CCNA*S19;
  R78: cell_CCNB_CDK1_Thr14_Tyr15_u + S12 => cell_CCNB_CDK1_Thr14_Tyr15_u + S15; kPhApcA*cell_CCNB_CDK1_Thr14_Tyr15_u*S12;
  R79: cell_CCNB_CDK1_Thr14_Tyr15_u + S16 => cell_CCNB_CDK1_Thr14_Tyr15_u + S22; kPhApcA*cell_CCNB_CDK1_Thr14_Tyr15_u*S16;
  R80: cell_CCNB_CDK1_Thr14_Tyr15_u + S19 => cell_CCNB_CDK1_Thr14_Tyr15_u + S21; kPhApcA*cell_CCNB_CDK1_Thr14_Tyr15_u*S19;
  R81: S15 => S12; kDpApc_1*S15;
  R82: S21 => S19; kDpApc_1*S21;
  R83: S22 => S16; kDpApc_1*S22;
  R84: cell_PPP2R2B_ENSA_ARPP19 + S15 => cell_PPP2R2B_ENSA_ARPP19 + S12; kDpApc_2*cell_PPP2R2B_ENSA_ARPP19*S15;
  R85: cell_PPP2R2B_ENSA_ARPP19 + S21 => cell_PPP2R2B_ENSA_ARPP19 + S19; kDpApc_2*cell_PPP2R2B_ENSA_ARPP19*S21;
  R86: cell_PPP2R2B_ENSA_ARPP19 + S22 => cell_PPP2R2B_ENSA_ARPP19 + S16; kDpApc_2*cell_PPP2R2B_ENSA_ARPP19*S22;
  R87: cell_CCNA + S16 => cell_CCNA + S12 + cell_FZR1_APC_FBXO5_nTerm_p; kPhCdhA*cell_CCNA*S16;
  R88: cell_CCNA + S22 => cell_CCNA + S15 + cell_FZR1_APC_FBXO5_nTerm_p; kPhCdhA*cell_CCNA*S22;
  R89: cell_CCNE + S19 => cell_CCNE + S12 + cell_FZR1_APC_FBXO5_nTerm_p + cell_FBXO5_APC_FZR1_Ser182_u; kPhCAEE*cell_CCNE*S19;
  R90: cell_CCNE + S21 => cell_CCNE + S15 + cell_FZR1_APC_FBXO5_nTerm_p + cell_FBXO5_APC_FZR1_Ser182_u; kPhCAEE*cell_CCNE*S21;
  R91: cell_CCNA + S19 => cell_CCNA + S12 + cell_FZR1_APC_FBXO5_nTerm_p + cell_FBXO5_APC_FZR1_Ser182_u; kPhCAEA*cell_CCNA*S19;
  R92: cell_CCNA + S21 => cell_CCNA + S15 + cell_FZR1_APC_FBXO5_nTerm_p + cell_FBXO5_APC_FZR1_Ser182_u; kPhCAEA*cell_CCNA*S21;
  R93: cell_CCNB_CDK1_Thr14_Tyr15_u + S19 => cell_CCNB_CDK1_Thr14_Tyr15_u + S12 + cell_FZR1_APC_FBXO5_nTerm_p + cell_FBXO5_APC_FZR1_Ser182_u; kPhCAEB*cell_CCNB_CDK1_Thr14_Tyr15_u*S19;
  R94: cell_CCNB_CDK1_Thr14_Tyr15_u + S21 => cell_CCNB_CDK1_Thr14_Tyr15_u + S15 + cell_FZR1_APC_FBXO5_nTerm_p + cell_FBXO5_APC_FZR1_Ser182_u; kPhCAEB*cell_CCNB_CDK1_Thr14_Tyr15_u*S21;
  R95: cell_CCNE + S16 => cell_CCNE + S12 + cell_FZR1_APC_FBXO5_nTerm_p; kPhCdhE*cell_CCNE*S16;
  R96: cell_CCNE + S22 => cell_CCNE + S15 + cell_FZR1_APC_FBXO5_nTerm_p; kPhCdhE*cell_CCNE*S22;
  R97: S19 => S16; kDeEmi1*S19;
  R98: cell_FBXO5_APC_FZR1_Ser182_u => ; kDeEmi1*cell_FBXO5_APC_FZR1_Ser182_u;
  R99: S21 => S22; kDeEmi1*S21;
  R100: cell_FBXO5_APC_FZR1_Ser182_p => ; kDeEmi1*cell_FBXO5_APC_FZR1_Ser182_p;
  R101: S19 => S16; kDeEmi2*S19;
  R102: S21 => S22; kDeEmi2*S21;
  R103: cell_CCNA + S19 => cell_CCNA + S16 + cell_FBXO5_APC_FZR1_Ser182_p; kPhEmiA*cell_CCNA*S19;
  R104: cell_CCNA + S21 => cell_CCNA + S22 + cell_FBXO5_APC_FZR1_Ser182_p; kPhEmiA*cell_CCNA*S21;
  R105: cell_CCNB_CDK1_Thr14_Tyr15_u + S19 => cell_CCNB_CDK1_Thr14_Tyr15_u + S16 + cell_FBXO5_APC_FZR1_Ser182_p; kPhEmiB*cell_CCNB_CDK1_Thr14_Tyr15_u*S19;
  R106: cell_CCNB_CDK1_Thr14_Tyr15_u + S21 => cell_CCNB_CDK1_Thr14_Tyr15_u + S22 + cell_FBXO5_APC_FZR1_Ser182_p; kPhEmiB*cell_CCNB_CDK1_Thr14_Tyr15_u*S21;
  R107: cell_CCNA + cell_FBXO5_APC_FZR1_Ser182_u => cell_CCNA + cell_FBXO5_APC_FZR1_Ser182_p; kPhEmiA*cell_CCNA*cell_FBXO5_APC_FZR1_Ser182_u;
  R108: cell_CCNB_CDK1_Thr14_Tyr15_u + cell_FBXO5_APC_FZR1_Ser182_u => cell_CCNB_CDK1_Thr14_Tyr15_u + cell_FBXO5_APC_FZR1_Ser182_p; kPhEmiB*cell_CCNB_CDK1_Thr14_Tyr15_u*cell_FBXO5_APC_FZR1_Ser182_u;
  R109: cell_FBXO5_APC_FZR1_Ser182_p => cell_FBXO5_APC_FZR1_Ser182_u; kDpEmi*cell_FBXO5_APC_FZR1_Ser182_p;
  R110: cell_FBXO5_APC_FZR1_Ser182_p => ; kDeEmi3*cell_FBXO5_APC_FZR1_Ser182_p;
  R111: => cell_FOXM1_DBD_Thr600_u; kSyFox1;
  R112: S48 => cell_FBXO5_APC_FZR1_Ser182_u + S48; kSyEmi2*S48;
  R113: S53 => cell_FBXO5_APC_FZR1_Ser182_u + S53; kSyEmi2*S53;
  R114: cell_CCNE + cell_FZR1_APC_FBXO5_nTerm_u => cell_CCNE + cell_FZR1_APC_FBXO5_nTerm_p; kPhCdhE*cell_CCNE*cell_FZR1_APC_FBXO5_nTerm_u;
  R115: cell_CCNA + cell_FZR1_APC_FBXO5_nTerm_u => cell_CCNA + cell_FZR1_APC_FBXO5_nTerm_p; kPhCdhA*cell_CCNA*cell_FZR1_APC_FBXO5_nTerm_u;
  R116: cell_CCNB_CDK1_Thr14_Tyr15_u + cell_FZR1_APC_FBXO5_nTerm_u => cell_CCNB_CDK1_Thr14_Tyr15_u + cell_FZR1_APC_FBXO5_nTerm_p; kPhCdhB*cell_CCNB_CDK1_Thr14_Tyr15_u*cell_FZR1_APC_FBXO5_nTerm_u;
  R117: cell_FZR1_APC_FBXO5_nTerm_p => cell_FZR1_APC_FBXO5_nTerm_u; kDpCdh*cell_FZR1_APC_FBXO5_nTerm_p;
  R118: => cell_CCNA; kSyCa1;
  R119: cell_CCNA => ; kDeCa1*cell_CCNA;
  R120: cell_CCNE + cell_CCNA => cell_CCNA; kPhCeA*cell_CCNE*cell_CCNA;
  R121: cell_CCNA + S16 => S16; kDeCa2*cell_CCNA*S16;
  R122: cell_CCNA + S22 => S22; kDeCa2*cell_CCNA*S22;
  R123: cell_CCNA + S14 => S14; kDeCa3*cell_CCNA*S14;
  R124: S49 => cell_FOXM1_DBD_Thr600_u + S49; kSyFox2*S49;
  R125: S54 => cell_FOXM1_DBD_Thr600_u + S54; kSyFox2*S54;
  R126: cell_FOXM1_DBD_Thr600_u => ; kDeFox1*cell_FOXM1_DBD_Thr600_u;
  R127: cell_FOXM1_DBD_Thr600_p => ; kDeFox1*cell_FOXM1_DBD_Thr600_p;
  R128: S26 => cell_CCNB_promoter_FOXM1; kDeFox1*S26;
  R129: S29 => cell_CDC20_promoter_FOXM1; kDeFox1*S29;
  R130: S16 + cell_FOXM1_DBD_Thr600_u => S16; kDeFox2*S16*cell_FOXM1_DBD_Thr600_u;
  R131: S22 + cell_FOXM1_DBD_Thr600_u => S22; kDeFox2*S22*cell_FOXM1_DBD_Thr600_u;
  R132: S16 + cell_FOXM1_DBD_Thr600_p => S16; kDeFox2*S16*cell_FOXM1_DBD_Thr600_p;
  R133: S22 + cell_FOXM1_DBD_Thr600_p => S22; kDeFox2*S22*cell_FOXM1_DBD_Thr600_p;
  R134: S16 + S26 => S16 + cell_CCNB_promoter_FOXM1; kDeFox2*S16*S26;
  R135: S22 + S26 => S22 + cell_CCNB_promoter_FOXM1; kDeFox2*S22*S26;
  R136: S16 + S29 => S16 + cell_CDC20_promoter_FOXM1; kDeFox2*S16*S29;
  R137: S22 + S29 => S22 + cell_CDC20_promoter_FOXM1; kDeFox2*S22*S29;
  R138: cell_CCNE + cell_FOXM1_DBD_Thr600_u => cell_CCNE + cell_FOXM1_DBD_Thr600_p; kPhFoxE*cell_CCNE*cell_FOXM1_DBD_Thr600_u;
  R139: cell_CCNA + cell_FOXM1_DBD_Thr600_u => cell_CCNA + cell_FOXM1_DBD_Thr600_p; kPhFoxA*cell_CCNA*cell_FOXM1_DBD_Thr600_u;
  R140: cell_CCNB_CDK1_Thr14_Tyr15_u + cell_FOXM1_DBD_Thr600_u => cell_CCNB_CDK1_Thr14_Tyr15_u + cell_FOXM1_DBD_Thr600_p; kPhFoxB*cell_CCNB_CDK1_Thr14_Tyr15_u*cell_FOXM1_DBD_Thr600_u;
  R141: cell_FOXM1_DBD_Thr600_p => cell_FOXM1_DBD_Thr600_u; kDpFox*cell_FOXM1_DBD_Thr600_p;
  R142: S29 => cell_FOXM1_DBD_Thr600_u + cell_CDC20_promoter_FOXM1; kDpFox*S29;
  R143: S26 => cell_FOXM1_DBD_Thr600_u + cell_CCNB_promoter_FOXM1; kDpFox*S26;
  R144: => cell_CCNB_CDK1_Thr14_Tyr15_u; _rateLaw1;
  R145: S26 => cell_CCNB_CDK1_Thr14_Tyr15_u + S26; _rateLaw2*S26;
  R146: cell_CCNB_CDK1_Thr14_Tyr15_u => ; kDeCb1*cell_CCNB_CDK1_Thr14_Tyr15_u;
  R147: cell_CCNB_CDK1_Thr14_Tyr15_p => ; kDeCb1*cell_CCNB_CDK1_Thr14_Tyr15_p;
  R148: cell_CCNB_CDK1_Thr14_Tyr15_u + S16 => S16; kDeCb2*cell_CCNB_CDK1_Thr14_Tyr15_u*S16;
  R149: cell_CCNB_CDK1_Thr14_Tyr15_u + S22 => S22; kDeCb2*cell_CCNB_CDK1_Thr14_Tyr15_u*S22;
  R150: S16 + cell_CCNB_CDK1_Thr14_Tyr15_p => S16; kDeCb2*S16*cell_CCNB_CDK1_Thr14_Tyr15_p;
  R151: S22 + cell_CCNB_CDK1_Thr14_Tyr15_p => S22; kDeCb2*S22*cell_CCNB_CDK1_Thr14_Tyr15_p;
  R152: cell_CCNB_CDK1_Thr14_Tyr15_u + S14 => S14; kDeCb3*cell_CCNB_CDK1_Thr14_Tyr15_u*S14;
  R153: S14 + cell_CCNB_CDK1_Thr14_Tyr15_p => S14; kDeCb3*S14*cell_CCNB_CDK1_Thr14_Tyr15_p;
  R154: cell_CDC20_APC => ; kDeCdc_1*cell_CDC20_APC;
  R155: S14 => S15; kDeCdc_1*S14;
  R156: cell_CDC20_APC + S16 => S16; kDeCdc_2*cell_CDC20_APC*S16;
  R157: cell_CDC20_APC + S22 => S22; kDeCdc_2*cell_CDC20_APC*S22;
  R158: S14 + S16 => S15 + S16; kDeCdc_2*S14*S16;
  R159: S14 + S22 => S15 + S22; kDeCdc_2*S14*S22;
  R160: => cell_CDC20_APC; kSyCdc_1;
  R161: S29 => cell_CDC20_APC + S29; kSyCdc_2*S29;
  R162: cell_FOXM1_DBD_Thr600_p + cell_CDC20_promoter_FOXM1 => S29; kAsFPcdc*cell_FOXM1_DBD_Thr600_p*cell_CDC20_promoter_FOXM1;
  R163: S29 => cell_FOXM1_DBD_Thr600_p + cell_CDC20_promoter_FOXM1; kDiFPcdc*S29;
  R164: cell_CCNB_CDK1_Thr14_Tyr15_u + cell_WEE1_Ser123_u => cell_WEE1_Ser123_u + cell_CCNB_CDK1_Thr14_Tyr15_p; kWee2*cell_CCNB_CDK1_Thr14_Tyr15_u*cell_WEE1_Ser123_u;
  R165: cell_CCNB_CDK1_Thr14_Tyr15_u + cell_WEE1_Ser123_p => cell_CCNB_CDK1_Thr14_Tyr15_p + cell_WEE1_Ser123_p; kWee1*cell_CCNB_CDK1_Thr14_Tyr15_u*cell_WEE1_Ser123_p;
  R166: cell_CCNB_CDK1_Thr14_Tyr15_p + cell_CDC25_pSites_p => cell_CCNB_CDK1_Thr14_Tyr15_u + cell_CDC25_pSites_p; kCdc25_2*cell_CCNB_CDK1_Thr14_Tyr15_p*cell_CDC25_pSites_p;
  R167: cell_CCNB_CDK1_Thr14_Tyr15_p + cell_CDC25_pSites_u => cell_CCNB_CDK1_Thr14_Tyr15_u + cell_CDC25_pSites_u; kCdc25_1*cell_CCNB_CDK1_Thr14_Tyr15_p*cell_CDC25_pSites_u;
  R168: cell_CCNB_CDK1_Thr14_Tyr15_u + cell_CDC25_pSites_u => cell_CCNB_CDK1_Thr14_Tyr15_u + cell_CDC25_pSites_p; kPhC25B*cell_CCNB_CDK1_Thr14_Tyr15_u*cell_CDC25_pSites_u;
  R169: cell_CCNA + cell_CDC25_pSites_u => cell_CCNA + cell_CDC25_pSites_p; kPhC25A*cell_CCNA*cell_CDC25_pSites_u;
  R170: cell_PPP2R2B_ENSA_ARPP19 + cell_CDC25_pSites_p => cell_PPP2R2B_ENSA_ARPP19 + cell_CDC25_pSites_u; kDpCdc25*cell_PPP2R2B_ENSA_ARPP19*cell_CDC25_pSites_p;
  R171: cell_PPP2R2B_ENSA_ARPP19 + cell_WEE1_Ser123_p => cell_PPP2R2B_ENSA_ARPP19 + cell_WEE1_Ser123_u; kDpWee*cell_PPP2R2B_ENSA_ARPP19*cell_WEE1_Ser123_p;
  R172: cell_CCNA + cell_WEE1_Ser123_u => cell_CCNA + cell_WEE1_Ser123_p; kPhWeeA*cell_CCNA*cell_WEE1_Ser123_u;
  R173: cell_CCNB_CDK1_Thr14_Tyr15_u + cell_WEE1_Ser123_u => cell_CCNB_CDK1_Thr14_Tyr15_u + cell_WEE1_Ser123_p; kPhWeeB*cell_CCNB_CDK1_Thr14_Tyr15_u*cell_WEE1_Ser123_u;
  R174: cell_CCNB_CDK1_Thr14_Tyr15_u + cell_MASTL_Thr198_u => cell_CCNB_CDK1_Thr14_Tyr15_u + cell_MASTL_Thr198_p; kPhGw*cell_CCNB_CDK1_Thr14_Tyr15_u*cell_MASTL_Thr198_u;
  R175: cell_MASTL_Thr198_p => cell_MASTL_Thr198_u; kDpGw1*cell_MASTL_Thr198_p;
  R176: cell_PPP2R2B_ENSA_ARPP19 + cell_MASTL_Thr198_p => cell_PPP2R2B_ENSA_ARPP19 + cell_MASTL_Thr198_u; kDpGw2*cell_PPP2R2B_ENSA_ARPP19*cell_MASTL_Thr198_p;
  R177: cell_MASTL_Thr198_p + S37 => cell_MASTL_Thr198_p + S38; kPhEnsa*cell_MASTL_Thr198_p*S37;
  R178: S39 => cell_PPP2R2B_ENSA_ARPP19 + S37; kDpEnsa*S39;
  R179: => cell_FBXO5_APC_FZR1_Ser182_u; kSyEmi1;
  R180: S45 => cell_CCNE + S45; kSyCe2*S45;
  R181: S50 => cell_CCNE + S50; kSyCe2*S50;
  R182: cell_CCNB_CDK1_Thr14_Tyr15_u + S16 => cell_CCNB_CDK1_Thr14_Tyr15_u + S12 + cell_FZR1_APC_FBXO5_nTerm_p; kPhCdhB*cell_CCNB_CDK1_Thr14_Tyr15_u*S16;
  R183: cell_CCNB_CDK1_Thr14_Tyr15_u + S22 => cell_CCNB_CDK1_Thr14_Tyr15_u + S15 + cell_FZR1_APC_FBXO5_nTerm_p; kPhCdhB*cell_CCNB_CDK1_Thr14_Tyr15_u*S22;
  R184: cell_E2F_DBD_RB1_Ser332_u + cell_RB1_E2F_Ser807_Ser811_u => S7; kAsE2fRb*cell_E2F_DBD_RB1_Ser332_u*cell_RB1_E2F_Ser807_Ser811_u;
  R185: cell_E2F_DBD_RB1_Ser332_p + cell_RB1_E2F_Ser807_Ser811_u => S8; kAsE2fRb*cell_E2F_DBD_RB1_Ser332_p*cell_RB1_E2F_Ser807_Ser811_u;
  R186: S7 => cell_E2F_DBD_RB1_Ser332_u + cell_RB1_E2F_Ser807_Ser811_u; kDiE2fRb*S7;
  R187: S8 => cell_E2F_DBD_RB1_Ser332_p + cell_RB1_E2F_Ser807_Ser811_u; kDiE2fRb*S8;
  R188: S12 + cell_FZR1_APC_FBXO5_nTerm_u => S16; kAsACdh*S12*cell_FZR1_APC_FBXO5_nTerm_u;
  R189: S15 + cell_FZR1_APC_FBXO5_nTerm_u => S22; kAsACdh*S15*cell_FZR1_APC_FBXO5_nTerm_u;
  R190: S16 => S12 + cell_FZR1_APC_FBXO5_nTerm_u; kDiACdh*S16;
  R191: S22 => S15 + cell_FZR1_APC_FBXO5_nTerm_u; kDiACdh*S22;
  R192: S16 + cell_FBXO5_APC_FZR1_Ser182_u => S19; kAsACE*S16*cell_FBXO5_APC_FZR1_Ser182_u;
  R193: cell_FBXO5_APC_FZR1_Ser182_u + S22 => S21; kAsACE*cell_FBXO5_APC_FZR1_Ser182_u*S22;
  R194: S19 => S16 + cell_FBXO5_APC_FZR1_Ser182_u; kDiACE*S19;
  R195: S21 => cell_FBXO5_APC_FZR1_Ser182_u + S22; kDiACE*S21;
  R196: cell_CDC20_APC + S15 => S14; kAspACdc*cell_CDC20_APC*S15;
  R197: S14 => cell_CDC20_APC + S15; kDipACdc*S14;
  R198: cell_PPP2R2B_ENSA_ARPP19 + S38 => S39; kAspEB55*cell_PPP2R2B_ENSA_ARPP19*S38;
  R199: S39 => cell_PPP2R2B_ENSA_ARPP19 + S38; kDipEB55*S39;
  R200: cell_E2F_DBD_RB1_Ser332_u + cell_CCNE_promoter_E2F => S45; kAsEPx*cell_E2F_DBD_RB1_Ser332_u*cell_CCNE_promoter_E2F;
  R201: cell_E2F_DBD_RB1_Ser332_p + cell_CCNE_promoter_E2F => S50; kAsEPx*cell_E2F_DBD_RB1_Ser332_p*cell_CCNE_promoter_E2F;
  R202: S45 => cell_E2F_DBD_RB1_Ser332_u + cell_CCNE_promoter_E2F; kDiEPx*S45;
  R203: S50 => cell_E2F_DBD_RB1_Ser332_p + cell_CCNE_promoter_E2F; kDiEPx*S50;
  R204: cell_E2F_DBD_RB1_Ser332_u + cell_CCNA_promoter_E2F => S46; kAsEPx*cell_E2F_DBD_RB1_Ser332_u*cell_CCNA_promoter_E2F;
  R205: cell_E2F_DBD_RB1_Ser332_p + cell_CCNA_promoter_E2F => S51; kAsEPx*cell_E2F_DBD_RB1_Ser332_p*cell_CCNA_promoter_E2F;
  R206: S46 => cell_E2F_DBD_RB1_Ser332_u + cell_CCNA_promoter_E2F; kDiEPx*S46;
  R207: S51 => cell_E2F_DBD_RB1_Ser332_p + cell_CCNA_promoter_E2F; kDiEPx*S51;
  R208: cell_E2F_DBD_RB1_Ser332_u + cell_E2F_promoter_E2F => S47; kAsEPx*cell_E2F_DBD_RB1_Ser332_u*cell_E2F_promoter_E2F;
  R209: cell_E2F_DBD_RB1_Ser332_p + cell_E2F_promoter_E2F => S52; kAsEPx*cell_E2F_DBD_RB1_Ser332_p*cell_E2F_promoter_E2F;
  R210: S47 => cell_E2F_DBD_RB1_Ser332_u + cell_E2F_promoter_E2F; kDiEPx*S47;
  R211: S52 => cell_E2F_DBD_RB1_Ser332_p + cell_E2F_promoter_E2F; kDiEPx*S52;
  R212: cell_E2F_DBD_RB1_Ser332_u + cell_FBXO5_promoter_E2F => S48; kAsEPx*cell_E2F_DBD_RB1_Ser332_u*cell_FBXO5_promoter_E2F;
  R213: cell_E2F_DBD_RB1_Ser332_p + cell_FBXO5_promoter_E2F => S53; kAsEPx*cell_E2F_DBD_RB1_Ser332_p*cell_FBXO5_promoter_E2F;
  R214: S48 => cell_E2F_DBD_RB1_Ser332_u + cell_FBXO5_promoter_E2F; kDiEPx*S48;
  R215: S53 => cell_E2F_DBD_RB1_Ser332_p + cell_FBXO5_promoter_E2F; kDiEPx*S53;
  R216: cell_E2F_DBD_RB1_Ser332_u + cell_FOXM1_promoter_E2F => S49; kAsEPx*cell_E2F_DBD_RB1_Ser332_u*cell_FOXM1_promoter_E2F;
  R217: cell_E2F_DBD_RB1_Ser332_p + cell_FOXM1_promoter_E2F => S54; kAsEPx*cell_E2F_DBD_RB1_Ser332_p*cell_FOXM1_promoter_E2F;
  R218: S49 => cell_E2F_DBD_RB1_Ser332_u + cell_FOXM1_promoter_E2F; kDiEPx*S49;
  R219: S54 => cell_E2F_DBD_RB1_Ser332_p + cell_FOXM1_promoter_E2F; kDiEPx*S54;
  R220: => cell_SKP2; kSySkp2;
  R221: cell_SKP2 => ; kDeSkp2_1*cell_SKP2;
  R222: S16 + cell_SKP2 => S16; kDeSkp2_2*S16*cell_SKP2;
  R223: S22 + cell_SKP2 => S22; kDeSkp2_2*S22*cell_SKP2;
  R2: cell_FOXM1_DBD_Thr600_p + cell_CCNB_promoter_FOXM1 => S26; kAsFPcb*cell_FOXM1_DBD_Thr600_p*cell_CCNB_promoter_FOXM1;
  R3: S26 => cell_FOXM1_DBD_Thr600_p + cell_CCNB_promoter_FOXM1; kDiFPcb*S26;
  R2: cell_FOXM1_DBD_Thr600_p + cell_CCNB_promoter_FOXM1 => S26; kAsFPcb*cell_FOXM1_DBD_Thr600_p*cell_CCNB_promoter_FOXM1;
  R3: S26 => cell_FOXM1_DBD_Thr600_p + cell_CCNB_promoter_FOXM1; kDiFPcb*S26;
  R2: cell_FOXM1_DBD_Thr600_p + cell_CCNB_promoter_FOXM1 => S26; kAsFPcb*cell_FOXM1_DBD_Thr600_p*cell_CCNB_promoter_FOXM1;
  R3: S26 => cell_FOXM1_DBD_Thr600_p + cell_CCNB_promoter_FOXM1; kDiFPcb*S26;
  R28: cell_E2F_DBD_RB1_Ser332_u + cell_CCNA => cell_E2F_DBD_RB1_Ser332_p + cell_CCNA; kPhE2f*cell_E2F_DBD_RB1_Ser332_u*cell_CCNA;
  R20: cell_CCND + S7 => cell_CCND + cell_E2F_DBD_RB1_Ser332_u + cell_RB1_E2F_Ser807_Ser811_p; kPhRbD*cell_CCND*S7;
  R20: cell_CCND + S7 => cell_CCND + cell_E2F_DBD_RB1_Ser332_u + cell_RB1_E2F_Ser807_Ser811_p; kPhRbD*cell_CCND*S7;
  R20: cell_CCND + S7 => cell_CCND + cell_E2F_DBD_RB1_Ser332_u + cell_RB1_E2F_Ser807_Ser811_p; kPhRbD*cell_CCND*S7;
  R28: cell_E2F_DBD_RB1_Ser332_u + cell_CCNA => cell_E2F_DBD_RB1_Ser332_p + cell_CCNA; kPhE2f*cell_E2F_DBD_RB1_Ser332_u*cell_CCNA;
  R20: cell_CCND + S7 => cell_CCND + cell_E2F_DBD_RB1_Ser332_u + cell_RB1_E2F_Ser807_Ser811_p; kPhRbD*cell_CCND*S7;
  R20: cell_CCND + S7 => cell_CCND + cell_E2F_DBD_RB1_Ser332_u + cell_RB1_E2F_Ser807_Ser811_p; kPhRbD*cell_CCND*S7;
  R20: cell_CCND + S7 => cell_CCND + cell_E2F_DBD_RB1_Ser332_u + cell_RB1_E2F_Ser807_Ser811_p; kPhRbD*cell_CCND*S7;
  R28: cell_E2F_DBD_RB1_Ser332_u + cell_CCNA => cell_E2F_DBD_RB1_Ser332_p + cell_CCNA; kPhE2f*cell_E2F_DBD_RB1_Ser332_u*cell_CCNA;
  R20: cell_CCND + S7 => cell_CCND + cell_E2F_DBD_RB1_Ser332_u + cell_RB1_E2F_Ser807_Ser811_p; kPhRbD*cell_CCND*S7;
  R20: cell_CCND + S7 => cell_CCND + cell_E2F_DBD_RB1_Ser332_u + cell_RB1_E2F_Ser807_Ser811_p; kPhRbD*cell_CCND*S7;
  R20: cell_CCND + S7 => cell_CCND + cell_E2F_DBD_RB1_Ser332_u + cell_RB1_E2F_Ser807_Ser811_p; kPhRbD*cell_CCND*S7;
  R42: cell_E2F_DBD_RB1_Ser332_p => cell_E2F_DBD_RB1_Ser332_u; kDpE2f1*cell_E2F_DBD_RB1_Ser332_p;
end
