// SBML level 2 version 3

model cell_cycle_v3.1.0()

  // Compartments:
  compartment cell = 1;

  // Species:
  species cell_CCND in cell = 1/cell; cell_CCND is "@cell::CCND()";
  species cell_CCNE_CDKN1A in cell = 0.23224914/cell; cell_CCNE_CDKN1A is "@cell::CCNE(CDKN1A)";
  species cell_E2F_DBD_RB1_Ser332_u in cell = 0.018479024/cell; cell_E2F_DBD_RB1_Ser332_u is "@cell::E2F(DBD,RB1,Ser332~u)";
  species cell_E2F_DBD_RB1_Ser332_p in cell = 3.8081857e-5/cell; cell_E2F_DBD_RB1_Ser332_p is "@cell::E2F(DBD,RB1,Ser332~p)";
  species cell_CCNA_CDKN1A in cell = 0.0070284949/cell; cell_CCNA_CDKN1A is "@cell::CCNA(CDKN1A)";
  species S6 in cell = 0.0018823629/cell; S6 is "@cell::CCNB(CDK1_Thr14_Tyr15~u,CDKN1A)";
  species S7 in cell = 0.071461332/cell; S7 is "@cell::E2F(DBD,RB1!1,Ser332~u).RB1(E2F!1,Ser807_Ser811~u)";
  species S8 in cell = 0.00015053859/cell; S8 is "@cell::E2F(DBD,RB1!1,Ser332~p).RB1(E2F!1,Ser807_Ser811~u)";
  species cell_RB1_E2F_Ser807_Ser811_u in cell = 0.087642687/cell; cell_RB1_E2F_Ser807_Ser811_u is "@cell::RB1(E2F,Ser807_Ser811~u)";
  species cell_RB1_E2F_Ser807_Ser811_p in cell = 0.84074544/cell; cell_RB1_E2F_Ser807_Ser811_p is "@cell::RB1(E2F,Ser807_Ser811~p)";
  species cell_PPP2R2B_ENSA_ARPP19 in cell = 0.077191625/cell; cell_PPP2R2B_ENSA_ARPP19 is "@cell::PPP2R2B(ENSA_ARPP19)";
  species S12 in cell = 4.0287133/cell; S12 is "@cell::APC(FBXO5,FZR1_CDC20,Ser355~u)";
  species cell_CDC20_APC in cell = 0.22995279/cell; cell_CDC20_APC is "@cell::CDC20(APC)";
  species S14 in cell = 0.069890078/cell; S14 is "@cell::APC(FBXO5,FZR1_CDC20!1,Ser355~p).CDC20(APC!1)";
  species S15 in cell = 0.063091065/cell; S15 is "@cell::APC(FBXO5,FZR1_CDC20,Ser355~p)";
  species S16 in cell = 0.71354419/cell; S16 is "@cell::APC(FBXO5,FZR1_CDC20!1,Ser355~u).FZR1(APC!1,FBXO5,nTerm~u)";
  species cell_FZR1_APC_FBXO5_nTerm_u in cell = 0.00057134095/cell; cell_FZR1_APC_FBXO5_nTerm_u is "@cell::FZR1(APC,FBXO5,nTerm~u)";
  species cell_FZR1_APC_FBXO5_nTerm_p in cell = 0.16112308/cell; cell_FZR1_APC_FBXO5_nTerm_p is "@cell::FZR1(APC,FBXO5,nTerm~p)";
  species S19 in cell = 0.10894131/cell; S19 is "@cell::APC(FBXO5!1,FZR1_CDC20!2,Ser355~u).FBXO5(APC!1,FZR1!3,Ser182~u).FZR1(APC!2,FBXO5!3,nTerm~u)";
  species cell_FBXO5_APC_FZR1_Ser182_u in cell = 0.00071781614/cell; cell_FBXO5_APC_FZR1_Ser182_u is "@cell::FBXO5(APC,FZR1,Ser182~u)";
  species S21 in cell = 0.0022125471/cell; S21 is "@cell::APC(FBXO5!1,FZR1_CDC20!2,Ser355~p).FBXO5(APC!1,FZR1!3,Ser182~u).FZR1(APC!2,FBXO5!3,nTerm~u)";
  species S22 in cell = 0.013607533/cell; S22 is "@cell::APC(FBXO5,FZR1_CDC20!1,Ser355~p).FZR1(APC!1,FBXO5,nTerm~u)";
  species cell_FBXO5_APC_FZR1_Ser182_p in cell = 1.8804937e-5/cell; cell_FBXO5_APC_FZR1_Ser182_p is "@cell::FBXO5(APC,FZR1,Ser182~p)";
  species cell_FOXM1_DBD_Thr600_u in cell = 0.0055647336/cell; cell_FOXM1_DBD_Thr600_u is "@cell::FOXM1(DBD,Thr600~u)";
  species cell_FOXM1_DBD_Thr600_p in cell = 0.00038111617/cell; cell_FOXM1_DBD_Thr600_p is "@cell::FOXM1(DBD,Thr600~p)";
  species S26 in cell = 1.9032592e-7/cell; S26 is "@cell::CCNB_promoter(FOXM1!1).FOXM1(DBD!1,Thr600~p)";
  species cell_CCNB_promoter_FOXM1 in cell = 9.9809674e-5/cell; cell_CCNB_promoter_FOXM1 is "@cell::CCNB_promoter(FOXM1)";
  species cell_CDC20_promoter_FOXM1 in cell = 9.9923815e-5/cell; cell_CDC20_promoter_FOXM1 is "@cell::CDC20_promoter(FOXM1)";
  species S29 in cell = 7.6185347e-8/cell; S29 is "@cell::CDC20_promoter(FOXM1!1).FOXM1(DBD!1,Thr600~p)";
  species cell_WEE1_Ser123_u in cell = 0.98044163/cell; cell_WEE1_Ser123_u is "@cell::WEE1(Ser123~u)";
  species S31 in cell = 0.0075129148/cell; S31 is "@cell::CCNB(CDK1_Thr14_Tyr15~p,CDKN1A)";
  species cell_WEE1_Ser123_p in cell = 0.019558367/cell; cell_WEE1_Ser123_p is "@cell::WEE1(Ser123~p)";
  species cell_CDC25_pSites_p in cell = 0.018438067/cell; cell_CDC25_pSites_p is "@cell::CDC25(pSites~p)";
  species cell_CDC25_pSites_u in cell = 0.98156193/cell; cell_CDC25_pSites_u is "@cell::CDC25(pSites~u)";
  species cell_MASTL_Thr198_u in cell = 0.99752571/cell; cell_MASTL_Thr198_u is "@cell::MASTL(Thr198~u)";
  species cell_MASTL_Thr198_p in cell = 0.002474295/cell; cell_MASTL_Thr198_p is "@cell::MASTL(Thr198~p)";
  species S37 in cell = 0.82686306/cell; S37 is "@cell::ENSA_ARPP19(PPP2R2B,Ser62_Ser67~u)";
  species S38 in cell = 0.00032856116/cell; S38 is "@cell::ENSA_ARPP19(PPP2R2B,Ser62_Ser67~p)";
  species S39 in cell = 0.17280837/cell; S39 is "@cell::ENSA_ARPP19(PPP2R2B!1,Ser62_Ser67~p).PPP2R2B(ENSA_ARPP19!1)";
  species cell_CCNE_promoter_E2F in cell = 8.4479024e-5/cell; cell_CCNE_promoter_E2F is "@cell::CCNE_promoter(E2F)";
  species cell_CCNA_promoter_E2F in cell = 8.4479024e-5/cell; cell_CCNA_promoter_E2F is "@cell::CCNA_promoter(E2F)";
  species cell_E2F_promoter_E2F in cell = 8.4479024e-5/cell; cell_E2F_promoter_E2F is "@cell::E2F_promoter(E2F)";
  species cell_FBXO5_promoter_E2F in cell = 8.4479024e-5/cell; cell_FBXO5_promoter_E2F is "@cell::FBXO5_promoter(E2F)";
  species cell_FOXM1_promoter_E2F in cell = 8.4479024e-5/cell; cell_FOXM1_promoter_E2F is "@cell::FOXM1_promoter(E2F)";
  species S45 in cell = 1.5520976e-5/cell; S45 is "@cell::CCNE_promoter(E2F!1).E2F(DBD!1,RB1,Ser332~u)";
  species S46 in cell = 1.5520976e-5/cell; S46 is "@cell::CCNA_promoter(E2F!1).E2F(DBD!1,RB1,Ser332~u)";
  species S47 in cell = 1.5520976e-5/cell; S47 is "@cell::E2F(DBD!1,RB1,Ser332~u).E2F_promoter(E2F!1)";
  species S48 in cell = 1.5520976e-5/cell; S48 is "@cell::E2F(DBD!1,RB1,Ser332~u).FBXO5_promoter(E2F!1)";
  species S49 in cell = 1.5520976e-5/cell; S49 is "@cell::E2F(DBD!1,RB1,Ser332~u).FOXM1_promoter(E2F!1)";
  species S50 in cell = 0; S50 is "@cell::CCNE_promoter(E2F!1).E2F(DBD!1,RB1,Ser332~p)";
  species S51 in cell = 0; S51 is "@cell::CCNA_promoter(E2F!1).E2F(DBD!1,RB1,Ser332~p)";
  species S52 in cell = 0; S52 is "@cell::E2F(DBD!1,RB1,Ser332~p).E2F_promoter(E2F!1)";
  species S53 in cell = 0; S53 is "@cell::E2F(DBD!1,RB1,Ser332~p).FBXO5_promoter(E2F!1)";
  species S54 in cell = 0; S54 is "@cell::E2F(DBD!1,RB1,Ser332~p).FOXM1_promoter(E2F!1)";
  species cell_iWEE in cell = 0; cell_iWEE is "@cell::iWEE()";
  species cell_SKP2 in cell = 1/cell; cell_SKP2 is "@cell::SKP2()";
  species cell_TP53_DBD_Ser15_p in cell = 0; cell_TP53_DBD_Ser15_p is "@cell::TP53(DBD,Ser15~p)";
  species cell_CDKN1A_promoter_TP53 in cell = 0.0001/cell; cell_CDKN1A_promoter_TP53 is "@cell::CDKN1A_promoter(TP53)";
  species S59 in cell = 0; S59 is "@cell::CDKN1A_promoter(TP53!1).TP53(DBD!1,Ser15~p)";
  species cell_CDKN1A_CCNE_A_B_Ser130_u in cell = 0; cell_CDKN1A_CCNE_A_B_Ser130_u is "@cell::CDKN1A(CCNE_A_B,Ser130~u)";
  species S61 in cell = 0; S61 is "@cell::CCNA(CDKN1A!1).CDKN1A(CCNE_A_B!1,Ser130~u)";
  species S62 in cell = 0; S62 is "@cell::CCNE(CDKN1A!1).CDKN1A(CCNE_A_B!1,Ser130~u)";
  species S63 in cell = 0; S63 is "@cell::CCNB(CDK1_Thr14_Tyr15~u,CDKN1A!1).CDKN1A(CCNE_A_B!1,Ser130~u)";
  species S64 in cell = 0; S64 is "@cell::CCNB(CDK1_Thr14_Tyr15~p,CDKN1A!1).CDKN1A(CCNE_A_B!1,Ser130~u)";
  species cell_CDKN1A_CCNE_A_B_Ser130_p in cell = 0; cell_CDKN1A_CCNE_A_B_Ser130_p is "@cell::CDKN1A(CCNE_A_B,Ser130~p)";

  // Parameters:
  kPhRbD = 0.0055440055;
  kPhRbE = 0.0069300069;
  kDpRb = 0.0013860014;
  kPhRb = 0.020790021;
  kSyCe1 = 1.3860014e-5;
  kSyCe2 = 4.1580042;
  kDeCe = 0.00013860014;
  kDiE2fRb = 0.00034650035;
  kAsE2fRb = 0.34650035;
  kSyE2f1 = 6.9300069e-6;
  kSyE2f2 = 0.69300069;
  kDeE2f1 = 6.9300069e-5;
  kDeE2f2 = 0.0013860014;
  kPhE2f = 0.0013860014;
  kDpE2f2 = 0.069300069;
  kSyEmi1 = 3.4650035e-5;
  kSyEmi2 = 3.4650035;
  kDeEmi1 = 0.00034650035;
  kDeEmi2 = 0.00034650035;
  kDeEmi3 = 0.0034650035;
  kPhEmiA = 3.4650035e-5;
  kPhEmiB = 0.00017325017;
  kDpEmi = 3.4650035e-6;
  kSyCa1 = 6.9300069e-6;
  kSyCa2 = 0.51975052;
  kDeCa1 = 6.9300069e-6;
  kDeCa2 = 0.0027720028;
  kDeCa3 = 0.00069300069;
  kDpCdh = 0.0034650035;
  kPhCdhA = 0.017325017;
  kPhCdhE = 0.00069300069;
  kPhCdhB = 0.17325017;
  kDiACE = 0.00034650035;
  kAsACE = 0.34650035;
  kDiACdh = 0.00034650035;
  kAsACdh = 0.34650035;
  kPhCeA = 0.0069300069;
  kPhCeE = 6.9300069e-5;
  kPhFoxE = 0.00069300069;
  kPhFoxA = 0.00069300069;
  kPhFoxB = 0.0034650035;
  kDpFox = 1e-5;
  kSyCb1 = 6.9300069e-6;
  kSyCb2 = 0.51975052;
  kDeCb1 = 6.9300069e-6;
  kDeCb2 = 0.00086625087;
  kDeCb3 = 0.00086625087;
  kPhEnsa = 0.00069300069;
  kDpEnsa = 0.00034650035;
  kPhGw = 0.0069300069;
  kDpGw1 = 0.0017325017;
  kDpGw2 = 0.069300069;
  kWee1 = 6.9300069e-5;
  kWee2 = 0.0069300069;
  kPhWeeA = 0.00069300069;
  kPhWeeB = 0.0069300069;
  kDpWee = 0.069300069;
  kCdc25_1 = 0.00069300069;
  kCdc25_2 = 0.0069300069;
  kDpCdc25 = 0.069300069;
  kDipEB55 = 4.7124047e-5;
  kAspEB55 = 0.3950104;
  kSyCdc_1 = 6.9300069e-6;
  kSyCdc_2 = 0.69300069;
  kDeCdc_1 = 2.7720028e-5;
  kDeCdc_2 = 0.00027720028;
  kDipACdc = 0.00086625087;
  kAspACdc = 0.0069300069;
  kPhApcA = 6.9300069e-5;
  kDpApc_1 = 0;
  kDpApc_2 = 0.034650035;
  kSyFox1 = 6.9300069e-6;
  kSyFox2 = 0.51975052;
  kDeFox1 = 6.9300069e-6;
  kDeFox2 = 0.0034650035;
  kAsEPx = 0.34650035;
  kDiEPx = 0.034650035;
  kAsFPcb = 0.34650035;
  kDiFPcb = 0.069300069;
  kAsFPcdc = 0.34650035;
  kDiFPcdc = 0.17325017;
  kPhC25B = 0.0069300069;
  kPhCAEE = 0.00055440055;
  kPhCAEA = 0.013860014;
  kPhCAEB = 0.13860014;
  ikSyCb = 1;
  jiWee = 0.1;
  kDpE2f1 = 0;
  kPhC25A = 0;
  kSySkp2 = 0.0001;
  kDeSkp2_1 = 0.0001;
  kDeSkp2_2 = 0.002;
  kAsTP53PCDKN1A = 0.3;
  kDiTP53PCDKN1A = 0.15;
  kSyCDKN1A_1 = 1e-5;
  kSyCDKN1A_2 = 4;
  kDeCDKN1A_1 = 2e-5;
  kDeCDKN1A_2 = 0.00025;
  kAsCdkn1aC = 0.007;
  kDiCdkn1aC = 0.0003;
  kPhCDKN1AByCe = 0.005;
  kPhCDKN1AByCa = 0.0002;
  kPhCDKN1AByCb = 0.002;
  kDpCDKN1A = 0.002;
  _InitialConc1 = 1;
  _InitialConc2 = 0.23224914;
  _InitialConc3 = 0.018479024;
  _InitialConc4 = 3.8081857e-5;
  _InitialConc5 = 0.0070284949;
  _InitialConc6 = 0.0018823629;
  _InitialConc7 = 0.071461332;
  _InitialConc8 = 0.00015053859;
  _InitialConc9 = 0.087642687;
  _InitialConc10 = 0.84074544;
  _InitialConc11 = 0.077191625;
  _InitialConc12 = 4.0287133;
  _InitialConc13 = 0.22995279;
  _InitialConc14 = 0.069890078;
  _InitialConc15 = 0.063091065;
  _InitialConc16 = 0.71354419;
  _InitialConc17 = 0.00057134095;
  _InitialConc18 = 0.16112308;
  _InitialConc19 = 0.10894131;
  _InitialConc20 = 0.00071781614;
  _InitialConc21 = 0.0022125471;
  _InitialConc22 = 0.013607533;
  _InitialConc23 = 1.8804937e-5;
  _InitialConc24 = 0.0055647336;
  _InitialConc25 = 0.00038111617;
  _InitialConc26 = 1.9032592e-7;
  _InitialConc27 = 9.9809674e-5;
  _InitialConc28 = 9.9923815e-5;
  _InitialConc29 = 7.6185347e-8;
  _InitialConc30 = 0.98044163;
  _InitialConc31 = 0.0075129148;
  _InitialConc32 = 0.019558367;
  _InitialConc33 = 0.018438067;
  _InitialConc34 = 0.98156193;
  _InitialConc35 = 0.99752571;
  _InitialConc36 = 0.002474295;
  _InitialConc37 = 0.82686306;
  _InitialConc38 = 0.00032856116;
  _InitialConc39 = 0.17280837;
  _InitialConc40 = 8.4479024e-5;
  _InitialConc41 = 8.4479024e-5;
  _InitialConc42 = 8.4479024e-5;
  _InitialConc43 = 8.4479024e-5;
  _InitialConc44 = 8.4479024e-5;
  _InitialConc45 = 1.5520976e-5;
  _InitialConc46 = 1.5520976e-5;
  _InitialConc47 = 1.5520976e-5;
  _InitialConc48 = 1.5520976e-5;
  _InitialConc49 = 1.5520976e-5;
  _InitialConc50 = 0;
  _InitialConc51 = 0;
  _InitialConc52 = 0;
  _InitialConc53 = 0;
  _InitialConc54 = 0;
  _InitialConc55 = 0;
  _InitialConc56 = 1;
  _InitialConc57 = 0;
  _InitialConc58 = 0.0001;
  _rateLaw1 = kSyCb1*ikSyCb;
  _rateLaw2 = kSyCb2*ikSyCb;

  // Assignment rules:
  tCCNE := cell_CCNE_CDKN1A + S62;
  tCCNA := cell_CCNA_CDKN1A + S61;
  tCCNB := S6 + S31 + S63 + S64;
  tCDKN1A := cell_CDKN1A_CCNE_A_B_Ser130_u + S61 + S62 + S63 + S64 + cell_CDKN1A_CCNE_A_B_Ser130_p;

  // Reactions:
  R1: => cell_E2F_DBD_RB1_Ser332_u; kSyE2f1*cell;
  R2: cell_FOXM1_DBD_Thr600_p + cell_CCNB_promoter_FOXM1 => S26; kAsFPcb*cell_FOXM1_DBD_Thr600_p*cell_CCNB_promoter_FOXM1*cell;
  R3: S26 => cell_FOXM1_DBD_Thr600_p + cell_CCNB_promoter_FOXM1; kDiFPcb*S26*cell;
  R4: S47 => cell_E2F_DBD_RB1_Ser332_u + S47; kSyE2f2*S47*cell;
  R5: S52 => cell_E2F_DBD_RB1_Ser332_u + S52; kSyE2f2*S52*cell;
  R6: cell_E2F_DBD_RB1_Ser332_u => ; kDeE2f1*cell_E2F_DBD_RB1_Ser332_u*cell;
  R7: cell_E2F_DBD_RB1_Ser332_p => ; kDeE2f1*cell_E2F_DBD_RB1_Ser332_p*cell;
  R8: S7 => cell_RB1_E2F_Ser807_Ser811_u; kDeE2f1*S7*cell;
  R9: S8 => cell_RB1_E2F_Ser807_Ser811_u; kDeE2f1*S8*cell;
  R10: S45 => cell_CCNE_promoter_E2F; kDeE2f1*S45*cell;
  R11: S46 => cell_CCNA_promoter_E2F; kDeE2f1*S46*cell;
  R12: S47 => cell_E2F_promoter_E2F; kDeE2f1*S47*cell;
  R13: S48 => cell_FBXO5_promoter_E2F; kDeE2f1*S48*cell;
  R14: S49 => cell_FOXM1_promoter_E2F; kDeE2f1*S49*cell;
  R15: S50 => cell_CCNE_promoter_E2F; kDeE2f1*S50*cell;
  R16: S51 => cell_CCNA_promoter_E2F; kDeE2f1*S51*cell;
  R17: S52 => cell_E2F_promoter_E2F; kDeE2f1*S52*cell;
  R18: S53 => cell_FBXO5_promoter_E2F; kDeE2f1*S53*cell;
  R19: S54 => cell_FOXM1_promoter_E2F; kDeE2f1*S54*cell;
  R20: cell_CCND + S7 => cell_CCND + cell_E2F_DBD_RB1_Ser332_u + cell_RB1_E2F_Ser807_Ser811_p; kPhRbD*cell_CCND*S7*cell;
  R21: cell_CCND + S8 => cell_CCND + cell_E2F_DBD_RB1_Ser332_p + cell_RB1_E2F_Ser807_Ser811_p; kPhRbD*cell_CCND*S8*cell;
  R22: cell_CCNE_CDKN1A + S7 => cell_CCNE_CDKN1A + cell_E2F_DBD_RB1_Ser332_u + cell_RB1_E2F_Ser807_Ser811_p; kPhRbE*cell_CCNE_CDKN1A*S7*cell;
  R23: cell_CCNE_CDKN1A + S8 => cell_CCNE_CDKN1A + cell_E2F_DBD_RB1_Ser332_p + cell_RB1_E2F_Ser807_Ser811_p; kPhRbE*cell_CCNE_CDKN1A*S8*cell;
  R24: cell_CCNA_CDKN1A + S7 => cell_E2F_DBD_RB1_Ser332_u + cell_CCNA_CDKN1A + cell_RB1_E2F_Ser807_Ser811_p; kPhRb*cell_CCNA_CDKN1A*S7*cell;
  R25: cell_CCNA_CDKN1A + S8 => cell_E2F_DBD_RB1_Ser332_p + cell_CCNA_CDKN1A + cell_RB1_E2F_Ser807_Ser811_p; kPhRb*cell_CCNA_CDKN1A*S8*cell;
  R26: S6 + S7 => cell_E2F_DBD_RB1_Ser332_u + S6 + cell_RB1_E2F_Ser807_Ser811_p; kPhRb*S6*S7*cell;
  R27: S6 + S8 => cell_E2F_DBD_RB1_Ser332_p + S6 + cell_RB1_E2F_Ser807_Ser811_p; kPhRb*S6*S8*cell;
  R28: cell_E2F_DBD_RB1_Ser332_u + cell_CCNA_CDKN1A => cell_E2F_DBD_RB1_Ser332_p + cell_CCNA_CDKN1A; kPhE2f*cell_E2F_DBD_RB1_Ser332_u*cell_CCNA_CDKN1A*cell;
  R29: cell_CCNA_CDKN1A + S7 => cell_CCNA_CDKN1A + S8; kPhE2f*cell_CCNA_CDKN1A*S7*cell;
  R30: cell_CCNA_CDKN1A + S45 => cell_CCNA_CDKN1A + S50; kPhE2f*cell_CCNA_CDKN1A*S45*cell;
  R31: cell_CCNA_CDKN1A + S46 => cell_CCNA_CDKN1A + S51; kPhE2f*cell_CCNA_CDKN1A*S46*cell;
  R32: cell_CCNA_CDKN1A + S47 => cell_CCNA_CDKN1A + S52; kPhE2f*cell_CCNA_CDKN1A*S47*cell;
  R33: cell_CCNA_CDKN1A + S48 => cell_CCNA_CDKN1A + S53; kPhE2f*cell_CCNA_CDKN1A*S48*cell;
  R34: cell_CCNA_CDKN1A + S49 => cell_CCNA_CDKN1A + S54; kPhE2f*cell_CCNA_CDKN1A*S49*cell;
  R35: cell_E2F_DBD_RB1_Ser332_u + S6 => cell_E2F_DBD_RB1_Ser332_p + S6; kPhE2f*cell_E2F_DBD_RB1_Ser332_u*S6*cell;
  R36: S6 + S7 => S6 + S8; kPhE2f*S6*S7*cell;
  R37: S6 + S45 => S6 + S50; kPhE2f*S6*S45*cell;
  R38: S6 + S46 => S6 + S51; kPhE2f*S6*S46*cell;
  R39: S6 + S47 => S6 + S52; kPhE2f*S6*S47*cell;
  R40: S6 + S48 => S6 + S53; kPhE2f*S6*S48*cell;
  R41: S6 + S49 => S6 + S54; kPhE2f*S6*S49*cell;
  R42: cell_E2F_DBD_RB1_Ser332_p => cell_E2F_DBD_RB1_Ser332_u; kDpE2f1*cell_E2F_DBD_RB1_Ser332_p*cell;
  R43: S8 => S7; kDpE2f1*S8*cell;
  R44: S50 => S45; kDpE2f1*S50*cell;
  R45: S51 => S46; kDpE2f1*S51*cell;
  R46: S52 => S47; kDpE2f1*S52*cell;
  R47: S53 => S48; kDpE2f1*S53*cell;
  R48: S54 => S49; kDpE2f1*S54*cell;
  R49: cell_E2F_DBD_RB1_Ser332_p + cell_PPP2R2B_ENSA_ARPP19 => cell_E2F_DBD_RB1_Ser332_u + cell_PPP2R2B_ENSA_ARPP19; kDpE2f2*cell_E2F_DBD_RB1_Ser332_p*cell_PPP2R2B_ENSA_ARPP19*cell;
  R50: S8 + cell_PPP2R2B_ENSA_ARPP19 => S7 + cell_PPP2R2B_ENSA_ARPP19; kDpE2f2*S8*cell_PPP2R2B_ENSA_ARPP19*cell;
  R51: cell_PPP2R2B_ENSA_ARPP19 + S50 => cell_PPP2R2B_ENSA_ARPP19 + S45; kDpE2f2*cell_PPP2R2B_ENSA_ARPP19*S50*cell;
  R52: cell_PPP2R2B_ENSA_ARPP19 + S51 => cell_PPP2R2B_ENSA_ARPP19 + S46; kDpE2f2*cell_PPP2R2B_ENSA_ARPP19*S51*cell;
  R53: cell_PPP2R2B_ENSA_ARPP19 + S52 => cell_PPP2R2B_ENSA_ARPP19 + S47; kDpE2f2*cell_PPP2R2B_ENSA_ARPP19*S52*cell;
  R54: cell_PPP2R2B_ENSA_ARPP19 + S53 => cell_PPP2R2B_ENSA_ARPP19 + S48; kDpE2f2*cell_PPP2R2B_ENSA_ARPP19*S53*cell;
  R55: cell_PPP2R2B_ENSA_ARPP19 + S54 => cell_PPP2R2B_ENSA_ARPP19 + S49; kDpE2f2*cell_PPP2R2B_ENSA_ARPP19*S54*cell;
  R56: cell_E2F_DBD_RB1_Ser332_p + cell_SKP2 => cell_SKP2; kDeE2f2*cell_E2F_DBD_RB1_Ser332_p*cell_SKP2*cell;
  R57: S8 + cell_SKP2 => cell_RB1_E2F_Ser807_Ser811_u + cell_SKP2; kDeE2f2*S8*cell_SKP2*cell;
  R58: S50 + cell_SKP2 => cell_CCNE_promoter_E2F + cell_SKP2; kDeE2f2*S50*cell_SKP2*cell;
  R59: S51 + cell_SKP2 => cell_CCNA_promoter_E2F + cell_SKP2; kDeE2f2*S51*cell_SKP2*cell;
  R60: S52 + cell_SKP2 => cell_E2F_promoter_E2F + cell_SKP2; kDeE2f2*S52*cell_SKP2*cell;
  R61: S53 + cell_SKP2 => cell_FBXO5_promoter_E2F + cell_SKP2; kDeE2f2*S53*cell_SKP2*cell;
  R62: S54 + cell_SKP2 => cell_FOXM1_promoter_E2F + cell_SKP2; kDeE2f2*S54*cell_SKP2*cell;
  R63: cell_CCND + cell_RB1_E2F_Ser807_Ser811_u => cell_CCND + cell_RB1_E2F_Ser807_Ser811_p; kPhRbD*cell_CCND*cell_RB1_E2F_Ser807_Ser811_u*cell;
  R64: cell_CCNE_CDKN1A + cell_RB1_E2F_Ser807_Ser811_u => cell_CCNE_CDKN1A + cell_RB1_E2F_Ser807_Ser811_p; kPhRbE*cell_CCNE_CDKN1A*cell_RB1_E2F_Ser807_Ser811_u*cell;
  R65: cell_CCNA_CDKN1A + cell_RB1_E2F_Ser807_Ser811_u => cell_CCNA_CDKN1A + cell_RB1_E2F_Ser807_Ser811_p; kPhRb*cell_CCNA_CDKN1A*cell_RB1_E2F_Ser807_Ser811_u*cell;
  R66: S6 + cell_RB1_E2F_Ser807_Ser811_u => S6 + cell_RB1_E2F_Ser807_Ser811_p; kPhRb*S6*cell_RB1_E2F_Ser807_Ser811_u*cell;
  R67: => cell_CCNE_CDKN1A; kSyCe1*cell;
  R68: S46 => cell_CCNA_CDKN1A + S46; kSyCa2*S46*cell;
  R69: S51 => cell_CCNA_CDKN1A + S51; kSyCa2*S51*cell;
  R70: cell_CCNE_CDKN1A => ; kDeCe*cell_CCNE_CDKN1A*cell;
  R71: cell_CCNE_CDKN1A + cell_CCNE_CDKN1A => cell_CCNE_CDKN1A; kPhCeE*cell_CCNE_CDKN1A*cell_CCNE_CDKN1A*cell;
  R72: cell_RB1_E2F_Ser807_Ser811_p => cell_RB1_E2F_Ser807_Ser811_u; kDpRb*cell_RB1_E2F_Ser807_Ser811_p*cell;
  R73: S14 => S12 + cell_CDC20_APC; kDpApc_1*S14*cell;
  R74: cell_PPP2R2B_ENSA_ARPP19 + S14 => cell_PPP2R2B_ENSA_ARPP19 + S12 + cell_CDC20_APC; kDpApc_2*cell_PPP2R2B_ENSA_ARPP19*S14*cell;
  R75: cell_CCNA_CDKN1A + S12 => cell_CCNA_CDKN1A + S15; kPhApcA*cell_CCNA_CDKN1A*S12*cell;
  R76: cell_CCNA_CDKN1A + S16 => cell_CCNA_CDKN1A + S22; kPhApcA*cell_CCNA_CDKN1A*S16*cell;
  R77: cell_CCNA_CDKN1A + S19 => cell_CCNA_CDKN1A + S21; kPhApcA*cell_CCNA_CDKN1A*S19*cell;
  R78: S6 + S12 => S6 + S15; kPhApcA*S6*S12*cell;
  R79: S6 + S16 => S6 + S22; kPhApcA*S6*S16*cell;
  R80: S6 + S19 => S6 + S21; kPhApcA*S6*S19*cell;
  R81: S15 => S12; kDpApc_1*S15*cell;
  R82: S21 => S19; kDpApc_1*S21*cell;
  R83: S22 => S16; kDpApc_1*S22*cell;
  R84: cell_PPP2R2B_ENSA_ARPP19 + S15 => cell_PPP2R2B_ENSA_ARPP19 + S12; kDpApc_2*cell_PPP2R2B_ENSA_ARPP19*S15*cell;
  R85: cell_PPP2R2B_ENSA_ARPP19 + S21 => cell_PPP2R2B_ENSA_ARPP19 + S19; kDpApc_2*cell_PPP2R2B_ENSA_ARPP19*S21*cell;
  R86: cell_PPP2R2B_ENSA_ARPP19 + S22 => cell_PPP2R2B_ENSA_ARPP19 + S16; kDpApc_2*cell_PPP2R2B_ENSA_ARPP19*S22*cell;
  R87: cell_CCNA_CDKN1A + S16 => cell_CCNA_CDKN1A + S12 + cell_FZR1_APC_FBXO5_nTerm_p; kPhCdhA*cell_CCNA_CDKN1A*S16*cell;
  R88: cell_CCNA_CDKN1A + S22 => cell_CCNA_CDKN1A + S15 + cell_FZR1_APC_FBXO5_nTerm_p; kPhCdhA*cell_CCNA_CDKN1A*S22*cell;
  R89: cell_CCNE_CDKN1A + S19 => cell_CCNE_CDKN1A + S12 + cell_FZR1_APC_FBXO5_nTerm_p + cell_FBXO5_APC_FZR1_Ser182_u; kPhCAEE*cell_CCNE_CDKN1A*S19*cell;
  R90: cell_CCNE_CDKN1A + S21 => cell_CCNE_CDKN1A + S15 + cell_FZR1_APC_FBXO5_nTerm_p + cell_FBXO5_APC_FZR1_Ser182_u; kPhCAEE*cell_CCNE_CDKN1A*S21*cell;
  R91: cell_CCNA_CDKN1A + S19 => cell_CCNA_CDKN1A + S12 + cell_FZR1_APC_FBXO5_nTerm_p + cell_FBXO5_APC_FZR1_Ser182_u; kPhCAEA*cell_CCNA_CDKN1A*S19*cell;
  R92: cell_CCNA_CDKN1A + S21 => cell_CCNA_CDKN1A + S15 + cell_FZR1_APC_FBXO5_nTerm_p + cell_FBXO5_APC_FZR1_Ser182_u; kPhCAEA*cell_CCNA_CDKN1A*S21*cell;
  R93: S6 + S19 => S6 + S12 + cell_FZR1_APC_FBXO5_nTerm_p + cell_FBXO5_APC_FZR1_Ser182_u; kPhCAEB*S6*S19*cell;
  R94: S6 + S21 => S6 + S15 + cell_FZR1_APC_FBXO5_nTerm_p + cell_FBXO5_APC_FZR1_Ser182_u; kPhCAEB*S6*S21*cell;
  R95: cell_CCNE_CDKN1A + S16 => cell_CCNE_CDKN1A + S12 + cell_FZR1_APC_FBXO5_nTerm_p; kPhCdhE*cell_CCNE_CDKN1A*S16*cell;
  R96: cell_CCNE_CDKN1A + S22 => cell_CCNE_CDKN1A + S15 + cell_FZR1_APC_FBXO5_nTerm_p; kPhCdhE*cell_CCNE_CDKN1A*S22*cell;
  R97: S19 => S16; kDeEmi1*S19*cell;
  R98: cell_FBXO5_APC_FZR1_Ser182_u => ; kDeEmi1*cell_FBXO5_APC_FZR1_Ser182_u*cell;
  R99: S21 => S22; kDeEmi1*S21*cell;
  R100: cell_FBXO5_APC_FZR1_Ser182_p => ; kDeEmi1*cell_FBXO5_APC_FZR1_Ser182_p*cell;
  R101: S19 => S16; kDeEmi2*S19*cell;
  R102: S21 => S22; kDeEmi2*S21*cell;
  R103: cell_CCNA_CDKN1A + S19 => cell_CCNA_CDKN1A + S16 + cell_FBXO5_APC_FZR1_Ser182_p; kPhEmiA*cell_CCNA_CDKN1A*S19*cell;
  R104: cell_CCNA_CDKN1A + S21 => cell_CCNA_CDKN1A + S22 + cell_FBXO5_APC_FZR1_Ser182_p; kPhEmiA*cell_CCNA_CDKN1A*S21*cell;
  R105: S6 + S19 => S6 + S16 + cell_FBXO5_APC_FZR1_Ser182_p; kPhEmiB*S6*S19*cell;
  R106: S6 + S21 => S6 + S22 + cell_FBXO5_APC_FZR1_Ser182_p; kPhEmiB*S6*S21*cell;
  R107: cell_CCNA_CDKN1A + cell_FBXO5_APC_FZR1_Ser182_u => cell_CCNA_CDKN1A + cell_FBXO5_APC_FZR1_Ser182_p; kPhEmiA*cell_CCNA_CDKN1A*cell_FBXO5_APC_FZR1_Ser182_u*cell;
  R108: S6 + cell_FBXO5_APC_FZR1_Ser182_u => S6 + cell_FBXO5_APC_FZR1_Ser182_p; kPhEmiB*S6*cell_FBXO5_APC_FZR1_Ser182_u*cell;
  R109: cell_FBXO5_APC_FZR1_Ser182_p => cell_FBXO5_APC_FZR1_Ser182_u; kDpEmi*cell_FBXO5_APC_FZR1_Ser182_p*cell;
  R110: cell_FBXO5_APC_FZR1_Ser182_p => ; kDeEmi3*cell_FBXO5_APC_FZR1_Ser182_p*cell;
  R111: => cell_FOXM1_DBD_Thr600_u; kSyFox1*cell;
  R112: S48 => cell_FBXO5_APC_FZR1_Ser182_u + S48; kSyEmi2*S48*cell;
  R113: S53 => cell_FBXO5_APC_FZR1_Ser182_u + S53; kSyEmi2*S53*cell;
  R114: cell_CCNE_CDKN1A + cell_FZR1_APC_FBXO5_nTerm_u => cell_CCNE_CDKN1A + cell_FZR1_APC_FBXO5_nTerm_p; kPhCdhE*cell_CCNE_CDKN1A*cell_FZR1_APC_FBXO5_nTerm_u*cell;
  R115: cell_CCNA_CDKN1A + cell_FZR1_APC_FBXO5_nTerm_u => cell_CCNA_CDKN1A + cell_FZR1_APC_FBXO5_nTerm_p; kPhCdhA*cell_CCNA_CDKN1A*cell_FZR1_APC_FBXO5_nTerm_u*cell;
  R116: S6 + cell_FZR1_APC_FBXO5_nTerm_u => S6 + cell_FZR1_APC_FBXO5_nTerm_p; kPhCdhB*S6*cell_FZR1_APC_FBXO5_nTerm_u*cell;
  R117: cell_FZR1_APC_FBXO5_nTerm_p => cell_FZR1_APC_FBXO5_nTerm_u; kDpCdh*cell_FZR1_APC_FBXO5_nTerm_p*cell;
  R118: => cell_CCNA_CDKN1A; kSyCa1*cell;
  R119: cell_CCNA_CDKN1A => ; kDeCa1*cell_CCNA_CDKN1A*cell;
  R120: cell_CCNE_CDKN1A + cell_CCNA_CDKN1A => cell_CCNA_CDKN1A; kPhCeA*cell_CCNE_CDKN1A*cell_CCNA_CDKN1A*cell;
  R121: cell_CCNA_CDKN1A + S16 => S16; kDeCa2*cell_CCNA_CDKN1A*S16*cell;
  R122: cell_CCNA_CDKN1A + S22 => S22; kDeCa2*cell_CCNA_CDKN1A*S22*cell;
  R123: cell_CCNA_CDKN1A + S14 => S14; kDeCa3*cell_CCNA_CDKN1A*S14*cell;
  R124: S49 => cell_FOXM1_DBD_Thr600_u + S49; kSyFox2*S49*cell;
  R125: S54 => cell_FOXM1_DBD_Thr600_u + S54; kSyFox2*S54*cell;
  R126: cell_FOXM1_DBD_Thr600_u => ; kDeFox1*cell_FOXM1_DBD_Thr600_u*cell;
  R127: cell_FOXM1_DBD_Thr600_p => ; kDeFox1*cell_FOXM1_DBD_Thr600_p*cell;
  R128: S26 => cell_CCNB_promoter_FOXM1; kDeFox1*S26*cell;
  R129: S29 => cell_CDC20_promoter_FOXM1; kDeFox1*S29*cell;
  R130: S16 + cell_FOXM1_DBD_Thr600_u => S16; kDeFox2*S16*cell_FOXM1_DBD_Thr600_u*cell;
  R131: S22 + cell_FOXM1_DBD_Thr600_u => S22; kDeFox2*S22*cell_FOXM1_DBD_Thr600_u*cell;
  R132: S16 + cell_FOXM1_DBD_Thr600_p => S16; kDeFox2*S16*cell_FOXM1_DBD_Thr600_p*cell;
  R133: S22 + cell_FOXM1_DBD_Thr600_p => S22; kDeFox2*S22*cell_FOXM1_DBD_Thr600_p*cell;
  R134: S16 + S26 => S16 + cell_CCNB_promoter_FOXM1; kDeFox2*S16*S26*cell;
  R135: S22 + S26 => S22 + cell_CCNB_promoter_FOXM1; kDeFox2*S22*S26*cell;
  R136: S16 + S29 => S16 + cell_CDC20_promoter_FOXM1; kDeFox2*S16*S29*cell;
  R137: S22 + S29 => S22 + cell_CDC20_promoter_FOXM1; kDeFox2*S22*S29*cell;
  R138: cell_CCNE_CDKN1A + cell_FOXM1_DBD_Thr600_u => cell_CCNE_CDKN1A + cell_FOXM1_DBD_Thr600_p; kPhFoxE*cell_CCNE_CDKN1A*cell_FOXM1_DBD_Thr600_u*cell;
  R139: cell_CCNA_CDKN1A + cell_FOXM1_DBD_Thr600_u => cell_CCNA_CDKN1A + cell_FOXM1_DBD_Thr600_p; kPhFoxA*cell_CCNA_CDKN1A*cell_FOXM1_DBD_Thr600_u*cell;
  R140: S6 + cell_FOXM1_DBD_Thr600_u => S6 + cell_FOXM1_DBD_Thr600_p; kPhFoxB*S6*cell_FOXM1_DBD_Thr600_u*cell;
  R141: cell_FOXM1_DBD_Thr600_p => cell_FOXM1_DBD_Thr600_u; kDpFox*cell_FOXM1_DBD_Thr600_p*cell;
  R142: S29 => cell_FOXM1_DBD_Thr600_u + cell_CDC20_promoter_FOXM1; kDpFox*S29*cell;
  R143: S26 => cell_FOXM1_DBD_Thr600_u + cell_CCNB_promoter_FOXM1; kDpFox*S26*cell;
  R144: => S6; _rateLaw1*cell;
  R145: S26 => S6 + S26; _rateLaw2*S26*cell;
  R146: S6 => ; kDeCb1*S6*cell;
  R147: S31 => ; kDeCb1*S31*cell;
  R148: S6 + S16 => S16; kDeCb2*S6*S16*cell;
  R149: S6 + S22 => S22; kDeCb2*S6*S22*cell;
  R150: S16 + S31 => S16; kDeCb2*S16*S31*cell;
  R151: S22 + S31 => S22; kDeCb2*S22*S31*cell;
  R152: S6 + S14 => S14; kDeCb3*S6*S14*cell;
  R153: S14 + S31 => S14; kDeCb3*S14*S31*cell;
  R154: cell_CDC20_APC => ; kDeCdc_1*cell_CDC20_APC*cell;
  R155: S14 => S15; kDeCdc_1*S14*cell;
  R156: cell_CDC20_APC + S16 => S16; kDeCdc_2*cell_CDC20_APC*S16*cell;
  R157: cell_CDC20_APC + S22 => S22; kDeCdc_2*cell_CDC20_APC*S22*cell;
  R158: S14 + S16 => S15 + S16; kDeCdc_2*S14*S16*cell;
  R159: S14 + S22 => S15 + S22; kDeCdc_2*S14*S22*cell;
  R160: => cell_CDC20_APC; kSyCdc_1*cell;
  R161: S29 => cell_CDC20_APC + S29; kSyCdc_2*S29*cell;
  R162: cell_FOXM1_DBD_Thr600_p + cell_CDC20_promoter_FOXM1 => S29; kAsFPcdc*cell_FOXM1_DBD_Thr600_p*cell_CDC20_promoter_FOXM1*cell;
  R163: S29 => cell_FOXM1_DBD_Thr600_p + cell_CDC20_promoter_FOXM1; kDiFPcdc*S29*cell;
  R164: S6 + cell_WEE1_Ser123_u => cell_WEE1_Ser123_u + S31; kWee2*S6*cell_WEE1_Ser123_u*cell;
  R165: S6 + cell_WEE1_Ser123_p => S31 + cell_WEE1_Ser123_p; kWee1*S6*cell_WEE1_Ser123_p*cell;
  R166: S31 + cell_CDC25_pSites_p => S6 + cell_CDC25_pSites_p; kCdc25_2*S31*cell_CDC25_pSites_p*cell;
  R167: S31 + cell_CDC25_pSites_u => S6 + cell_CDC25_pSites_u; kCdc25_1*S31*cell_CDC25_pSites_u*cell;
  R168: S6 + cell_CDC25_pSites_u => S6 + cell_CDC25_pSites_p; kPhC25B*S6*cell_CDC25_pSites_u*cell;
  R169: cell_CCNA_CDKN1A + cell_CDC25_pSites_u => cell_CCNA_CDKN1A + cell_CDC25_pSites_p; kPhC25A*cell_CCNA_CDKN1A*cell_CDC25_pSites_u*cell;
  R170: cell_PPP2R2B_ENSA_ARPP19 + cell_CDC25_pSites_p => cell_PPP2R2B_ENSA_ARPP19 + cell_CDC25_pSites_u; kDpCdc25*cell_PPP2R2B_ENSA_ARPP19*cell_CDC25_pSites_p*cell;
  R171: cell_PPP2R2B_ENSA_ARPP19 + cell_WEE1_Ser123_p => cell_PPP2R2B_ENSA_ARPP19 + cell_WEE1_Ser123_u; kDpWee*cell_PPP2R2B_ENSA_ARPP19*cell_WEE1_Ser123_p*cell;
  R172: cell_CCNA_CDKN1A + cell_WEE1_Ser123_u => cell_CCNA_CDKN1A + cell_WEE1_Ser123_p; kPhWeeA*cell_CCNA_CDKN1A*cell_WEE1_Ser123_u*cell;
  R173: S6 + cell_WEE1_Ser123_u => S6 + cell_WEE1_Ser123_p; kPhWeeB*S6*cell_WEE1_Ser123_u*cell;
  R174: S6 + cell_MASTL_Thr198_u => S6 + cell_MASTL_Thr198_p; kPhGw*S6*cell_MASTL_Thr198_u*cell;
  R175: cell_MASTL_Thr198_p => cell_MASTL_Thr198_u; kDpGw1*cell_MASTL_Thr198_p*cell;
  R176: cell_PPP2R2B_ENSA_ARPP19 + cell_MASTL_Thr198_p => cell_PPP2R2B_ENSA_ARPP19 + cell_MASTL_Thr198_u; kDpGw2*cell_PPP2R2B_ENSA_ARPP19*cell_MASTL_Thr198_p*cell;
  R177: cell_MASTL_Thr198_p + S37 => cell_MASTL_Thr198_p + S38; kPhEnsa*cell_MASTL_Thr198_p*S37*cell;
  R178: S39 => cell_PPP2R2B_ENSA_ARPP19 + S37; kDpEnsa*S39*cell;
  R179: => cell_FBXO5_APC_FZR1_Ser182_u; kSyEmi1*cell;
  R180: S45 => cell_CCNE_CDKN1A + S45; kSyCe2*S45*cell;
  R181: S50 => cell_CCNE_CDKN1A + S50; kSyCe2*S50*cell;
  R182: S6 + S16 => S6 + S12 + cell_FZR1_APC_FBXO5_nTerm_p; kPhCdhB*S6*S16*cell;
  R183: S6 + S22 => S6 + S15 + cell_FZR1_APC_FBXO5_nTerm_p; kPhCdhB*S6*S22*cell;
  R184: cell_E2F_DBD_RB1_Ser332_u + cell_RB1_E2F_Ser807_Ser811_u => S7; kAsE2fRb*cell_E2F_DBD_RB1_Ser332_u*cell_RB1_E2F_Ser807_Ser811_u*cell;
  R185: cell_E2F_DBD_RB1_Ser332_p + cell_RB1_E2F_Ser807_Ser811_u => S8; kAsE2fRb*cell_E2F_DBD_RB1_Ser332_p*cell_RB1_E2F_Ser807_Ser811_u*cell;
  R186: S7 => cell_E2F_DBD_RB1_Ser332_u + cell_RB1_E2F_Ser807_Ser811_u; kDiE2fRb*S7*cell;
  R187: S8 => cell_E2F_DBD_RB1_Ser332_p + cell_RB1_E2F_Ser807_Ser811_u; kDiE2fRb*S8*cell;
  R188: S12 + cell_FZR1_APC_FBXO5_nTerm_u => S16; kAsACdh*S12*cell_FZR1_APC_FBXO5_nTerm_u*cell;
  R189: S15 + cell_FZR1_APC_FBXO5_nTerm_u => S22; kAsACdh*S15*cell_FZR1_APC_FBXO5_nTerm_u*cell;
  R190: S16 => S12 + cell_FZR1_APC_FBXO5_nTerm_u; kDiACdh*S16*cell;
  R191: S22 => S15 + cell_FZR1_APC_FBXO5_nTerm_u; kDiACdh*S22*cell;
  R192: S16 + cell_FBXO5_APC_FZR1_Ser182_u => S19; kAsACE*S16*cell_FBXO5_APC_FZR1_Ser182_u*cell;
  R193: cell_FBXO5_APC_FZR1_Ser182_u + S22 => S21; kAsACE*cell_FBXO5_APC_FZR1_Ser182_u*S22*cell;
  R194: S19 => S16 + cell_FBXO5_APC_FZR1_Ser182_u; kDiACE*S19*cell;
  R195: S21 => cell_FBXO5_APC_FZR1_Ser182_u + S22; kDiACE*S21*cell;
  R196: cell_CDC20_APC + S15 => S14; kAspACdc*cell_CDC20_APC*S15*cell;
  R197: S14 => cell_CDC20_APC + S15; kDipACdc*S14*cell;
  R198: cell_PPP2R2B_ENSA_ARPP19 + S38 => S39; kAspEB55*cell_PPP2R2B_ENSA_ARPP19*S38*cell;
  R199: S39 => cell_PPP2R2B_ENSA_ARPP19 + S38; kDipEB55*S39*cell;
  R200: cell_E2F_DBD_RB1_Ser332_u + cell_CCNE_promoter_E2F => S45; kAsEPx*cell_E2F_DBD_RB1_Ser332_u*cell_CCNE_promoter_E2F*cell;
  R201: cell_E2F_DBD_RB1_Ser332_p + cell_CCNE_promoter_E2F => S50; kAsEPx*cell_E2F_DBD_RB1_Ser332_p*cell_CCNE_promoter_E2F*cell;
  R202: S45 => cell_E2F_DBD_RB1_Ser332_u + cell_CCNE_promoter_E2F; kDiEPx*S45*cell;
  R203: S50 => cell_E2F_DBD_RB1_Ser332_p + cell_CCNE_promoter_E2F; kDiEPx*S50*cell;
  R204: cell_E2F_DBD_RB1_Ser332_u + cell_CCNA_promoter_E2F => S46; kAsEPx*cell_E2F_DBD_RB1_Ser332_u*cell_CCNA_promoter_E2F*cell;
  R205: cell_E2F_DBD_RB1_Ser332_p + cell_CCNA_promoter_E2F => S51; kAsEPx*cell_E2F_DBD_RB1_Ser332_p*cell_CCNA_promoter_E2F*cell;
  R206: S46 => cell_E2F_DBD_RB1_Ser332_u + cell_CCNA_promoter_E2F; kDiEPx*S46*cell;
  R207: S51 => cell_E2F_DBD_RB1_Ser332_p + cell_CCNA_promoter_E2F; kDiEPx*S51*cell;
  R208: cell_E2F_DBD_RB1_Ser332_u + cell_E2F_promoter_E2F => S47; kAsEPx*cell_E2F_DBD_RB1_Ser332_u*cell_E2F_promoter_E2F*cell;
  R209: cell_E2F_DBD_RB1_Ser332_p + cell_E2F_promoter_E2F => S52; kAsEPx*cell_E2F_DBD_RB1_Ser332_p*cell_E2F_promoter_E2F*cell;
  R210: S47 => cell_E2F_DBD_RB1_Ser332_u + cell_E2F_promoter_E2F; kDiEPx*S47*cell;
  R211: S52 => cell_E2F_DBD_RB1_Ser332_p + cell_E2F_promoter_E2F; kDiEPx*S52*cell;
  R212: cell_E2F_DBD_RB1_Ser332_u + cell_FBXO5_promoter_E2F => S48; kAsEPx*cell_E2F_DBD_RB1_Ser332_u*cell_FBXO5_promoter_E2F*cell;
  R213: cell_E2F_DBD_RB1_Ser332_p + cell_FBXO5_promoter_E2F => S53; kAsEPx*cell_E2F_DBD_RB1_Ser332_p*cell_FBXO5_promoter_E2F*cell;
  R214: S48 => cell_E2F_DBD_RB1_Ser332_u + cell_FBXO5_promoter_E2F; kDiEPx*S48*cell;
  R215: S53 => cell_E2F_DBD_RB1_Ser332_p + cell_FBXO5_promoter_E2F; kDiEPx*S53*cell;
  R216: cell_E2F_DBD_RB1_Ser332_u + cell_FOXM1_promoter_E2F => S49; kAsEPx*cell_E2F_DBD_RB1_Ser332_u*cell_FOXM1_promoter_E2F*cell;
  R217: cell_E2F_DBD_RB1_Ser332_p + cell_FOXM1_promoter_E2F => S54; kAsEPx*cell_E2F_DBD_RB1_Ser332_p*cell_FOXM1_promoter_E2F*cell;
  R218: S49 => cell_E2F_DBD_RB1_Ser332_u + cell_FOXM1_promoter_E2F; kDiEPx*S49*cell;
  R219: S54 => cell_E2F_DBD_RB1_Ser332_p + cell_FOXM1_promoter_E2F; kDiEPx*S54*cell;
  R220: => cell_SKP2; kSySkp2*cell;
  R221: cell_SKP2 => ; kDeSkp2_1*cell_SKP2*cell;
  R222: S16 + cell_SKP2 => S16; kDeSkp2_2*S16*cell_SKP2*cell;
  R223: S22 + cell_SKP2 => S22; kDeSkp2_2*S22*cell_SKP2*cell;
  R224: cell_TP53_DBD_Ser15_p + cell_CDKN1A_promoter_TP53 => S59; kAsTP53PCDKN1A*cell_TP53_DBD_Ser15_p*cell_CDKN1A_promoter_TP53*cell;
  R225: => cell_CDKN1A_CCNE_A_B_Ser130_u; kSyCDKN1A_1*cell;
  R226: S59 => cell_TP53_DBD_Ser15_p + cell_CDKN1A_promoter_TP53; kDiTP53PCDKN1A*S59*cell;
  R227: S59 => S59 + cell_CDKN1A_CCNE_A_B_Ser130_u; kSyCDKN1A_2*S59*cell;
  R228: cell_CDKN1A_CCNE_A_B_Ser130_u => ; kDeCDKN1A_1*cell_CDKN1A_CCNE_A_B_Ser130_u*cell;
  R229: cell_SKP2 + cell_CDKN1A_CCNE_A_B_Ser130_u => cell_SKP2; kDeCDKN1A_2*cell_SKP2*cell_CDKN1A_CCNE_A_B_Ser130_u*cell;
  R230: cell_CCNA_CDKN1A + cell_CDKN1A_CCNE_A_B_Ser130_u => S61; kAsCdkn1aC*cell_CCNA_CDKN1A*cell_CDKN1A_CCNE_A_B_Ser130_u*cell;
  R231: cell_CCNE_CDKN1A + cell_CDKN1A_CCNE_A_B_Ser130_u => S62; kAsCdkn1aC*cell_CCNE_CDKN1A*cell_CDKN1A_CCNE_A_B_Ser130_u*cell;
  R232: S6 + cell_CDKN1A_CCNE_A_B_Ser130_u => S63; kAsCdkn1aC*S6*cell_CDKN1A_CCNE_A_B_Ser130_u*cell;
  R233: S31 + cell_CDKN1A_CCNE_A_B_Ser130_u => S64; kAsCdkn1aC*S31*cell_CDKN1A_CCNE_A_B_Ser130_u*cell;
  R234: cell_CCNE_CDKN1A + cell_CDKN1A_CCNE_A_B_Ser130_u => cell_CCNE_CDKN1A + cell_CDKN1A_CCNE_A_B_Ser130_p; kPhCDKN1AByCe*cell_CCNE_CDKN1A*cell_CDKN1A_CCNE_A_B_Ser130_u*cell;
  R235: cell_CCNA_CDKN1A + cell_CDKN1A_CCNE_A_B_Ser130_u => cell_CCNA_CDKN1A + cell_CDKN1A_CCNE_A_B_Ser130_p; kPhCDKN1AByCa*cell_CCNA_CDKN1A*cell_CDKN1A_CCNE_A_B_Ser130_u*cell;
  R236: S6 + cell_CDKN1A_CCNE_A_B_Ser130_u => S6 + cell_CDKN1A_CCNE_A_B_Ser130_p; kPhCDKN1AByCb*S6*cell_CDKN1A_CCNE_A_B_Ser130_u*cell;
  R237: S62 => cell_CDKN1A_CCNE_A_B_Ser130_u; kDeCe*S62*cell;
  R238: cell_CCNE_CDKN1A + S62 => cell_CCNE_CDKN1A + cell_CDKN1A_CCNE_A_B_Ser130_u; kPhCeE*cell_CCNE_CDKN1A*S62*cell;
  R239: S61 => cell_CDKN1A_CCNE_A_B_Ser130_u; kDeCa1*S61*cell;
  R240: cell_CCNA_CDKN1A + S62 => cell_CCNA_CDKN1A + cell_CDKN1A_CCNE_A_B_Ser130_u; kPhCeA*cell_CCNA_CDKN1A*S62*cell;
  R241: S16 + S61 => S16 + cell_CDKN1A_CCNE_A_B_Ser130_u; kDeCa2*S16*S61*cell;
  R242: S22 + S61 => S22 + cell_CDKN1A_CCNE_A_B_Ser130_u; kDeCa2*S22*S61*cell;
  R243: S14 + S61 => S14 + cell_CDKN1A_CCNE_A_B_Ser130_u; kDeCa3*S14*S61*cell;
  R244: S63 => cell_CDKN1A_CCNE_A_B_Ser130_u; kDeCb1*S63*cell;
  R245: S64 => cell_CDKN1A_CCNE_A_B_Ser130_u; kDeCb1*S64*cell;
  R246: S16 + S63 => S16 + cell_CDKN1A_CCNE_A_B_Ser130_u; kDeCb2*S16*S63*cell;
  R247: S22 + S63 => S22 + cell_CDKN1A_CCNE_A_B_Ser130_u; kDeCb2*S22*S63*cell;
  R248: S16 + S64 => S16 + cell_CDKN1A_CCNE_A_B_Ser130_u; kDeCb2*S16*S64*cell;
  R249: S22 + S64 => S22 + cell_CDKN1A_CCNE_A_B_Ser130_u; kDeCb2*S22*S64*cell;
  R250: S14 + S63 => S14 + cell_CDKN1A_CCNE_A_B_Ser130_u; kDeCb3*S14*S63*cell;
  R251: S14 + S64 => S14 + cell_CDKN1A_CCNE_A_B_Ser130_u; kDeCb3*S14*S64*cell;
  R252: cell_WEE1_Ser123_u + S63 => cell_WEE1_Ser123_u + S64; kWee2*cell_WEE1_Ser123_u*S63*cell;
  R253: cell_WEE1_Ser123_p + S63 => cell_WEE1_Ser123_p + S64; kWee1*cell_WEE1_Ser123_p*S63*cell;
  R254: cell_CDC25_pSites_p + S64 => cell_CDC25_pSites_p + S63; kCdc25_2*cell_CDC25_pSites_p*S64*cell;
  R255: cell_CDC25_pSites_u + S64 => cell_CDC25_pSites_u + S63; kCdc25_1*cell_CDC25_pSites_u*S64*cell;
  R256: S61 => cell_CCNA_CDKN1A; kDeCDKN1A_1*S61*cell;
  R257: S62 => cell_CCNE_CDKN1A; kDeCDKN1A_1*S62*cell;
  R258: S63 => S6; kDeCDKN1A_1*S63*cell;
  R259: S64 => S31; kDeCDKN1A_1*S64*cell;
  R260: cell_CDKN1A_CCNE_A_B_Ser130_p => ; kDeCDKN1A_1*cell_CDKN1A_CCNE_A_B_Ser130_p*cell;
  R261: cell_SKP2 + cell_CDKN1A_CCNE_A_B_Ser130_p => cell_SKP2; kDeCDKN1A_2*cell_SKP2*cell_CDKN1A_CCNE_A_B_Ser130_p*cell;
  R262: cell_SKP2 + S61 => cell_CCNA_CDKN1A + cell_SKP2; kDeCDKN1A_2*cell_SKP2*S61*cell;
  R263: cell_SKP2 + S62 => cell_CCNE_CDKN1A + cell_SKP2; kDeCDKN1A_2*cell_SKP2*S62*cell;
  R264: cell_SKP2 + S63 => S6 + cell_SKP2; kDeCDKN1A_2*cell_SKP2*S63*cell;
  R265: cell_SKP2 + S64 => S31 + cell_SKP2; kDeCDKN1A_2*cell_SKP2*S64*cell;
  R266: S61 => cell_CCNA_CDKN1A + cell_CDKN1A_CCNE_A_B_Ser130_u; kDiCdkn1aC*S61*cell;
  R267: S62 => cell_CCNE_CDKN1A + cell_CDKN1A_CCNE_A_B_Ser130_u; kDiCdkn1aC*S62*cell;
  R268: S63 => S6 + cell_CDKN1A_CCNE_A_B_Ser130_u; kDiCdkn1aC*S63*cell;
  R269: S64 => S31 + cell_CDKN1A_CCNE_A_B_Ser130_u; kDiCdkn1aC*S64*cell;
  R270: cell_CCNE_CDKN1A + S61 => cell_CCNE_CDKN1A + cell_CCNA_CDKN1A + cell_CDKN1A_CCNE_A_B_Ser130_p; kPhCDKN1AByCe*cell_CCNE_CDKN1A*S61*cell;
  R271: cell_CCNE_CDKN1A + S62 => cell_CCNE_CDKN1A + cell_CCNE_CDKN1A + cell_CDKN1A_CCNE_A_B_Ser130_p; kPhCDKN1AByCe*cell_CCNE_CDKN1A*S62*cell;
  R272: cell_CCNE_CDKN1A + S63 => cell_CCNE_CDKN1A + S6 + cell_CDKN1A_CCNE_A_B_Ser130_p; kPhCDKN1AByCe*cell_CCNE_CDKN1A*S63*cell;
  R273: cell_CCNE_CDKN1A + S64 => cell_CCNE_CDKN1A + S31 + cell_CDKN1A_CCNE_A_B_Ser130_p; kPhCDKN1AByCe*cell_CCNE_CDKN1A*S64*cell;
  R274: cell_CCNA_CDKN1A + S61 => cell_CCNA_CDKN1A + cell_CCNA_CDKN1A + cell_CDKN1A_CCNE_A_B_Ser130_p; kPhCDKN1AByCa*cell_CCNA_CDKN1A*S61*cell;
  R275: cell_CCNA_CDKN1A + S62 => cell_CCNE_CDKN1A + cell_CCNA_CDKN1A + cell_CDKN1A_CCNE_A_B_Ser130_p; kPhCDKN1AByCa*cell_CCNA_CDKN1A*S62*cell;
  R276: cell_CCNA_CDKN1A + S63 => cell_CCNA_CDKN1A + S6 + cell_CDKN1A_CCNE_A_B_Ser130_p; kPhCDKN1AByCa*cell_CCNA_CDKN1A*S63*cell;
  R277: cell_CCNA_CDKN1A + S64 => cell_CCNA_CDKN1A + S31 + cell_CDKN1A_CCNE_A_B_Ser130_p; kPhCDKN1AByCa*cell_CCNA_CDKN1A*S64*cell;
  R278: S6 + S61 => cell_CCNA_CDKN1A + S6 + cell_CDKN1A_CCNE_A_B_Ser130_p; kPhCDKN1AByCb*S6*S61*cell;
  R279: S6 + S62 => cell_CCNE_CDKN1A + S6 + cell_CDKN1A_CCNE_A_B_Ser130_p; kPhCDKN1AByCb*S6*S62*cell;
  R280: S6 + S63 => S6 + S6 + cell_CDKN1A_CCNE_A_B_Ser130_p; kPhCDKN1AByCb*S6*S63*cell;
  R281: S6 + S64 => S6 + S31 + cell_CDKN1A_CCNE_A_B_Ser130_p; kPhCDKN1AByCb*S6*S64*cell;
  R282: cell_CDKN1A_CCNE_A_B_Ser130_p => cell_CDKN1A_CCNE_A_B_Ser130_u; kDpCDKN1A*cell_CDKN1A_CCNE_A_B_Ser130_p*cell;

  // Unit definitions:
  unit substance = item;
end
