// SBML level 2 version 3

model cell_cycle_v4.0.0()

  // Compartments:
  compartment Plm = 2e-14;  // 2-D
  compartment Cyt in Plm = 1e-12;
  compartment Num in Cyt = 9e-15;  // 2-D
  compartment Nuc in Num = 1e-12;

  // Species:
  species Cyt_CCND in Cyt = 6.022e11/Cyt; Cyt_CCND is "@Cyt::CCND()";
  species Cyt_CCNE_CDKN1A_B in Cyt = 1.3986043e11/Cyt; Cyt_CCNE_CDKN1A_B is "@Cyt::CCNE(CDKN1A_B)";
  species Cyt_E2F_DBD_RB1_Ser332_u in Cyt = 1.1128068e10/Cyt; Cyt_E2F_DBD_RB1_Ser332_u is "@Cyt::E2F(DBD,RB1,Ser332~u)";
  species Cyt_E2F_DBD_RB1_Ser332_p in Cyt = 22932894/Cyt; Cyt_E2F_DBD_RB1_Ser332_p is "@Cyt::E2F(DBD,RB1,Ser332~p)";
  species Cyt_CCNA_CDKN1A_B in Cyt = 4.2325597e9/Cyt; Cyt_CCNA_CDKN1A_B is "@Cyt::CCNA(CDKN1A_B)";
  species S6 in Cyt = 1.133559e9/Cyt; S6 is "@Cyt::CCNB(CDK1_Thr14_Tyr15~u,CDKN1A)";
  species S7 in Cyt = 4.3034014e10/Cyt; S7 is "@Cyt::E2F(DBD,RB1!1,Ser332~u).RB1(E2F!1,Ser807_Ser811~u)";
  species S8 in Cyt = 90654340/Cyt; S8 is "@Cyt::E2F(DBD,RB1!1,Ser332~p).RB1(E2F!1,Ser807_Ser811~u)";
  species Cyt_RB1_E2F_Ser807_Ser811_u in Cyt = 5.2778426e10/Cyt; Cyt_RB1_E2F_Ser807_Ser811_u is "@Cyt::RB1(E2F,Ser807_Ser811~u)";
  species Cyt_RB1_E2F_Ser807_Ser811_p in Cyt = 5.0629691e11/Cyt; Cyt_RB1_E2F_Ser807_Ser811_p is "@Cyt::RB1(E2F,Ser807_Ser811~p)";
  species Cyt_PPP2R2B_ENSA_ARPP19 in Cyt = 4.6484797e10/Cyt; Cyt_PPP2R2B_ENSA_ARPP19 is "@Cyt::PPP2R2B(ENSA_ARPP19)";
  species S12 in Cyt = 2.4260911e12/Cyt; S12 is "@Cyt::APC(FBXO5,FZR1_CDC20,Ser355~u)";
  species Cyt_CDC20_APC in Cyt = 1.3847757e11/Cyt; Cyt_CDC20_APC is "@Cyt::CDC20(APC)";
  species S14 in Cyt = 4.2087805e10/Cyt; S14 is "@Cyt::APC(FBXO5,FZR1_CDC20!1,Ser355~p).CDC20(APC!1)";
  species S15 in Cyt = 3.7993439e10/Cyt; S15 is "@Cyt::APC(FBXO5,FZR1_CDC20,Ser355~p)";
  species S16 in Cyt = 4.2969631e11/Cyt; S16 is "@Cyt::APC(FBXO5,FZR1_CDC20!1,Ser355~u).FZR1(APC!1,FBXO5,nTerm~u)";
  species Cyt_FZR1_APC_FBXO5_nTerm_u in Cyt = 3.4406152e8/Cyt; Cyt_FZR1_APC_FBXO5_nTerm_u is "@Cyt::FZR1(APC,FBXO5,nTerm~u)";
  species Cyt_FZR1_APC_FBXO5_nTerm_p in Cyt = 9.7028319e10/Cyt; Cyt_FZR1_APC_FBXO5_nTerm_p is "@Cyt::FZR1(APC,FBXO5,nTerm~p)";
  species S19 in Cyt = 6.5604459e10/Cyt; S19 is "@Cyt::APC(FBXO5!1,FZR1_CDC20!2,Ser355~u).FBXO5(APC!1,FZR1!3,Ser182~u).FZR1(APC!2,FBXO5!3,nTerm~u)";
  species Cyt_FBXO5_APC_FZR1_Ser182_u in Cyt = 4.3226888e8/Cyt; Cyt_FBXO5_APC_FZR1_Ser182_u is "@Cyt::FBXO5(APC,FZR1,Ser182~u)";
  species S21 in Cyt = 1.3323959e9/Cyt; S21 is "@Cyt::APC(FBXO5!1,FZR1_CDC20!2,Ser355~p).FBXO5(APC!1,FZR1!3,Ser182~u).FZR1(APC!2,FBXO5!3,nTerm~u)";
  species S22 in Cyt = 8.1944566e9/Cyt; S22 is "@Cyt::APC(FBXO5,FZR1_CDC20!1,Ser355~p).FZR1(APC!1,FBXO5,nTerm~u)";
  species Cyt_FBXO5_APC_FZR1_Ser182_p in Cyt = 11324333/Cyt; Cyt_FBXO5_APC_FZR1_Ser182_p is "@Cyt::FBXO5(APC,FZR1,Ser182~p)";
  species Cyt_FOXM1_DBD_Thr600_u in Cyt = 3.3510826e9/Cyt; Cyt_FOXM1_DBD_Thr600_u is "@Cyt::FOXM1(DBD,Thr600~u)";
  species Cyt_FOXM1_DBD_Thr600_p in Cyt = 2.2950816e8/Cyt; Cyt_FOXM1_DBD_Thr600_p is "@Cyt::FOXM1(DBD,Thr600~p)";
  species Cyt_WEE1_Ser123_u in Cyt = 5.9042195e11/Cyt; Cyt_WEE1_Ser123_u is "@Cyt::WEE1(Ser123~u)";
  species S27 in Cyt = 4.5242773e9/Cyt; S27 is "@Cyt::CCNB(CDK1_Thr14_Tyr15~p,CDKN1A)";
  species Cyt_WEE1_Ser123_p in Cyt = 1.1778049e10/Cyt; Cyt_WEE1_Ser123_p is "@Cyt::WEE1(Ser123~p)";
  species Cyt_CDC25_pSites_p in Cyt = 1.1103404e10/Cyt; Cyt_CDC25_pSites_p is "@Cyt::CDC25(pSites~p)";
  species Cyt_CDC25_pSites_u in Cyt = 5.910966e11/Cyt; Cyt_CDC25_pSites_u is "@Cyt::CDC25(pSites~u)";
  species Cyt_MASTL_Thr198_u in Cyt = 6.0070998e11/Cyt; Cyt_MASTL_Thr198_u is "@Cyt::MASTL(Thr198~u)";
  species Cyt_MASTL_Thr198_p in Cyt = 1.4900204e9/Cyt; Cyt_MASTL_Thr198_p is "@Cyt::MASTL(Thr198~p)";
  species S33 in Cyt = 4.9793694e11/Cyt; S33 is "@Cyt::ENSA_ARPP19(PPP2R2B,Ser62_Ser67~u)";
  species S34 in Cyt = 1.9785953e8/Cyt; S34 is "@Cyt::ENSA_ARPP19(PPP2R2B,Ser62_Ser67~p)";
  species S35 in Cyt = 1.040652e11/Cyt; S35 is "@Cyt::ENSA_ARPP19(PPP2R2B!1,Ser62_Ser67~p).PPP2R2B(ENSA_ARPP19!1)";
  species Cyt_iWEE in Cyt = 0; Cyt_iWEE is "@Cyt::iWEE()";
  species Cyt_SKP2 in Cyt = 6.022e11/Cyt; Cyt_SKP2 is "@Cyt::SKP2()";
  species Cyt_TP53_DBD_Ser15_p in Cyt = 0; Cyt_TP53_DBD_Ser15_p is "@Cyt::TP53(DBD,Ser15~p)";
  species Cyt_FOXO_DBD in Cyt = 6.022e11/Cyt; Cyt_FOXO_DBD is "@Cyt::FOXO(DBD)";
  species Num_NUP_pSites_u in Num = 3000/Num; Num_NUP_pSites_u is "@Num::NUP(pSites~u)";
  species Nuc_CCND in Nuc = 6.022e11/Nuc; Nuc_CCND is "@Nuc::CCND()";
  species Nuc_CCNE_CDKN1A_B in Nuc = 1.3986043e11/Nuc; Nuc_CCNE_CDKN1A_B is "@Nuc::CCNE(CDKN1A_B)";
  species Nuc_E2F_DBD_RB1_Ser332_u in Nuc = 1.1128068e10/Nuc; Nuc_E2F_DBD_RB1_Ser332_u is "@Nuc::E2F(DBD,RB1,Ser332~u)";
  species Nuc_E2F_DBD_RB1_Ser332_p in Nuc = 22932894/Nuc; Nuc_E2F_DBD_RB1_Ser332_p is "@Nuc::E2F(DBD,RB1,Ser332~p)";
  species Nuc_CCNA_CDKN1A_B in Nuc = 4.2325597e9/Nuc; Nuc_CCNA_CDKN1A_B is "@Nuc::CCNA(CDKN1A_B)";
  species S46 in Nuc = 1.133559e9/Nuc; S46 is "@Nuc::CCNB(CDK1_Thr14_Tyr15~u,CDKN1A)";
  species S47 in Nuc = 4.3034014e10/Nuc; S47 is "@Nuc::E2F(DBD,RB1!1,Ser332~u).RB1(E2F!1,Ser807_Ser811~u)";
  species S48 in Nuc = 90654340/Nuc; S48 is "@Nuc::E2F(DBD,RB1!1,Ser332~p).RB1(E2F!1,Ser807_Ser811~u)";
  species Nuc_RB1_E2F_Ser807_Ser811_u in Nuc = 5.2778426e10/Nuc; Nuc_RB1_E2F_Ser807_Ser811_u is "@Nuc::RB1(E2F,Ser807_Ser811~u)";
  species Nuc_RB1_E2F_Ser807_Ser811_p in Nuc = 5.0629691e11/Nuc; Nuc_RB1_E2F_Ser807_Ser811_p is "@Nuc::RB1(E2F,Ser807_Ser811~p)";
  species Nuc_PPP2R2B_ENSA_ARPP19 in Nuc = 4.6484797e10/Nuc; Nuc_PPP2R2B_ENSA_ARPP19 is "@Nuc::PPP2R2B(ENSA_ARPP19)";
  species S52 in Nuc = 2.4260911e12/Nuc; S52 is "@Nuc::APC(FBXO5,FZR1_CDC20,Ser355~u)";
  species Nuc_CDC20_APC in Nuc = 1.3847757e11/Nuc; Nuc_CDC20_APC is "@Nuc::CDC20(APC)";
  species S54 in Nuc = 4.2087805e10/Nuc; S54 is "@Nuc::APC(FBXO5,FZR1_CDC20!1,Ser355~p).CDC20(APC!1)";
  species S55 in Nuc = 3.7993439e10/Nuc; S55 is "@Nuc::APC(FBXO5,FZR1_CDC20,Ser355~p)";
  species S56 in Nuc = 4.2969631e11/Nuc; S56 is "@Nuc::APC(FBXO5,FZR1_CDC20!1,Ser355~u).FZR1(APC!1,FBXO5,nTerm~u)";
  species Nuc_FZR1_APC_FBXO5_nTerm_u in Nuc = 3.4406152e8/Nuc; Nuc_FZR1_APC_FBXO5_nTerm_u is "@Nuc::FZR1(APC,FBXO5,nTerm~u)";
  species Nuc_FZR1_APC_FBXO5_nTerm_p in Nuc = 9.7028319e10/Nuc; Nuc_FZR1_APC_FBXO5_nTerm_p is "@Nuc::FZR1(APC,FBXO5,nTerm~p)";
  species S59 in Nuc = 6.5604459e10/Nuc; S59 is "@Nuc::APC(FBXO5!1,FZR1_CDC20!2,Ser355~u).FBXO5(APC!1,FZR1!3,Ser182~u).FZR1(APC!2,FBXO5!3,nTerm~u)";
  species Nuc_FBXO5_APC_FZR1_Ser182_u in Nuc = 4.3226888e8/Nuc; Nuc_FBXO5_APC_FZR1_Ser182_u is "@Nuc::FBXO5(APC,FZR1,Ser182~u)";
  species S61 in Nuc = 1.3323959e9/Nuc; S61 is "@Nuc::APC(FBXO5!1,FZR1_CDC20!2,Ser355~p).FBXO5(APC!1,FZR1!3,Ser182~u).FZR1(APC!2,FBXO5!3,nTerm~u)";
  species S62 in Nuc = 8.1944566e9/Nuc; S62 is "@Nuc::APC(FBXO5,FZR1_CDC20!1,Ser355~p).FZR1(APC!1,FBXO5,nTerm~u)";
  species Nuc_FBXO5_APC_FZR1_Ser182_p in Nuc = 11324333/Nuc; Nuc_FBXO5_APC_FZR1_Ser182_p is "@Nuc::FBXO5(APC,FZR1,Ser182~p)";
  species Nuc_FOXM1_DBD_Thr600_u in Nuc = 3.3510826e9/Nuc; Nuc_FOXM1_DBD_Thr600_u is "@Nuc::FOXM1(DBD,Thr600~u)";
  species Nuc_FOXM1_DBD_Thr600_p in Nuc = 2.2950816e8/Nuc; Nuc_FOXM1_DBD_Thr600_p is "@Nuc::FOXM1(DBD,Thr600~p)";
  species S66 in Nuc = 114614.27/Nuc; S66 is "@Nuc::CCNB_promoter(FOXM1!1).FOXM1(DBD!1,Thr600~p)";
  species Nuc_CCNB_promoter_FOXM1 in Nuc = 60105386/Nuc; Nuc_CCNB_promoter_FOXM1 is "@Nuc::CCNB_promoter(FOXM1)";
  species Nuc_CDC20_promoter_FOXM1 in Nuc = 60174121/Nuc; Nuc_CDC20_promoter_FOXM1 is "@Nuc::CDC20_promoter(FOXM1)";
  species S69 in Nuc = 45878.816/Nuc; S69 is "@Nuc::CDC20_promoter(FOXM1!1).FOXM1(DBD!1,Thr600~p)";
  species Nuc_WEE1_Ser123_u in Nuc = 5.9042195e11/Nuc; Nuc_WEE1_Ser123_u is "@Nuc::WEE1(Ser123~u)";
  species S71 in Nuc = 4.5242773e9/Nuc; S71 is "@Nuc::CCNB(CDK1_Thr14_Tyr15~p,CDKN1A)";
  species Nuc_WEE1_Ser123_p in Nuc = 1.1778049e10/Nuc; Nuc_WEE1_Ser123_p is "@Nuc::WEE1(Ser123~p)";
  species Nuc_CDC25_pSites_p in Nuc = 1.1103404e10/Nuc; Nuc_CDC25_pSites_p is "@Nuc::CDC25(pSites~p)";
  species Nuc_CDC25_pSites_u in Nuc = 5.910966e11/Nuc; Nuc_CDC25_pSites_u is "@Nuc::CDC25(pSites~u)";
  species Nuc_MASTL_Thr198_u in Nuc = 6.0070998e11/Nuc; Nuc_MASTL_Thr198_u is "@Nuc::MASTL(Thr198~u)";
  species Nuc_MASTL_Thr198_p in Nuc = 1.4900204e9/Nuc; Nuc_MASTL_Thr198_p is "@Nuc::MASTL(Thr198~p)";
  species S77 in Nuc = 4.9793694e11/Nuc; S77 is "@Nuc::ENSA_ARPP19(PPP2R2B,Ser62_Ser67~u)";
  species S78 in Nuc = 1.9785953e8/Nuc; S78 is "@Nuc::ENSA_ARPP19(PPP2R2B,Ser62_Ser67~p)";
  species S79 in Nuc = 1.040652e11/Nuc; S79 is "@Nuc::ENSA_ARPP19(PPP2R2B!1,Ser62_Ser67~p).PPP2R2B(ENSA_ARPP19!1)";
  species Nuc_CCNE_promoter_E2F in Nuc = 50873268/Nuc; Nuc_CCNE_promoter_E2F is "@Nuc::CCNE_promoter(E2F)";
  species Nuc_CCNA_promoter_E2F in Nuc = 50873268/Nuc; Nuc_CCNA_promoter_E2F is "@Nuc::CCNA_promoter(E2F)";
  species Nuc_E2F_promoter_E2F in Nuc = 50873268/Nuc; Nuc_E2F_promoter_E2F is "@Nuc::E2F_promoter(E2F)";
  species Nuc_FBXO5_promoter_E2F in Nuc = 50873268/Nuc; Nuc_FBXO5_promoter_E2F is "@Nuc::FBXO5_promoter(E2F)";
  species Nuc_FOXM1_promoter_E2F in Nuc = 50873268/Nuc; Nuc_FOXM1_promoter_E2F is "@Nuc::FOXM1_promoter(E2F)";
  species S85 in Nuc = 9346731.7/Nuc; S85 is "@Nuc::CCNE_promoter(E2F!1).E2F(DBD!1,RB1,Ser332~u)";
  species S86 in Nuc = 9346731.7/Nuc; S86 is "@Nuc::CCNA_promoter(E2F!1).E2F(DBD!1,RB1,Ser332~u)";
  species S87 in Nuc = 9346731.7/Nuc; S87 is "@Nuc::E2F(DBD!1,RB1,Ser332~u).E2F_promoter(E2F!1)";
  species S88 in Nuc = 9346731.7/Nuc; S88 is "@Nuc::E2F(DBD!1,RB1,Ser332~u).FBXO5_promoter(E2F!1)";
  species S89 in Nuc = 9346731.7/Nuc; S89 is "@Nuc::E2F(DBD!1,RB1,Ser332~u).FOXM1_promoter(E2F!1)";
  species Nuc_iWEE in Nuc = 0; Nuc_iWEE is "@Nuc::iWEE()";
  species Nuc_SKP2 in Nuc = 6.022e11/Nuc; Nuc_SKP2 is "@Nuc::SKP2()";
  species Nuc_TP53_DBD_Ser15_p in Nuc = 0; Nuc_TP53_DBD_Ser15_p is "@Nuc::TP53(DBD,Ser15~p)";
  species Nuc_CDKN1A_promoter_TP53 in Nuc = 50873268/Nuc; Nuc_CDKN1A_promoter_TP53 is "@Nuc::CDKN1A_promoter(TP53)";
  species Nuc_FOXO_DBD in Nuc = 6.022e11/Nuc; Nuc_FOXO_DBD is "@Nuc::FOXO(DBD)";
  species Nuc_CDKN1B_promoter_FOXO in Nuc = 50873268/Nuc; Nuc_CDKN1B_promoter_FOXO is "@Nuc::CDKN1B_promoter(FOXO)";
  species S96 in Nuc = 0; S96 is "@Nuc::CCNB_promoter(FOXM1!1).FOXM1(DBD!1,Thr600~u)";
  species S97 in Nuc = 0; S97 is "@Nuc::CDC20_promoter(FOXM1!1).FOXM1(DBD!1,Thr600~u)";
  species S98 in Nuc = 0; S98 is "@Nuc::CDKN1A_promoter(TP53!1).TP53(DBD!1,Ser15~p)";
  species Cyt_CDKN1A_CCNE_A_B_Ser130_u in Cyt = 0; Cyt_CDKN1A_CCNE_A_B_Ser130_u is "@Cyt::CDKN1A(CCNE_A_B,Ser130~u)";
  species S100 in Nuc = 0; S100 is "@Nuc::CDKN1B_promoter(FOXO!1).FOXO(DBD!1)";
  species Cyt_CDKN1B_CCNE_A_Thr187_u in Cyt = 0; Cyt_CDKN1B_CCNE_A_Thr187_u is "@Cyt::CDKN1B(CCNE_A,Thr187~u)";
  species S102 in Cyt = 0; S102 is "@Cyt::CCNA(CDKN1A_B!1).CDKN1A(CCNE_A_B!1,Ser130~u)";
  species S103 in Cyt = 0; S103 is "@Cyt::CCNE(CDKN1A_B!1).CDKN1A(CCNE_A_B!1,Ser130~u)";
  species S104 in Cyt = 0; S104 is "@Cyt::CCNB(CDK1_Thr14_Tyr15~u,CDKN1A!1).CDKN1A(CCNE_A_B!1,Ser130~u)";
  species S105 in Cyt = 0; S105 is "@Cyt::CCNB(CDK1_Thr14_Tyr15~p,CDKN1A!1).CDKN1A(CCNE_A_B!1,Ser130~u)";
  species Cyt_CDKN1A_CCNE_A_B_Ser130_p in Cyt = 0; Cyt_CDKN1A_CCNE_A_B_Ser130_p is "@Cyt::CDKN1A(CCNE_A_B,Ser130~p)";
  species S107 in Cyt = 0; S107 is "@Cyt::CCNA(CDKN1A_B!1).CDKN1B(CCNE_A!1,Thr187~u)";
  species S108 in Cyt = 0; S108 is "@Cyt::CCNE(CDKN1A_B!1).CDKN1B(CCNE_A!1,Thr187~u)";
  species Cyt_CDKN1B_CCNE_A_Thr187_p in Cyt = 0; Cyt_CDKN1B_CCNE_A_Thr187_p is "@Cyt::CDKN1B(CCNE_A,Thr187~p)";
  species Nuc_CDKN1A_CCNE_A_B_Ser130_u in Nuc = 0; Nuc_CDKN1A_CCNE_A_B_Ser130_u is "@Nuc::CDKN1A(CCNE_A_B,Ser130~u)";
  species Nuc_CDKN1B_CCNE_A_Thr187_u in Nuc = 0; Nuc_CDKN1B_CCNE_A_Thr187_u is "@Nuc::CDKN1B(CCNE_A,Thr187~u)";
  species S112 in Nuc = 0; S112 is "@Nuc::CCNA(CDKN1A_B!1).CDKN1A(CCNE_A_B!1,Ser130~u)";
  species S113 in Nuc = 0; S113 is "@Nuc::CCNE(CDKN1A_B!1).CDKN1A(CCNE_A_B!1,Ser130~u)";
  species S114 in Nuc = 0; S114 is "@Nuc::CCNB(CDK1_Thr14_Tyr15~u,CDKN1A!1).CDKN1A(CCNE_A_B!1,Ser130~u)";
  species S115 in Nuc = 0; S115 is "@Nuc::CCNB(CDK1_Thr14_Tyr15~p,CDKN1A!1).CDKN1A(CCNE_A_B!1,Ser130~u)";
  species Nuc_CDKN1A_CCNE_A_B_Ser130_p in Nuc = 0; Nuc_CDKN1A_CCNE_A_B_Ser130_p is "@Nuc::CDKN1A(CCNE_A_B,Ser130~p)";
  species S117 in Cyt = 0; S117 is "@Cyt::CCNA(CDKN1A_B!1).CDKN1B(CCNE_A!1,Thr187~p)";
  species S118 in Nuc = 0; S118 is "@Nuc::CCNA(CDKN1A_B!1).CDKN1B(CCNE_A!1,Thr187~u)";
  species S119 in Cyt = 0; S119 is "@Cyt::CCNE(CDKN1A_B!1).CDKN1B(CCNE_A!1,Thr187~p)";
  species S120 in Nuc = 0; S120 is "@Nuc::CCNE(CDKN1A_B!1).CDKN1B(CCNE_A!1,Thr187~u)";
  species Nuc_CDKN1B_CCNE_A_Thr187_p in Nuc = 0; Nuc_CDKN1B_CCNE_A_Thr187_p is "@Nuc::CDKN1B(CCNE_A,Thr187~p)";
  species S122 in Nuc = 0; S122 is "@Nuc::CCNA(CDKN1A_B!1).CDKN1B(CCNE_A!1,Thr187~p)";
  species S123 in Nuc = 0; S123 is "@Nuc::CCNE(CDKN1A_B!1).CDKN1B(CCNE_A!1,Thr187~p)";

  // Parameters:
  kPhRbD = 9.206253e-27;
  kPhRbE = 1.1507816e-26;
  kDpRb = 0.0013860014;
  kPhRb = 3.4523449e-26;
  kSyCe1 = 1.6693001e19;
  kSyCe2 = 8.3160083;
  kDeCe = 0.00013860014;
  kDiE2fRb = 0.00034650035;
  kAsE2fRb = 5.7539081e-25;
  kSyE2f1 = 8.3465003e18;
  kSyE2f2 = 1.3860014;
  kDeE2f1 = 6.9300069e-5;
  kDeE2f2 = 2.3015632e-27;
  kPhE2f = 2.3015632e-27;
  kDpE2f2 = 1.1507816e-25;
  kSyEmi1 = 4.1732502e19;
  kSyEmi2 = 6.9300069;
  kDeEmi1 = 0.00034650035;
  kDeEmi2 = 0.00034650035;
  kDeEmi3 = 0.0034650035;
  kPhEmiA = 5.7539081e-29;
  kPhEmiB = 2.8769541e-28;
  kDpEmi = 3.4650035e-6;
  kSyCa1 = 8.3465003e18;
  kSyCa2 = 1.039501;
  kDeCa1 = 6.9300069e-6;
  kDeCa2 = 4.6031265e-27;
  kDeCa3 = 1.1507816e-27;
  kDpCdh = 0.0034650035;
  kPhCdhA = 2.8769541e-26;
  kPhCdhE = 1.1507816e-27;
  kPhCdhB = 2.8769541e-25;
  kDiACE = 0.00034650035;
  kAsACE = 5.7539081e-25;
  kDiACdh = 0.00034650035;
  kAsACdh = 5.7539081e-25;
  kPhCeA = 1.1507816e-26;
  kPhCeE = 1.1507816e-28;
  kPhFoxE = 1.1507816e-27;
  kPhFoxA = 1.1507816e-27;
  kPhFoxB = 5.7539081e-27;
  kDpFox = 1e-5;
  kSyCb1 = 8.3465003e18;
  kSyCb2 = 1.039501;
  kDeCb1 = 6.9300069e-6;
  kDeCb2 = 1.438477e-27;
  kDeCb3 = 1.438477e-27;
  kPhEnsa = 1.1507816e-27;
  kDpEnsa = 0.00034650035;
  kPhGw = 1.1507816e-26;
  kDpGw1 = 0.0017325017;
  kDpGw2 = 1.1507816e-25;
  kWee1 = 1.1507816e-28;
  kWee2 = 1.1507816e-26;
  kPhWeeA = 1.1507816e-27;
  kPhWeeB = 1.1507816e-26;
  kDpWee = 1.1507816e-25;
  kCdc25_1 = 1.1507816e-27;
  kCdc25_2 = 1.1507816e-26;
  kDpCdc25 = 1.1507816e-25;
  kDipEB55 = 4.7124047e-5;
  kAspEB55 = 6.5594552e-25;
  kSyCdc_1 = 8.3465003e18;
  kSyCdc_2 = 1.3860014;
  kDeCdc_1 = 2.7720028e-5;
  kDeCdc_2 = 4.6031265e-28;
  kDipACdc = 0.00086625087;
  kAspACdc = 1.1507816e-26;
  kPhApcA = 1.1507816e-28;
  kDpApc_1 = 0;
  kDpApc_2 = 5.7539081e-26;
  kSyFox1 = 8.3465003e18;
  kSyFox2 = 1.039501;
  kDeFox1 = 6.9300069e-6;
  kDeFox2 = 5.7539081e-27;
  kAsEPx = 5.7539081e-25;
  kDiEPx = 0.034650035;
  kAsFPcb = 5.7539081e-25;
  kDiFPcb = 0.069300069;
  kAsFPcdc = 5.7539081e-25;
  kDiFPcdc = 0.17325017;
  kPhC25B = 1.1507816e-26;
  kPhCAEE = 9.2062529e-28;
  kPhCAEA = 2.3015632e-26;
  kPhCAEB = 2.3015632e-25;
  ikSyCb = 1;
  jiWee = 6.022e22;
  kDpE2f1 = 0;
  kPhC25A = 0;
  kSySkp2 = 1.2044e20;
  kDeSkp2_1 = 0.0001;
  kDeSkp2_2 = 3.3211558e-27;
  kAsTP53PCDKN1A = 4.9817336e-25;
  kDiTP53PCDKN1A = 0.15;
  kSyCDKN1A_1 = 1.2044e19;
  kSyCDKN1A_2 = 8;
  kDeCDKN1A_1 = 2e-5;
  kDeCDKN1A_2 = 4.1514447e-28;
  kAsCdkn1aC = 1.1624045e-26;
  kDiCdkn1aC = 0.0003;
  kPhCDKN1AByCe = 8.3028894e-27;
  kPhCDKN1AByCa = 8.3028894e-28;
  kPhCDKN1AByCb = 8.3028894e-27;
  kDpCDKN1A = 0.002;
  kAsFOXOPCDKN1B = 4.9817336e-25;
  kDiFOXOPCDKN1B = 0.15;
  kSyCDKN1B_1 = 1.2044e19;
  kSyCDKN1B_2 = 1;
  kDeCDKN1B_1 = 2e-5;
  kDeCDKN1B_2 = 4.1514447e-27;
  kAsCdkn1bC = 1.1624045e-26;
  kDiCdkn1bC = 0.0003;
  kPhCDKN1BByCe = 8.3028894e-27;
  kPhCDKN1BByCa = 8.3028894e-26;
  kPhCDKN1BByCb = 8.3028894e-28;
  kDpCDKN1B = 0.002;
  kPhNup = 5e-12;
  kDpNup_1 = 2;
  kImImCCND_1 = 1.6605779e-15;
  kExImCCND_1 = 1.6605779e-15;
  kImImCCNE_CDKN1A_B__1 = 1.6605779e-15;
  kExImCCNE_CDKN1A_B__1 = 1.6605779e-15;
  kImImE2F_DBD_RB1_Ser332u__1 = 1.6605779e-15;
  kExImE2F_DBD_RB1_Ser332u__1 = 1.6605779e-15;
  kImImE2F_DBD_RB1_Ser332p__1 = 1.6605779e-15;
  kExImE2F_DBD_RB1_Ser332p__1 = 1.6605779e-15;
  kImImCCNA_CDKN1A_B__1 = 1.6605779e-15;
  kExImCCNA_CDKN1A_B__1 = 1.6605779e-15;
  kImImCCNB_CDK1_Thr14_Tyr15u_CDKN1A__1 = 1.6605779e-15;
  kExImCCNB_CDK1_Thr14_Tyr15u_CDKN1A__1 = 1.6605779e-15;
  kImImE2F_DBD_RB11_Ser332u__RB1_E2F1_Ser807_Ser811u__1 = 1.6605779e-15;
  kExImE2F_DBD_RB11_Ser332u__RB1_E2F1_Ser807_Ser811u__1 = 1.6605779e-15;
  kImImE2F_DBD_RB11_Ser332p__RB1_E2F1_Ser807_Ser811u__1 = 1.6605779e-15;
  kExImE2F_DBD_RB11_Ser332p__RB1_E2F1_Ser807_Ser811u__1 = 1.6605779e-15;
  kImImRB1_E2F_Ser807_Ser811u__1 = 1.6605779e-15;
  kExImRB1_E2F_Ser807_Ser811u__1 = 1.6605779e-15;
  kImImRB1_E2F_Ser807_Ser811p__1 = 1.6605779e-15;
  kExImRB1_E2F_Ser807_Ser811p__1 = 1.6605779e-15;
  kImImPPP2R2B_ENSA_ARPP19__1 = 1.6605779e-15;
  kExImPPP2R2B_ENSA_ARPP19__1 = 1.6605779e-15;
  kImImAPC_FBXO5_FZR1_CDC20_Ser355u__1 = 1.6605779e-15;
  kExImAPC_FBXO5_FZR1_CDC20_Ser355u__1 = 1.6605779e-15;
  kImImCDC20_APC__1 = 1.6605779e-15;
  kExImCDC20_APC__1 = 1.6605779e-15;
  kImImAPC_FBXO5_FZR1_CDC201_Ser355p__CDC20_APC1__1 = 1.6605779e-15;
  kExImAPC_FBXO5_FZR1_CDC201_Ser355p__CDC20_APC1__1 = 1.6605779e-15;
  kImImAPC_FBXO5_FZR1_CDC20_Ser355p__1 = 1.6605779e-15;
  kExImAPC_FBXO5_FZR1_CDC20_Ser355p__1 = 1.6605779e-15;
  kImImAPC_FBXO5_FZR1_CDC201_Ser355u__FZR1_APC1_FBXO5_nTermu__1 = 1.6605779e-15;
  kExImAPC_FBXO5_FZR1_CDC201_Ser355u__FZR1_APC1_FBXO5_nTermu__1 = 1.6605779e-15;
  kImImFZR1_APC_FBXO5_nTermu__1 = 1.6605779e-15;
  kExImFZR1_APC_FBXO5_nTermu__1 = 1.6605779e-15;
  kImImFZR1_APC_FBXO5_nTermp__1 = 1.6605779e-15;
  kExImFZR1_APC_FBXO5_nTermp__1 = 1.6605779e-15;
  kImImAPC_FBXO51_FZR1_CDC202_Ser355u__FBXO5_APC1_FZR13_Ser182u__FZR1_APC2_FBXO53_nTermu__1 = 1.6605779e-15;
  kExImAPC_FBXO51_FZR1_CDC202_Ser355u__FBXO5_APC1_FZR13_Ser182u__FZR1_APC2_FBXO53_nTermu__1 = 1.6605779e-15;
  kImImFBXO5_APC_FZR1_Ser182u__1 = 1.6605779e-15;
  kExImFBXO5_APC_FZR1_Ser182u__1 = 1.6605779e-15;
  kImImAPC_FBXO51_FZR1_CDC202_Ser355p__FBXO5_APC1_FZR13_Ser182u__FZR1_APC2_FBXO53_nTermu__1 = 1.6605779e-15;
  kExImAPC_FBXO51_FZR1_CDC202_Ser355p__FBXO5_APC1_FZR13_Ser182u__FZR1_APC2_FBXO53_nTermu__1 = 1.6605779e-15;
  kImImAPC_FBXO5_FZR1_CDC201_Ser355p__FZR1_APC1_FBXO5_nTermu__1 = 1.6605779e-15;
  kExImAPC_FBXO5_FZR1_CDC201_Ser355p__FZR1_APC1_FBXO5_nTermu__1 = 1.6605779e-15;
  kImImFBXO5_APC_FZR1_Ser182p__1 = 1.6605779e-15;
  kExImFBXO5_APC_FZR1_Ser182p__1 = 1.6605779e-15;
  kImImFOXM1_DBD_Thr600u__1 = 1.6605779e-15;
  kExImFOXM1_DBD_Thr600u__1 = 1.6605779e-15;
  kImImFOXM1_DBD_Thr600p__1 = 1.6605779e-15;
  kExImFOXM1_DBD_Thr600p__1 = 1.6605779e-15;
  kImImWEE1_Ser123u__1 = 1.6605779e-15;
  kExImWEE1_Ser123u__1 = 1.6605779e-15;
  kImImCCNB_CDK1_Thr14_Tyr15p_CDKN1A__1 = 1.6605779e-15;
  kExImCCNB_CDK1_Thr14_Tyr15p_CDKN1A__1 = 1.6605779e-15;
  kImImWEE1_Ser123p__1 = 1.6605779e-15;
  kExImWEE1_Ser123p__1 = 1.6605779e-15;
  kImImCDC25_pSitesp__1 = 1.6605779e-15;
  kExImCDC25_pSitesp__1 = 1.6605779e-15;
  kImImCDC25_pSitesu__1 = 1.6605779e-15;
  kExImCDC25_pSitesu__1 = 1.6605779e-15;
  kImImMASTL_Thr198u__1 = 1.6605779e-15;
  kExImMASTL_Thr198u__1 = 1.6605779e-15;
  kImImMASTL_Thr198p__1 = 1.6605779e-15;
  kExImMASTL_Thr198p__1 = 1.6605779e-15;
  kImImENSA_ARPP19_PPP2R2B_Ser62_Ser67u__1 = 1.6605779e-15;
  kExImENSA_ARPP19_PPP2R2B_Ser62_Ser67u__1 = 1.6605779e-15;
  kImImENSA_ARPP19_PPP2R2B_Ser62_Ser67p__1 = 1.6605779e-15;
  kExImENSA_ARPP19_PPP2R2B_Ser62_Ser67p__1 = 1.6605779e-15;
  kImImENSA_ARPP19_PPP2R2B1_Ser62_Ser67p__PPP2R2B_ENSA_ARPP191__1 = 1.6605779e-15;
  kExImENSA_ARPP19_PPP2R2B1_Ser62_Ser67p__PPP2R2B_ENSA_ARPP191__1 = 1.6605779e-15;
  kImImiWEE_1 = 1.6605779e-15;
  kExImiWEE_1 = 1.6605779e-15;
  kImImSKP2_1 = 1.6605779e-15;
  kExImSKP2_1 = 1.6605779e-15;
  kImImTP53_DBD_Ser15p__1 = 1.6605779e-15;
  kExImTP53_DBD_Ser15p__1 = 1.6605779e-15;
  kImImFOXO_DBD__1 = 1.6605779e-15;
  kExImFOXO_DBD__1 = 1.6605779e-15;
  kImImCDKN1A_CCNE_A_B_Ser130u__1 = 1.6605779e-15;
  kExImCDKN1A_CCNE_A_B_Ser130u__1 = 1.6605779e-15;
  kImImCDKN1B_CCNE_A_Thr187u__1 = 1.6605779e-15;
  kExImCDKN1B_CCNE_A_Thr187u__1 = 1.6605779e-15;
  kImImCCNA_CDKN1A_B1__CDKN1A_CCNE_A_B1_Ser130u__1 = 1.6605779e-15;
  kExImCCNA_CDKN1A_B1__CDKN1A_CCNE_A_B1_Ser130u__1 = 1.6605779e-15;
  kImImCCNE_CDKN1A_B1__CDKN1A_CCNE_A_B1_Ser130u__1 = 1.6605779e-15;
  kExImCCNE_CDKN1A_B1__CDKN1A_CCNE_A_B1_Ser130u__1 = 1.6605779e-15;
  kImImCCNB_CDK1_Thr14_Tyr15u_CDKN1A1__CDKN1A_CCNE_A_B1_Ser130u__1 = 1.6605779e-15;
  kExImCCNB_CDK1_Thr14_Tyr15u_CDKN1A1__CDKN1A_CCNE_A_B1_Ser130u__1 = 1.6605779e-15;
  kImImCCNB_CDK1_Thr14_Tyr15p_CDKN1A1__CDKN1A_CCNE_A_B1_Ser130u__1 = 1.6605779e-15;
  kExImCCNB_CDK1_Thr14_Tyr15p_CDKN1A1__CDKN1A_CCNE_A_B1_Ser130u__1 = 1.6605779e-15;
  kImImCDKN1A_CCNE_A_B_Ser130p__1 = 1.6605779e-15;
  kExImCDKN1A_CCNE_A_B_Ser130p__1 = 1.6605779e-15;
  kImImCCNA_CDKN1A_B1__CDKN1B_CCNE_A1_Thr187u__1 = 1.6605779e-15;
  kExImCCNA_CDKN1A_B1__CDKN1B_CCNE_A1_Thr187u__1 = 1.6605779e-15;
  kImImCCNE_CDKN1A_B1__CDKN1B_CCNE_A1_Thr187u__1 = 1.6605779e-15;
  kExImCCNE_CDKN1A_B1__CDKN1B_CCNE_A1_Thr187u__1 = 1.6605779e-15;
  kImImCDKN1B_CCNE_A_Thr187p__1 = 1.6605779e-15;
  kExImCDKN1B_CCNE_A_Thr187p__1 = 1.6605779e-15;
  kImImCCNA_CDKN1A_B1__CDKN1B_CCNE_A1_Thr187p__1 = 1.6605779e-15;
  kExImCCNA_CDKN1A_B1__CDKN1B_CCNE_A1_Thr187p__1 = 1.6605779e-15;
  kImImCCNE_CDKN1A_B1__CDKN1B_CCNE_A1_Thr187p__1 = 1.6605779e-15;
  kExImCCNE_CDKN1A_B1__CDKN1B_CCNE_A1_Thr187p__1 = 1.6605779e-15;
  kIm_2 = 1.6605779e-14;
  kEx_2 = 1.6605779e-14;
  _InitialConc1 = 6.022e11;
  _InitialConc2 = 1.3986043e11;
  _InitialConc3 = 1.1128068e10;
  _InitialConc4 = 22932894;
  _InitialConc5 = 4.2325597e9;
  _InitialConc6 = 1.133559e9;
  _InitialConc7 = 4.3034014e10;
  _InitialConc8 = 90654340;
  _InitialConc9 = 5.2778426e10;
  _InitialConc10 = 5.0629691e11;
  _InitialConc11 = 4.6484797e10;
  _InitialConc12 = 2.4260911e12;
  _InitialConc13 = 1.3847757e11;
  _InitialConc14 = 4.2087805e10;
  _InitialConc15 = 3.7993439e10;
  _InitialConc16 = 4.2969631e11;
  _InitialConc17 = 3.4406152e8;
  _InitialConc18 = 9.7028319e10;
  _InitialConc19 = 6.5604459e10;
  _InitialConc20 = 4.3226888e8;
  _InitialConc21 = 1.3323959e9;
  _InitialConc22 = 8.1944566e9;
  _InitialConc23 = 11324333;
  _InitialConc24 = 3.3510826e9;
  _InitialConc25 = 2.2950816e8;
  _InitialConc26 = 5.9042195e11;
  _InitialConc27 = 4.5242773e9;
  _InitialConc28 = 1.1778049e10;
  _InitialConc29 = 1.1103404e10;
  _InitialConc30 = 5.910966e11;
  _InitialConc31 = 6.0070998e11;
  _InitialConc32 = 1.4900204e9;
  _InitialConc33 = 4.9793694e11;
  _InitialConc34 = 1.9785953e8;
  _InitialConc35 = 1.040652e11;
  _InitialConc36 = 0;
  _InitialConc37 = 6.022e11;
  _InitialConc38 = 0;
  _InitialConc39 = 6.022e11;
  _InitialConc40 = 6.022e11;
  _InitialConc41 = 1.3986043e11;
  _InitialConc42 = 1.1128068e10;
  _InitialConc43 = 22932894;
  _InitialConc44 = 4.2325597e9;
  _InitialConc45 = 1.133559e9;
  _InitialConc46 = 4.3034014e10;
  _InitialConc47 = 90654340;
  _InitialConc48 = 5.2778426e10;
  _InitialConc49 = 5.0629691e11;
  _InitialConc50 = 4.6484797e10;
  _InitialConc51 = 2.4260911e12;
  _InitialConc52 = 1.3847757e11;
  _InitialConc53 = 4.2087805e10;
  _InitialConc54 = 3.7993439e10;
  _InitialConc55 = 4.2969631e11;
  _InitialConc56 = 3.4406152e8;
  _InitialConc57 = 9.7028319e10;
  _InitialConc58 = 6.5604459e10;
  _InitialConc59 = 4.3226888e8;
  _InitialConc60 = 1.3323959e9;
  _InitialConc61 = 8.1944566e9;
  _InitialConc62 = 11324333;
  _InitialConc63 = 3.3510826e9;
  _InitialConc64 = 2.2950816e8;
  _InitialConc65 = 114614.27;
  _InitialConc66 = 60105386;
  _InitialConc67 = 60174121;
  _InitialConc68 = 45878.816;
  _InitialConc69 = 5.9042195e11;
  _InitialConc70 = 4.5242773e9;
  _InitialConc71 = 1.1778049e10;
  _InitialConc72 = 1.1103404e10;
  _InitialConc73 = 5.910966e11;
  _InitialConc74 = 6.0070998e11;
  _InitialConc75 = 1.4900204e9;
  _InitialConc76 = 4.9793694e11;
  _InitialConc77 = 1.9785953e8;
  _InitialConc78 = 1.040652e11;
  _InitialConc79 = 50873268;
  _InitialConc80 = 50873268;
  _InitialConc81 = 50873268;
  _InitialConc82 = 50873268;
  _InitialConc83 = 50873268;
  _InitialConc84 = 9346731.7;
  _InitialConc85 = 9346731.7;
  _InitialConc86 = 9346731.7;
  _InitialConc87 = 9346731.7;
  _InitialConc88 = 9346731.7;
  _InitialConc89 = 0;
  _InitialConc90 = 6.022e11;
  _InitialConc91 = 0;
  _InitialConc92 = 50873268;
  _InitialConc93 = 6.022e11;
  _InitialConc94 = 50873268;
  _rateLaw3 = 0;
  _rateLaw1 = kSyCb1*ikSyCb;
  _rateLaw2 = kSyCb2*ikSyCb;

  // Assignment rules:
  tCCNE := Cyt_CCNE_CDKN1A_B + Nuc_CCNE_CDKN1A_B + S103 + S108 + S113 + S119 + S120 + S123;
  tCCNA := Cyt_CCNA_CDKN1A_B + Nuc_CCNA_CDKN1A_B + S102 + S107 + S112 + S117 + S118 + S122;
  tCCNB := S6 + S27 + S46 + S71 + S104 + S105 + S114 + S115;
  tCDKN1A := Cyt_CDKN1A_CCNE_A_B_Ser130_u + S102 + S103 + S104 + S105 + Cyt_CDKN1A_CCNE_A_B_Ser130_p + Nuc_CDKN1A_CCNE_A_B_Ser130_u + S112 + S113 + S114 + S115 + Nuc_CDKN1A_CCNE_A_B_Ser130_p;
  tCDKN1B := Cyt_CDKN1B_CCNE_A_Thr187_u + S107 + S108 + Cyt_CDKN1B_CCNE_A_Thr187_p + Nuc_CDKN1B_CCNE_A_Thr187_u + S117 + S118 + S119 + S120 + Nuc_CDKN1B_CCNE_A_Thr187_p + S122 + S123;
  tSKP2 := Cyt_SKP2 + Nuc_SKP2;
  ApcCdh := S16 + S22 + S56 + S62;
  aCCNB := S6 + S46;

  // Reactions:
  R1: => Cyt_E2F_DBD_RB1_Ser332_u; kSyE2f1*Cyt;
  R2: Nuc_FOXM1_DBD_Thr600_p + Nuc_CCNB_promoter_FOXM1 => S66; kAsFPcb*Nuc_FOXM1_DBD_Thr600_p*Nuc_CCNB_promoter_FOXM1*Nuc;
  R3: S66 => Nuc_FOXM1_DBD_Thr600_p + Nuc_CCNB_promoter_FOXM1; kDiFPcb*S66*Nuc;
  R4: S87 => Cyt_E2F_DBD_RB1_Ser332_u + S87; kSyE2f2*S87*Nuc;
  R5: Cyt_E2F_DBD_RB1_Ser332_u => ; kDeE2f1*Cyt_E2F_DBD_RB1_Ser332_u*Cyt;
  R6: Cyt_E2F_DBD_RB1_Ser332_p => ; kDeE2f1*Cyt_E2F_DBD_RB1_Ser332_p*Cyt;
  R7: S7 => Cyt_RB1_E2F_Ser807_Ser811_u; kDeE2f1*S7*Cyt;
  R8: S8 => Cyt_RB1_E2F_Ser807_Ser811_u; kDeE2f1*S8*Cyt;
  R9: Nuc_E2F_DBD_RB1_Ser332_u => ; kDeE2f1*Nuc_E2F_DBD_RB1_Ser332_u*Nuc;
  R10: Nuc_E2F_DBD_RB1_Ser332_p => ; kDeE2f1*Nuc_E2F_DBD_RB1_Ser332_p*Nuc;
  R11: S47 => Nuc_RB1_E2F_Ser807_Ser811_u; kDeE2f1*S47*Nuc;
  R12: S48 => Nuc_RB1_E2F_Ser807_Ser811_u; kDeE2f1*S48*Nuc;
  R13: S85 => Nuc_CCNE_promoter_E2F; kDeE2f1*S85*Nuc;
  R14: S86 => Nuc_CCNA_promoter_E2F; kDeE2f1*S86*Nuc;
  R15: S87 => Nuc_E2F_promoter_E2F; kDeE2f1*S87*Nuc;
  R16: S88 => Nuc_FBXO5_promoter_E2F; kDeE2f1*S88*Nuc;
  R17: S89 => Nuc_FOXM1_promoter_E2F; kDeE2f1*S89*Nuc;
  R18: Cyt_CCND + S7 => Cyt_CCND + Cyt_E2F_DBD_RB1_Ser332_u + Cyt_RB1_E2F_Ser807_Ser811_p; kPhRbD*Cyt_CCND*S7*Cyt;
  R19: Cyt_CCND + S8 => Cyt_CCND + Cyt_E2F_DBD_RB1_Ser332_p + Cyt_RB1_E2F_Ser807_Ser811_p; kPhRbD*Cyt_CCND*S8*Cyt;
  R20: Nuc_CCND + S47 => Nuc_CCND + Nuc_E2F_DBD_RB1_Ser332_u + Nuc_RB1_E2F_Ser807_Ser811_p; kPhRbD*Nuc_CCND*S47*Nuc;
  R21: Nuc_CCND + S48 => Nuc_CCND + Nuc_E2F_DBD_RB1_Ser332_p + Nuc_RB1_E2F_Ser807_Ser811_p; kPhRbD*Nuc_CCND*S48*Nuc;
  R22: Cyt_CCNE_CDKN1A_B + S7 => Cyt_CCNE_CDKN1A_B + Cyt_E2F_DBD_RB1_Ser332_u + Cyt_RB1_E2F_Ser807_Ser811_p; kPhRbE*Cyt_CCNE_CDKN1A_B*S7*Cyt;
  R23: Cyt_CCNE_CDKN1A_B + S8 => Cyt_CCNE_CDKN1A_B + Cyt_E2F_DBD_RB1_Ser332_p + Cyt_RB1_E2F_Ser807_Ser811_p; kPhRbE*Cyt_CCNE_CDKN1A_B*S8*Cyt;
  R24: Nuc_CCNE_CDKN1A_B + S47 => Nuc_CCNE_CDKN1A_B + Nuc_E2F_DBD_RB1_Ser332_u + Nuc_RB1_E2F_Ser807_Ser811_p; kPhRbE*Nuc_CCNE_CDKN1A_B*S47*Nuc;
  R25: Nuc_CCNE_CDKN1A_B + S48 => Nuc_CCNE_CDKN1A_B + Nuc_E2F_DBD_RB1_Ser332_p + Nuc_RB1_E2F_Ser807_Ser811_p; kPhRbE*Nuc_CCNE_CDKN1A_B*S48*Nuc;
  R26: Cyt_CCNA_CDKN1A_B + S7 => Cyt_E2F_DBD_RB1_Ser332_u + Cyt_CCNA_CDKN1A_B + Cyt_RB1_E2F_Ser807_Ser811_p; kPhRb*Cyt_CCNA_CDKN1A_B*S7*Cyt;
  R27: Cyt_CCNA_CDKN1A_B + S8 => Cyt_E2F_DBD_RB1_Ser332_p + Cyt_CCNA_CDKN1A_B + Cyt_RB1_E2F_Ser807_Ser811_p; kPhRb*Cyt_CCNA_CDKN1A_B*S8*Cyt;
  R28: Nuc_CCNA_CDKN1A_B + S47 => Nuc_E2F_DBD_RB1_Ser332_u + Nuc_CCNA_CDKN1A_B + Nuc_RB1_E2F_Ser807_Ser811_p; kPhRb*Nuc_CCNA_CDKN1A_B*S47*Nuc;
  R29: Nuc_CCNA_CDKN1A_B + S48 => Nuc_E2F_DBD_RB1_Ser332_p + Nuc_CCNA_CDKN1A_B + Nuc_RB1_E2F_Ser807_Ser811_p; kPhRb*Nuc_CCNA_CDKN1A_B*S48*Nuc;
  R30: S6 + S7 => Cyt_E2F_DBD_RB1_Ser332_u + S6 + Cyt_RB1_E2F_Ser807_Ser811_p; kPhRb*S6*S7*Cyt;
  R31: S6 + S8 => Cyt_E2F_DBD_RB1_Ser332_p + S6 + Cyt_RB1_E2F_Ser807_Ser811_p; kPhRb*S6*S8*Cyt;
  R32: S46 + S47 => Nuc_E2F_DBD_RB1_Ser332_u + S46 + Nuc_RB1_E2F_Ser807_Ser811_p; kPhRb*S46*S47*Nuc;
  R33: S46 + S48 => Nuc_E2F_DBD_RB1_Ser332_p + S46 + Nuc_RB1_E2F_Ser807_Ser811_p; kPhRb*S46*S48*Nuc;
  R34: Cyt_E2F_DBD_RB1_Ser332_u + Cyt_CCNA_CDKN1A_B => Cyt_E2F_DBD_RB1_Ser332_p + Cyt_CCNA_CDKN1A_B; kPhE2f*Cyt_E2F_DBD_RB1_Ser332_u*Cyt_CCNA_CDKN1A_B*Cyt;
  R35: Cyt_CCNA_CDKN1A_B + S7 => Cyt_CCNA_CDKN1A_B + S8; kPhE2f*Cyt_CCNA_CDKN1A_B*S7*Cyt;
  R36: Nuc_E2F_DBD_RB1_Ser332_u + Nuc_CCNA_CDKN1A_B => Nuc_E2F_DBD_RB1_Ser332_p + Nuc_CCNA_CDKN1A_B; kPhE2f*Nuc_E2F_DBD_RB1_Ser332_u*Nuc_CCNA_CDKN1A_B*Nuc;
  R37: Nuc_CCNA_CDKN1A_B + S47 => Nuc_CCNA_CDKN1A_B + S48; kPhE2f*Nuc_CCNA_CDKN1A_B*S47*Nuc;
  R38: Cyt_E2F_DBD_RB1_Ser332_u + S6 => Cyt_E2F_DBD_RB1_Ser332_p + S6; kPhE2f*Cyt_E2F_DBD_RB1_Ser332_u*S6*Cyt;
  R39: S6 + S7 => S6 + S8; kPhE2f*S6*S7*Cyt;
  R40: Nuc_E2F_DBD_RB1_Ser332_u + S46 => Nuc_E2F_DBD_RB1_Ser332_p + S46; kPhE2f*Nuc_E2F_DBD_RB1_Ser332_u*S46*Nuc;
  R41: S46 + S47 => S46 + S48; kPhE2f*S46*S47*Nuc;
  R42: Cyt_E2F_DBD_RB1_Ser332_p => Cyt_E2F_DBD_RB1_Ser332_u; kDpE2f1*Cyt_E2F_DBD_RB1_Ser332_p*Cyt;
  R43: S8 => S7; kDpE2f1*S8*Cyt;
  R44: Nuc_E2F_DBD_RB1_Ser332_p => Nuc_E2F_DBD_RB1_Ser332_u; kDpE2f1*Nuc_E2F_DBD_RB1_Ser332_p*Nuc;
  R45: S48 => S47; kDpE2f1*S48*Nuc;
  R46: Cyt_E2F_DBD_RB1_Ser332_p + Cyt_PPP2R2B_ENSA_ARPP19 => Cyt_E2F_DBD_RB1_Ser332_u + Cyt_PPP2R2B_ENSA_ARPP19; kDpE2f2*Cyt_E2F_DBD_RB1_Ser332_p*Cyt_PPP2R2B_ENSA_ARPP19*Cyt;
  R47: S8 + Cyt_PPP2R2B_ENSA_ARPP19 => S7 + Cyt_PPP2R2B_ENSA_ARPP19; kDpE2f2*S8*Cyt_PPP2R2B_ENSA_ARPP19*Cyt;
  R48: Nuc_E2F_DBD_RB1_Ser332_p + Nuc_PPP2R2B_ENSA_ARPP19 => Nuc_E2F_DBD_RB1_Ser332_u + Nuc_PPP2R2B_ENSA_ARPP19; kDpE2f2*Nuc_E2F_DBD_RB1_Ser332_p*Nuc_PPP2R2B_ENSA_ARPP19*Nuc;
  R49: S48 + Nuc_PPP2R2B_ENSA_ARPP19 => S47 + Nuc_PPP2R2B_ENSA_ARPP19; kDpE2f2*S48*Nuc_PPP2R2B_ENSA_ARPP19*Nuc;
  R50: Cyt_E2F_DBD_RB1_Ser332_p + Cyt_SKP2 => Cyt_SKP2; kDeE2f2*Cyt_E2F_DBD_RB1_Ser332_p*Cyt_SKP2*Cyt;
  R51: S8 + Cyt_SKP2 => Cyt_RB1_E2F_Ser807_Ser811_u + Cyt_SKP2; kDeE2f2*S8*Cyt_SKP2*Cyt;
  R52: Nuc_E2F_DBD_RB1_Ser332_p + Nuc_SKP2 => Nuc_SKP2; kDeE2f2*Nuc_E2F_DBD_RB1_Ser332_p*Nuc_SKP2*Nuc;
  R53: S48 + Nuc_SKP2 => Nuc_RB1_E2F_Ser807_Ser811_u + Nuc_SKP2; kDeE2f2*S48*Nuc_SKP2*Nuc;
  R54: Cyt_CCND + Cyt_RB1_E2F_Ser807_Ser811_u => Cyt_CCND + Cyt_RB1_E2F_Ser807_Ser811_p; kPhRbD*Cyt_CCND*Cyt_RB1_E2F_Ser807_Ser811_u*Cyt;
  R55: Nuc_CCND + Nuc_RB1_E2F_Ser807_Ser811_u => Nuc_CCND + Nuc_RB1_E2F_Ser807_Ser811_p; kPhRbD*Nuc_CCND*Nuc_RB1_E2F_Ser807_Ser811_u*Nuc;
  R56: Cyt_CCNE_CDKN1A_B + Cyt_RB1_E2F_Ser807_Ser811_u => Cyt_CCNE_CDKN1A_B + Cyt_RB1_E2F_Ser807_Ser811_p; kPhRbE*Cyt_CCNE_CDKN1A_B*Cyt_RB1_E2F_Ser807_Ser811_u*Cyt;
  R57: Nuc_CCNE_CDKN1A_B + Nuc_RB1_E2F_Ser807_Ser811_u => Nuc_CCNE_CDKN1A_B + Nuc_RB1_E2F_Ser807_Ser811_p; kPhRbE*Nuc_CCNE_CDKN1A_B*Nuc_RB1_E2F_Ser807_Ser811_u*Nuc;
  R58: Cyt_CCNA_CDKN1A_B + Cyt_RB1_E2F_Ser807_Ser811_u => Cyt_CCNA_CDKN1A_B + Cyt_RB1_E2F_Ser807_Ser811_p; kPhRb*Cyt_CCNA_CDKN1A_B*Cyt_RB1_E2F_Ser807_Ser811_u*Cyt;
  R59: Nuc_CCNA_CDKN1A_B + Nuc_RB1_E2F_Ser807_Ser811_u => Nuc_CCNA_CDKN1A_B + Nuc_RB1_E2F_Ser807_Ser811_p; kPhRb*Nuc_CCNA_CDKN1A_B*Nuc_RB1_E2F_Ser807_Ser811_u*Nuc;
  R60: S6 + Cyt_RB1_E2F_Ser807_Ser811_u => S6 + Cyt_RB1_E2F_Ser807_Ser811_p; kPhRb*S6*Cyt_RB1_E2F_Ser807_Ser811_u*Cyt;
  R61: S46 + Nuc_RB1_E2F_Ser807_Ser811_u => S46 + Nuc_RB1_E2F_Ser807_Ser811_p; kPhRb*S46*Nuc_RB1_E2F_Ser807_Ser811_u*Nuc;
  R62: => Cyt_CCNE_CDKN1A_B; kSyCe1*Cyt;
  R63: S86 => Cyt_CCNA_CDKN1A_B + S86; kSyCa2*S86*Nuc;
  R64: Cyt_CCNE_CDKN1A_B => ; kDeCe*Cyt_CCNE_CDKN1A_B*Cyt;
  R65: Nuc_CCNE_CDKN1A_B => ; kDeCe*Nuc_CCNE_CDKN1A_B*Nuc;
  R66: Cyt_CCNE_CDKN1A_B + Cyt_CCNE_CDKN1A_B => Cyt_CCNE_CDKN1A_B; kPhCeE*Cyt_CCNE_CDKN1A_B*Cyt_CCNE_CDKN1A_B*Cyt;
  R67: Nuc_CCNE_CDKN1A_B + Nuc_CCNE_CDKN1A_B => Nuc_CCNE_CDKN1A_B; kPhCeE*Nuc_CCNE_CDKN1A_B*Nuc_CCNE_CDKN1A_B*Nuc;
  R68: Cyt_RB1_E2F_Ser807_Ser811_p => Cyt_RB1_E2F_Ser807_Ser811_u; kDpRb*Cyt_RB1_E2F_Ser807_Ser811_p*Cyt;
  R69: Nuc_RB1_E2F_Ser807_Ser811_p => Nuc_RB1_E2F_Ser807_Ser811_u; kDpRb*Nuc_RB1_E2F_Ser807_Ser811_p*Nuc;
  R70: S14 => S12 + Cyt_CDC20_APC; kDpApc_1*S14*Cyt;
  R71: S54 => S52 + Nuc_CDC20_APC; kDpApc_1*S54*Nuc;
  R72: Cyt_PPP2R2B_ENSA_ARPP19 + S14 => Cyt_PPP2R2B_ENSA_ARPP19 + S12 + Cyt_CDC20_APC; kDpApc_2*Cyt_PPP2R2B_ENSA_ARPP19*S14*Cyt;
  R73: Nuc_PPP2R2B_ENSA_ARPP19 + S54 => Nuc_PPP2R2B_ENSA_ARPP19 + S52 + Nuc_CDC20_APC; kDpApc_2*Nuc_PPP2R2B_ENSA_ARPP19*S54*Nuc;
  R74: Cyt_CCNA_CDKN1A_B + S12 => Cyt_CCNA_CDKN1A_B + S15; kPhApcA*Cyt_CCNA_CDKN1A_B*S12*Cyt;
  R75: Cyt_CCNA_CDKN1A_B + S16 => Cyt_CCNA_CDKN1A_B + S22; kPhApcA*Cyt_CCNA_CDKN1A_B*S16*Cyt;
  R76: Cyt_CCNA_CDKN1A_B + S19 => Cyt_CCNA_CDKN1A_B + S21; kPhApcA*Cyt_CCNA_CDKN1A_B*S19*Cyt;
  R77: Nuc_CCNA_CDKN1A_B + S52 => Nuc_CCNA_CDKN1A_B + S55; kPhApcA*Nuc_CCNA_CDKN1A_B*S52*Nuc;
  R78: Nuc_CCNA_CDKN1A_B + S56 => Nuc_CCNA_CDKN1A_B + S62; kPhApcA*Nuc_CCNA_CDKN1A_B*S56*Nuc;
  R79: Nuc_CCNA_CDKN1A_B + S59 => Nuc_CCNA_CDKN1A_B + S61; kPhApcA*Nuc_CCNA_CDKN1A_B*S59*Nuc;
  R80: S6 + S12 => S6 + S15; kPhApcA*S6*S12*Cyt;
  R81: S6 + S16 => S6 + S22; kPhApcA*S6*S16*Cyt;
  R82: S6 + S19 => S6 + S21; kPhApcA*S6*S19*Cyt;
  R83: S46 + S52 => S46 + S55; kPhApcA*S46*S52*Nuc;
  R84: S46 + S56 => S46 + S62; kPhApcA*S46*S56*Nuc;
  R85: S46 + S59 => S46 + S61; kPhApcA*S46*S59*Nuc;
  R86: S15 => S12; kDpApc_1*S15*Cyt;
  R87: S21 => S19; kDpApc_1*S21*Cyt;
  R88: S22 => S16; kDpApc_1*S22*Cyt;
  R89: S55 => S52; kDpApc_1*S55*Nuc;
  R90: S61 => S59; kDpApc_1*S61*Nuc;
  R91: S62 => S56; kDpApc_1*S62*Nuc;
  R92: Cyt_PPP2R2B_ENSA_ARPP19 + S15 => Cyt_PPP2R2B_ENSA_ARPP19 + S12; kDpApc_2*Cyt_PPP2R2B_ENSA_ARPP19*S15*Cyt;
  R93: Cyt_PPP2R2B_ENSA_ARPP19 + S21 => Cyt_PPP2R2B_ENSA_ARPP19 + S19; kDpApc_2*Cyt_PPP2R2B_ENSA_ARPP19*S21*Cyt;
  R94: Cyt_PPP2R2B_ENSA_ARPP19 + S22 => Cyt_PPP2R2B_ENSA_ARPP19 + S16; kDpApc_2*Cyt_PPP2R2B_ENSA_ARPP19*S22*Cyt;
  R95: Nuc_PPP2R2B_ENSA_ARPP19 + S55 => Nuc_PPP2R2B_ENSA_ARPP19 + S52; kDpApc_2*Nuc_PPP2R2B_ENSA_ARPP19*S55*Nuc;
  R96: Nuc_PPP2R2B_ENSA_ARPP19 + S61 => Nuc_PPP2R2B_ENSA_ARPP19 + S59; kDpApc_2*Nuc_PPP2R2B_ENSA_ARPP19*S61*Nuc;
  R97: Nuc_PPP2R2B_ENSA_ARPP19 + S62 => Nuc_PPP2R2B_ENSA_ARPP19 + S56; kDpApc_2*Nuc_PPP2R2B_ENSA_ARPP19*S62*Nuc;
  R98: Cyt_CCNA_CDKN1A_B + S16 => Cyt_CCNA_CDKN1A_B + S12 + Cyt_FZR1_APC_FBXO5_nTerm_p; kPhCdhA*Cyt_CCNA_CDKN1A_B*S16*Cyt;
  R99: Cyt_CCNA_CDKN1A_B + S22 => Cyt_CCNA_CDKN1A_B + S15 + Cyt_FZR1_APC_FBXO5_nTerm_p; kPhCdhA*Cyt_CCNA_CDKN1A_B*S22*Cyt;
  R100: Nuc_CCNA_CDKN1A_B + S56 => Nuc_CCNA_CDKN1A_B + S52 + Nuc_FZR1_APC_FBXO5_nTerm_p; kPhCdhA*Nuc_CCNA_CDKN1A_B*S56*Nuc;
  R101: Nuc_CCNA_CDKN1A_B + S62 => Nuc_CCNA_CDKN1A_B + S55 + Nuc_FZR1_APC_FBXO5_nTerm_p; kPhCdhA*Nuc_CCNA_CDKN1A_B*S62*Nuc;
  R102: Cyt_CCNE_CDKN1A_B + S19 => Cyt_CCNE_CDKN1A_B + S12 + Cyt_FZR1_APC_FBXO5_nTerm_p + Cyt_FBXO5_APC_FZR1_Ser182_u; kPhCAEE*Cyt_CCNE_CDKN1A_B*S19*Cyt;
  R103: Cyt_CCNE_CDKN1A_B + S21 => Cyt_CCNE_CDKN1A_B + S15 + Cyt_FZR1_APC_FBXO5_nTerm_p + Cyt_FBXO5_APC_FZR1_Ser182_u; kPhCAEE*Cyt_CCNE_CDKN1A_B*S21*Cyt;
  R104: Nuc_CCNE_CDKN1A_B + S59 => Nuc_CCNE_CDKN1A_B + S52 + Nuc_FZR1_APC_FBXO5_nTerm_p + Nuc_FBXO5_APC_FZR1_Ser182_u; kPhCAEE*Nuc_CCNE_CDKN1A_B*S59*Nuc;
  R105: Nuc_CCNE_CDKN1A_B + S61 => Nuc_CCNE_CDKN1A_B + S55 + Nuc_FZR1_APC_FBXO5_nTerm_p + Nuc_FBXO5_APC_FZR1_Ser182_u; kPhCAEE*Nuc_CCNE_CDKN1A_B*S61*Nuc;
  R106: Cyt_CCNA_CDKN1A_B + S19 => Cyt_CCNA_CDKN1A_B + S12 + Cyt_FZR1_APC_FBXO5_nTerm_p + Cyt_FBXO5_APC_FZR1_Ser182_u; kPhCAEA*Cyt_CCNA_CDKN1A_B*S19*Cyt;
  R107: Cyt_CCNA_CDKN1A_B + S21 => Cyt_CCNA_CDKN1A_B + S15 + Cyt_FZR1_APC_FBXO5_nTerm_p + Cyt_FBXO5_APC_FZR1_Ser182_u; kPhCAEA*Cyt_CCNA_CDKN1A_B*S21*Cyt;
  R108: Nuc_CCNA_CDKN1A_B + S59 => Nuc_CCNA_CDKN1A_B + S52 + Nuc_FZR1_APC_FBXO5_nTerm_p + Nuc_FBXO5_APC_FZR1_Ser182_u; kPhCAEA*Nuc_CCNA_CDKN1A_B*S59*Nuc;
  R109: Nuc_CCNA_CDKN1A_B + S61 => Nuc_CCNA_CDKN1A_B + S55 + Nuc_FZR1_APC_FBXO5_nTerm_p + Nuc_FBXO5_APC_FZR1_Ser182_u; kPhCAEA*Nuc_CCNA_CDKN1A_B*S61*Nuc;
  R110: S6 + S19 => S6 + S12 + Cyt_FZR1_APC_FBXO5_nTerm_p + Cyt_FBXO5_APC_FZR1_Ser182_u; kPhCAEB*S6*S19*Cyt;
  R111: S6 + S21 => S6 + S15 + Cyt_FZR1_APC_FBXO5_nTerm_p + Cyt_FBXO5_APC_FZR1_Ser182_u; kPhCAEB*S6*S21*Cyt;
  R112: S46 + S59 => S46 + S52 + Nuc_FZR1_APC_FBXO5_nTerm_p + Nuc_FBXO5_APC_FZR1_Ser182_u; kPhCAEB*S46*S59*Nuc;
  R113: S46 + S61 => S46 + S55 + Nuc_FZR1_APC_FBXO5_nTerm_p + Nuc_FBXO5_APC_FZR1_Ser182_u; kPhCAEB*S46*S61*Nuc;
  R114: Cyt_CCNE_CDKN1A_B + S16 => Cyt_CCNE_CDKN1A_B + S12 + Cyt_FZR1_APC_FBXO5_nTerm_p; kPhCdhE*Cyt_CCNE_CDKN1A_B*S16*Cyt;
  R115: Cyt_CCNE_CDKN1A_B + S22 => Cyt_CCNE_CDKN1A_B + S15 + Cyt_FZR1_APC_FBXO5_nTerm_p; kPhCdhE*Cyt_CCNE_CDKN1A_B*S22*Cyt;
  R116: Nuc_CCNE_CDKN1A_B + S56 => Nuc_CCNE_CDKN1A_B + S52 + Nuc_FZR1_APC_FBXO5_nTerm_p; kPhCdhE*Nuc_CCNE_CDKN1A_B*S56*Nuc;
  R117: Nuc_CCNE_CDKN1A_B + S62 => Nuc_CCNE_CDKN1A_B + S55 + Nuc_FZR1_APC_FBXO5_nTerm_p; kPhCdhE*Nuc_CCNE_CDKN1A_B*S62*Nuc;
  R118: S19 => S16; kDeEmi1*S19*Cyt;
  R119: Cyt_FBXO5_APC_FZR1_Ser182_u => ; kDeEmi1*Cyt_FBXO5_APC_FZR1_Ser182_u*Cyt;
  R120: S21 => S22; kDeEmi1*S21*Cyt;
  R121: Cyt_FBXO5_APC_FZR1_Ser182_p => ; kDeEmi1*Cyt_FBXO5_APC_FZR1_Ser182_p*Cyt;
  R122: S59 => S56; kDeEmi1*S59*Nuc;
  R123: Nuc_FBXO5_APC_FZR1_Ser182_u => ; kDeEmi1*Nuc_FBXO5_APC_FZR1_Ser182_u*Nuc;
  R124: S61 => S62; kDeEmi1*S61*Nuc;
  R125: Nuc_FBXO5_APC_FZR1_Ser182_p => ; kDeEmi1*Nuc_FBXO5_APC_FZR1_Ser182_p*Nuc;
  R126: S19 => S16; kDeEmi2*S19*Cyt;
  R127: S21 => S22; kDeEmi2*S21*Cyt;
  R128: S59 => S56; kDeEmi2*S59*Nuc;
  R129: S61 => S62; kDeEmi2*S61*Nuc;
  R130: Cyt_CCNA_CDKN1A_B + S19 => Cyt_CCNA_CDKN1A_B + S16 + Cyt_FBXO5_APC_FZR1_Ser182_p; kPhEmiA*Cyt_CCNA_CDKN1A_B*S19*Cyt;
  R131: Cyt_CCNA_CDKN1A_B + S21 => Cyt_CCNA_CDKN1A_B + S22 + Cyt_FBXO5_APC_FZR1_Ser182_p; kPhEmiA*Cyt_CCNA_CDKN1A_B*S21*Cyt;
  R132: Nuc_CCNA_CDKN1A_B + S59 => Nuc_CCNA_CDKN1A_B + S56 + Nuc_FBXO5_APC_FZR1_Ser182_p; kPhEmiA*Nuc_CCNA_CDKN1A_B*S59*Nuc;
  R133: Nuc_CCNA_CDKN1A_B + S61 => Nuc_CCNA_CDKN1A_B + S62 + Nuc_FBXO5_APC_FZR1_Ser182_p; kPhEmiA*Nuc_CCNA_CDKN1A_B*S61*Nuc;
  R134: S6 + S19 => S6 + S16 + Cyt_FBXO5_APC_FZR1_Ser182_p; kPhEmiB*S6*S19*Cyt;
  R135: S6 + S21 => S6 + S22 + Cyt_FBXO5_APC_FZR1_Ser182_p; kPhEmiB*S6*S21*Cyt;
  R136: S46 + S59 => S46 + S56 + Nuc_FBXO5_APC_FZR1_Ser182_p; kPhEmiB*S46*S59*Nuc;
  R137: S46 + S61 => S46 + S62 + Nuc_FBXO5_APC_FZR1_Ser182_p; kPhEmiB*S46*S61*Nuc;
  R138: Cyt_CCNA_CDKN1A_B + Cyt_FBXO5_APC_FZR1_Ser182_u => Cyt_CCNA_CDKN1A_B + Cyt_FBXO5_APC_FZR1_Ser182_p; kPhEmiA*Cyt_CCNA_CDKN1A_B*Cyt_FBXO5_APC_FZR1_Ser182_u*Cyt;
  R139: Nuc_CCNA_CDKN1A_B + Nuc_FBXO5_APC_FZR1_Ser182_u => Nuc_CCNA_CDKN1A_B + Nuc_FBXO5_APC_FZR1_Ser182_p; kPhEmiA*Nuc_CCNA_CDKN1A_B*Nuc_FBXO5_APC_FZR1_Ser182_u*Nuc;
  R140: S6 + Cyt_FBXO5_APC_FZR1_Ser182_u => S6 + Cyt_FBXO5_APC_FZR1_Ser182_p; kPhEmiB*S6*Cyt_FBXO5_APC_FZR1_Ser182_u*Cyt;
  R141: S46 + Nuc_FBXO5_APC_FZR1_Ser182_u => S46 + Nuc_FBXO5_APC_FZR1_Ser182_p; kPhEmiB*S46*Nuc_FBXO5_APC_FZR1_Ser182_u*Nuc;
  R142: Cyt_FBXO5_APC_FZR1_Ser182_p => Cyt_FBXO5_APC_FZR1_Ser182_u; kDpEmi*Cyt_FBXO5_APC_FZR1_Ser182_p*Cyt;
  R143: Nuc_FBXO5_APC_FZR1_Ser182_p => Nuc_FBXO5_APC_FZR1_Ser182_u; kDpEmi*Nuc_FBXO5_APC_FZR1_Ser182_p*Nuc;
  R144: Cyt_FBXO5_APC_FZR1_Ser182_p => ; kDeEmi3*Cyt_FBXO5_APC_FZR1_Ser182_p*Cyt;
  R145: Nuc_FBXO5_APC_FZR1_Ser182_p => ; kDeEmi3*Nuc_FBXO5_APC_FZR1_Ser182_p*Nuc;
  R146: => Cyt_FOXM1_DBD_Thr600_u; kSyFox1*Cyt;
  R147: S88 => Cyt_FBXO5_APC_FZR1_Ser182_u + S88; kSyEmi2*S88*Nuc;
  R148: Cyt_CCNE_CDKN1A_B + Cyt_FZR1_APC_FBXO5_nTerm_u => Cyt_CCNE_CDKN1A_B + Cyt_FZR1_APC_FBXO5_nTerm_p; kPhCdhE*Cyt_CCNE_CDKN1A_B*Cyt_FZR1_APC_FBXO5_nTerm_u*Cyt;
  R149: Nuc_CCNE_CDKN1A_B + Nuc_FZR1_APC_FBXO5_nTerm_u => Nuc_CCNE_CDKN1A_B + Nuc_FZR1_APC_FBXO5_nTerm_p; kPhCdhE*Nuc_CCNE_CDKN1A_B*Nuc_FZR1_APC_FBXO5_nTerm_u*Nuc;
  R150: Cyt_CCNA_CDKN1A_B + Cyt_FZR1_APC_FBXO5_nTerm_u => Cyt_CCNA_CDKN1A_B + Cyt_FZR1_APC_FBXO5_nTerm_p; kPhCdhA*Cyt_CCNA_CDKN1A_B*Cyt_FZR1_APC_FBXO5_nTerm_u*Cyt;
  R151: Nuc_CCNA_CDKN1A_B + Nuc_FZR1_APC_FBXO5_nTerm_u => Nuc_CCNA_CDKN1A_B + Nuc_FZR1_APC_FBXO5_nTerm_p; kPhCdhA*Nuc_CCNA_CDKN1A_B*Nuc_FZR1_APC_FBXO5_nTerm_u*Nuc;
  R152: S6 + Cyt_FZR1_APC_FBXO5_nTerm_u => S6 + Cyt_FZR1_APC_FBXO5_nTerm_p; kPhCdhB*S6*Cyt_FZR1_APC_FBXO5_nTerm_u*Cyt;
  R153: S46 + Nuc_FZR1_APC_FBXO5_nTerm_u => S46 + Nuc_FZR1_APC_FBXO5_nTerm_p; kPhCdhB*S46*Nuc_FZR1_APC_FBXO5_nTerm_u*Nuc;
  R154: Cyt_FZR1_APC_FBXO5_nTerm_p => Cyt_FZR1_APC_FBXO5_nTerm_u; kDpCdh*Cyt_FZR1_APC_FBXO5_nTerm_p*Cyt;
  R155: Nuc_FZR1_APC_FBXO5_nTerm_p => Nuc_FZR1_APC_FBXO5_nTerm_u; kDpCdh*Nuc_FZR1_APC_FBXO5_nTerm_p*Nuc;
  R156: => Cyt_CCNA_CDKN1A_B; kSyCa1*Cyt;
  R157: Cyt_CCNA_CDKN1A_B => ; kDeCa1*Cyt_CCNA_CDKN1A_B*Cyt;
  R158: Nuc_CCNA_CDKN1A_B => ; kDeCa1*Nuc_CCNA_CDKN1A_B*Nuc;
  R159: Cyt_CCNE_CDKN1A_B + Cyt_CCNA_CDKN1A_B => Cyt_CCNA_CDKN1A_B; kPhCeA*Cyt_CCNE_CDKN1A_B*Cyt_CCNA_CDKN1A_B*Cyt;
  R160: Nuc_CCNE_CDKN1A_B + Nuc_CCNA_CDKN1A_B => Nuc_CCNA_CDKN1A_B; kPhCeA*Nuc_CCNE_CDKN1A_B*Nuc_CCNA_CDKN1A_B*Nuc;
  R161: Cyt_CCNA_CDKN1A_B + S16 => S16; kDeCa2*Cyt_CCNA_CDKN1A_B*S16*Cyt;
  R162: Cyt_CCNA_CDKN1A_B + S22 => S22; kDeCa2*Cyt_CCNA_CDKN1A_B*S22*Cyt;
  R163: Nuc_CCNA_CDKN1A_B + S56 => S56; kDeCa2*Nuc_CCNA_CDKN1A_B*S56*Nuc;
  R164: Nuc_CCNA_CDKN1A_B + S62 => S62; kDeCa2*Nuc_CCNA_CDKN1A_B*S62*Nuc;
  R165: Cyt_CCNA_CDKN1A_B + S14 => S14; kDeCa3*Cyt_CCNA_CDKN1A_B*S14*Cyt;
  R166: Nuc_CCNA_CDKN1A_B + S54 => S54; kDeCa3*Nuc_CCNA_CDKN1A_B*S54*Nuc;
  R167: S89 => Cyt_FOXM1_DBD_Thr600_u + S89; kSyFox2*S89*Nuc;
  R168: Cyt_FOXM1_DBD_Thr600_u => ; kDeFox1*Cyt_FOXM1_DBD_Thr600_u*Cyt;
  R169: Cyt_FOXM1_DBD_Thr600_p => ; kDeFox1*Cyt_FOXM1_DBD_Thr600_p*Cyt;
  R170: Nuc_FOXM1_DBD_Thr600_u => ; kDeFox1*Nuc_FOXM1_DBD_Thr600_u*Nuc;
  R171: Nuc_FOXM1_DBD_Thr600_p => ; kDeFox1*Nuc_FOXM1_DBD_Thr600_p*Nuc;
  R172: S66 => Nuc_CCNB_promoter_FOXM1; kDeFox1*S66*Nuc;
  R173: S69 => Nuc_CDC20_promoter_FOXM1; kDeFox1*S69*Nuc;
  R174: S16 + Cyt_FOXM1_DBD_Thr600_u => S16; kDeFox2*S16*Cyt_FOXM1_DBD_Thr600_u*Cyt;
  R175: S22 + Cyt_FOXM1_DBD_Thr600_u => S22; kDeFox2*S22*Cyt_FOXM1_DBD_Thr600_u*Cyt;
  R176: S16 + Cyt_FOXM1_DBD_Thr600_p => S16; kDeFox2*S16*Cyt_FOXM1_DBD_Thr600_p*Cyt;
  R177: S22 + Cyt_FOXM1_DBD_Thr600_p => S22; kDeFox2*S22*Cyt_FOXM1_DBD_Thr600_p*Cyt;
  R178: S56 + Nuc_FOXM1_DBD_Thr600_u => S56; kDeFox2*S56*Nuc_FOXM1_DBD_Thr600_u*Nuc;
  R179: S62 + Nuc_FOXM1_DBD_Thr600_u => S62; kDeFox2*S62*Nuc_FOXM1_DBD_Thr600_u*Nuc;
  R180: S56 + Nuc_FOXM1_DBD_Thr600_p => S56; kDeFox2*S56*Nuc_FOXM1_DBD_Thr600_p*Nuc;
  R181: S62 + Nuc_FOXM1_DBD_Thr600_p => S62; kDeFox2*S62*Nuc_FOXM1_DBD_Thr600_p*Nuc;
  R182: Cyt_CCNE_CDKN1A_B + Cyt_FOXM1_DBD_Thr600_u => Cyt_CCNE_CDKN1A_B + Cyt_FOXM1_DBD_Thr600_p; kPhFoxE*Cyt_CCNE_CDKN1A_B*Cyt_FOXM1_DBD_Thr600_u*Cyt;
  R183: Nuc_CCNE_CDKN1A_B + Nuc_FOXM1_DBD_Thr600_u => Nuc_CCNE_CDKN1A_B + Nuc_FOXM1_DBD_Thr600_p; kPhFoxE*Nuc_CCNE_CDKN1A_B*Nuc_FOXM1_DBD_Thr600_u*Nuc;
  R184: Cyt_CCNA_CDKN1A_B + Cyt_FOXM1_DBD_Thr600_u => Cyt_CCNA_CDKN1A_B + Cyt_FOXM1_DBD_Thr600_p; kPhFoxA*Cyt_CCNA_CDKN1A_B*Cyt_FOXM1_DBD_Thr600_u*Cyt;
  R185: Nuc_CCNA_CDKN1A_B + Nuc_FOXM1_DBD_Thr600_u => Nuc_CCNA_CDKN1A_B + Nuc_FOXM1_DBD_Thr600_p; kPhFoxA*Nuc_CCNA_CDKN1A_B*Nuc_FOXM1_DBD_Thr600_u*Nuc;
  R186: S6 + Cyt_FOXM1_DBD_Thr600_u => S6 + Cyt_FOXM1_DBD_Thr600_p; kPhFoxB*S6*Cyt_FOXM1_DBD_Thr600_u*Cyt;
  R187: S46 + Nuc_FOXM1_DBD_Thr600_u => S46 + Nuc_FOXM1_DBD_Thr600_p; kPhFoxB*S46*Nuc_FOXM1_DBD_Thr600_u*Nuc;
  R188: Cyt_FOXM1_DBD_Thr600_p => Cyt_FOXM1_DBD_Thr600_u; kDpFox*Cyt_FOXM1_DBD_Thr600_p*Cyt;
  R189: Nuc_FOXM1_DBD_Thr600_p => Nuc_FOXM1_DBD_Thr600_u; kDpFox*Nuc_FOXM1_DBD_Thr600_p*Nuc;
  R190: S66 => S96; kDpFox*S66*Nuc;
  R191: S69 => S97; kDpFox*S69*Nuc;
  R192: => S6; _rateLaw1*Cyt;
  R193: S66 => S6 + S66; _rateLaw2*S66*Nuc;
  R194: S6 => ; kDeCb1*S6*Cyt;
  R195: S27 => ; kDeCb1*S27*Cyt;
  R196: S46 => ; kDeCb1*S46*Nuc;
  R197: S71 => ; kDeCb1*S71*Nuc;
  R198: S6 + S16 => S16; kDeCb2*S6*S16*Cyt;
  R199: S6 + S22 => S22; kDeCb2*S6*S22*Cyt;
  R200: S16 + S27 => S16; kDeCb2*S16*S27*Cyt;
  R201: S22 + S27 => S22; kDeCb2*S22*S27*Cyt;
  R202: S46 + S56 => S56; kDeCb2*S46*S56*Nuc;
  R203: S46 + S62 => S62; kDeCb2*S46*S62*Nuc;
  R204: S56 + S71 => S56; kDeCb2*S56*S71*Nuc;
  R205: S62 + S71 => S62; kDeCb2*S62*S71*Nuc;
  R206: S6 + S14 => S14; kDeCb3*S6*S14*Cyt;
  R207: S14 + S27 => S14; kDeCb3*S14*S27*Cyt;
  R208: S46 + S54 => S54; kDeCb3*S46*S54*Nuc;
  R209: S54 + S71 => S54; kDeCb3*S54*S71*Nuc;
  R210: Cyt_CDC20_APC => ; kDeCdc_1*Cyt_CDC20_APC*Cyt;
  R211: S14 => S15; kDeCdc_1*S14*Cyt;
  R212: Nuc_CDC20_APC => ; kDeCdc_1*Nuc_CDC20_APC*Nuc;
  R213: S54 => S55; kDeCdc_1*S54*Nuc;
  R214: Cyt_CDC20_APC + S16 => S16; kDeCdc_2*Cyt_CDC20_APC*S16*Cyt;
  R215: Cyt_CDC20_APC + S22 => S22; kDeCdc_2*Cyt_CDC20_APC*S22*Cyt;
  R216: S14 + S16 => S15 + S16; kDeCdc_2*S14*S16*Cyt;
  R217: S14 + S22 => S15 + S22; kDeCdc_2*S14*S22*Cyt;
  R218: Nuc_CDC20_APC + S56 => S56; kDeCdc_2*Nuc_CDC20_APC*S56*Nuc;
  R219: Nuc_CDC20_APC + S62 => S62; kDeCdc_2*Nuc_CDC20_APC*S62*Nuc;
  R220: S54 + S56 => S55 + S56; kDeCdc_2*S54*S56*Nuc;
  R221: S54 + S62 => S55 + S62; kDeCdc_2*S54*S62*Nuc;
  R222: => Cyt_CDC20_APC; kSyCdc_1*Cyt;
  R223: S69 => Cyt_CDC20_APC + S69; kSyCdc_2*S69*Nuc;
  R224: Nuc_FOXM1_DBD_Thr600_p + Nuc_CDC20_promoter_FOXM1 => S69; kAsFPcdc*Nuc_FOXM1_DBD_Thr600_p*Nuc_CDC20_promoter_FOXM1*Nuc;
  R225: S69 => Nuc_FOXM1_DBD_Thr600_p + Nuc_CDC20_promoter_FOXM1; kDiFPcdc*S69*Nuc;
  R226: S6 + Cyt_WEE1_Ser123_u => Cyt_WEE1_Ser123_u + S27; kWee2*S6*Cyt_WEE1_Ser123_u*Cyt;
  R227: S46 + Nuc_WEE1_Ser123_u => Nuc_WEE1_Ser123_u + S71; kWee2*S46*Nuc_WEE1_Ser123_u*Nuc;
  R228: S6 + Cyt_WEE1_Ser123_p => S27 + Cyt_WEE1_Ser123_p; kWee1*S6*Cyt_WEE1_Ser123_p*Cyt;
  R229: S46 + Nuc_WEE1_Ser123_p => S71 + Nuc_WEE1_Ser123_p; kWee1*S46*Nuc_WEE1_Ser123_p*Nuc;
  R230: S27 + Cyt_CDC25_pSites_p => S6 + Cyt_CDC25_pSites_p; kCdc25_2*S27*Cyt_CDC25_pSites_p*Cyt;
  R231: S71 + Nuc_CDC25_pSites_p => S46 + Nuc_CDC25_pSites_p; kCdc25_2*S71*Nuc_CDC25_pSites_p*Nuc;
  R232: S27 + Cyt_CDC25_pSites_u => S6 + Cyt_CDC25_pSites_u; kCdc25_1*S27*Cyt_CDC25_pSites_u*Cyt;
  R233: S71 + Nuc_CDC25_pSites_u => S46 + Nuc_CDC25_pSites_u; kCdc25_1*S71*Nuc_CDC25_pSites_u*Nuc;
  R234: S6 + Cyt_CDC25_pSites_u => S6 + Cyt_CDC25_pSites_p; kPhC25B*S6*Cyt_CDC25_pSites_u*Cyt;
  R235: S46 + Nuc_CDC25_pSites_u => S46 + Nuc_CDC25_pSites_p; kPhC25B*S46*Nuc_CDC25_pSites_u*Nuc;
  R236: Cyt_CCNA_CDKN1A_B + Cyt_CDC25_pSites_u => Cyt_CCNA_CDKN1A_B + Cyt_CDC25_pSites_p; kPhC25A*Cyt_CCNA_CDKN1A_B*Cyt_CDC25_pSites_u*Cyt;
  R237: Nuc_CCNA_CDKN1A_B + Nuc_CDC25_pSites_u => Nuc_CCNA_CDKN1A_B + Nuc_CDC25_pSites_p; kPhC25A*Nuc_CCNA_CDKN1A_B*Nuc_CDC25_pSites_u*Nuc;
  R238: Cyt_PPP2R2B_ENSA_ARPP19 + Cyt_CDC25_pSites_p => Cyt_PPP2R2B_ENSA_ARPP19 + Cyt_CDC25_pSites_u; kDpCdc25*Cyt_PPP2R2B_ENSA_ARPP19*Cyt_CDC25_pSites_p*Cyt;
  R239: Nuc_PPP2R2B_ENSA_ARPP19 + Nuc_CDC25_pSites_p => Nuc_PPP2R2B_ENSA_ARPP19 + Nuc_CDC25_pSites_u; kDpCdc25*Nuc_PPP2R2B_ENSA_ARPP19*Nuc_CDC25_pSites_p*Nuc;
  R240: Cyt_PPP2R2B_ENSA_ARPP19 + Cyt_WEE1_Ser123_p => Cyt_PPP2R2B_ENSA_ARPP19 + Cyt_WEE1_Ser123_u; kDpWee*Cyt_PPP2R2B_ENSA_ARPP19*Cyt_WEE1_Ser123_p*Cyt;
  R241: Nuc_PPP2R2B_ENSA_ARPP19 + Nuc_WEE1_Ser123_p => Nuc_PPP2R2B_ENSA_ARPP19 + Nuc_WEE1_Ser123_u; kDpWee*Nuc_PPP2R2B_ENSA_ARPP19*Nuc_WEE1_Ser123_p*Nuc;
  R242: Cyt_CCNA_CDKN1A_B + Cyt_WEE1_Ser123_u => Cyt_CCNA_CDKN1A_B + Cyt_WEE1_Ser123_p; kPhWeeA*Cyt_CCNA_CDKN1A_B*Cyt_WEE1_Ser123_u*Cyt;
  R243: Nuc_CCNA_CDKN1A_B + Nuc_WEE1_Ser123_u => Nuc_CCNA_CDKN1A_B + Nuc_WEE1_Ser123_p; kPhWeeA*Nuc_CCNA_CDKN1A_B*Nuc_WEE1_Ser123_u*Nuc;
  R244: S6 + Cyt_WEE1_Ser123_u => S6 + Cyt_WEE1_Ser123_p; kPhWeeB*S6*Cyt_WEE1_Ser123_u*Cyt;
  R245: S46 + Nuc_WEE1_Ser123_u => S46 + Nuc_WEE1_Ser123_p; kPhWeeB*S46*Nuc_WEE1_Ser123_u*Nuc;
  R246: S6 + Cyt_MASTL_Thr198_u => S6 + Cyt_MASTL_Thr198_p; kPhGw*S6*Cyt_MASTL_Thr198_u*Cyt;
  R247: S46 + Nuc_MASTL_Thr198_u => S46 + Nuc_MASTL_Thr198_p; kPhGw*S46*Nuc_MASTL_Thr198_u*Nuc;
  R248: Cyt_MASTL_Thr198_p => Cyt_MASTL_Thr198_u; kDpGw1*Cyt_MASTL_Thr198_p*Cyt;
  R249: Nuc_MASTL_Thr198_p => Nuc_MASTL_Thr198_u; kDpGw1*Nuc_MASTL_Thr198_p*Nuc;
  R250: Cyt_PPP2R2B_ENSA_ARPP19 + Cyt_MASTL_Thr198_p => Cyt_PPP2R2B_ENSA_ARPP19 + Cyt_MASTL_Thr198_u; kDpGw2*Cyt_PPP2R2B_ENSA_ARPP19*Cyt_MASTL_Thr198_p*Cyt;
  R251: Nuc_PPP2R2B_ENSA_ARPP19 + Nuc_MASTL_Thr198_p => Nuc_PPP2R2B_ENSA_ARPP19 + Nuc_MASTL_Thr198_u; kDpGw2*Nuc_PPP2R2B_ENSA_ARPP19*Nuc_MASTL_Thr198_p*Nuc;
  R252: Cyt_MASTL_Thr198_p + S33 => Cyt_MASTL_Thr198_p + S34; kPhEnsa*Cyt_MASTL_Thr198_p*S33*Cyt;
  R253: Nuc_MASTL_Thr198_p + S77 => Nuc_MASTL_Thr198_p + S78; kPhEnsa*Nuc_MASTL_Thr198_p*S77*Nuc;
  R254: S35 => Cyt_PPP2R2B_ENSA_ARPP19 + S33; kDpEnsa*S35*Cyt;
  R255: S79 => Nuc_PPP2R2B_ENSA_ARPP19 + S77; kDpEnsa*S79*Nuc;
  R256: => Cyt_FBXO5_APC_FZR1_Ser182_u; kSyEmi1*Cyt;
  R257: S85 => Cyt_CCNE_CDKN1A_B + S85; kSyCe2*S85*Nuc;
  R258: S6 + S16 => S6 + S12 + Cyt_FZR1_APC_FBXO5_nTerm_p; kPhCdhB*S6*S16*Cyt;
  R259: S6 + S22 => S6 + S15 + Cyt_FZR1_APC_FBXO5_nTerm_p; kPhCdhB*S6*S22*Cyt;
  R260: S46 + S56 => S46 + S52 + Nuc_FZR1_APC_FBXO5_nTerm_p; kPhCdhB*S46*S56*Nuc;
  R261: S46 + S62 => S46 + S55 + Nuc_FZR1_APC_FBXO5_nTerm_p; kPhCdhB*S46*S62*Nuc;
  R262: Cyt_E2F_DBD_RB1_Ser332_u + Cyt_RB1_E2F_Ser807_Ser811_u => S7; kAsE2fRb*Cyt_E2F_DBD_RB1_Ser332_u*Cyt_RB1_E2F_Ser807_Ser811_u*Cyt;
  R263: Cyt_E2F_DBD_RB1_Ser332_p + Cyt_RB1_E2F_Ser807_Ser811_u => S8; kAsE2fRb*Cyt_E2F_DBD_RB1_Ser332_p*Cyt_RB1_E2F_Ser807_Ser811_u*Cyt;
  R264: Nuc_E2F_DBD_RB1_Ser332_u + Nuc_RB1_E2F_Ser807_Ser811_u => S47; kAsE2fRb*Nuc_E2F_DBD_RB1_Ser332_u*Nuc_RB1_E2F_Ser807_Ser811_u*Nuc;
  R265: Nuc_E2F_DBD_RB1_Ser332_p + Nuc_RB1_E2F_Ser807_Ser811_u => S48; kAsE2fRb*Nuc_E2F_DBD_RB1_Ser332_p*Nuc_RB1_E2F_Ser807_Ser811_u*Nuc;
  R266: S7 => Cyt_E2F_DBD_RB1_Ser332_u + Cyt_RB1_E2F_Ser807_Ser811_u; kDiE2fRb*S7*Cyt;
  R267: S8 => Cyt_E2F_DBD_RB1_Ser332_p + Cyt_RB1_E2F_Ser807_Ser811_u; kDiE2fRb*S8*Cyt;
  R268: S47 => Nuc_E2F_DBD_RB1_Ser332_u + Nuc_RB1_E2F_Ser807_Ser811_u; kDiE2fRb*S47*Nuc;
  R269: S48 => Nuc_E2F_DBD_RB1_Ser332_p + Nuc_RB1_E2F_Ser807_Ser811_u; kDiE2fRb*S48*Nuc;
  R270: S12 + Cyt_FZR1_APC_FBXO5_nTerm_u => S16; kAsACdh*S12*Cyt_FZR1_APC_FBXO5_nTerm_u*Cyt;
  R271: S15 + Cyt_FZR1_APC_FBXO5_nTerm_u => S22; kAsACdh*S15*Cyt_FZR1_APC_FBXO5_nTerm_u*Cyt;
  R272: S52 + Nuc_FZR1_APC_FBXO5_nTerm_u => S56; kAsACdh*S52*Nuc_FZR1_APC_FBXO5_nTerm_u*Nuc;
  R273: S55 + Nuc_FZR1_APC_FBXO5_nTerm_u => S62; kAsACdh*S55*Nuc_FZR1_APC_FBXO5_nTerm_u*Nuc;
  R274: S16 => S12 + Cyt_FZR1_APC_FBXO5_nTerm_u; kDiACdh*S16*Cyt;
  R275: S22 => S15 + Cyt_FZR1_APC_FBXO5_nTerm_u; kDiACdh*S22*Cyt;
  R276: S56 => S52 + Nuc_FZR1_APC_FBXO5_nTerm_u; kDiACdh*S56*Nuc;
  R277: S62 => S55 + Nuc_FZR1_APC_FBXO5_nTerm_u; kDiACdh*S62*Nuc;
  R278: S16 + Cyt_FBXO5_APC_FZR1_Ser182_u => S19; kAsACE*S16*Cyt_FBXO5_APC_FZR1_Ser182_u*Cyt;
  R279: Cyt_FBXO5_APC_FZR1_Ser182_u + S22 => S21; kAsACE*Cyt_FBXO5_APC_FZR1_Ser182_u*S22*Cyt;
  R280: S56 + Nuc_FBXO5_APC_FZR1_Ser182_u => S59; kAsACE*S56*Nuc_FBXO5_APC_FZR1_Ser182_u*Nuc;
  R281: Nuc_FBXO5_APC_FZR1_Ser182_u + S62 => S61; kAsACE*Nuc_FBXO5_APC_FZR1_Ser182_u*S62*Nuc;
  R282: S19 => S16 + Cyt_FBXO5_APC_FZR1_Ser182_u; kDiACE*S19*Cyt;
  R283: S21 => Cyt_FBXO5_APC_FZR1_Ser182_u + S22; kDiACE*S21*Cyt;
  R284: S59 => S56 + Nuc_FBXO5_APC_FZR1_Ser182_u; kDiACE*S59*Nuc;
  R285: S61 => Nuc_FBXO5_APC_FZR1_Ser182_u + S62; kDiACE*S61*Nuc;
  R286: Cyt_CDC20_APC + S15 => S14; kAspACdc*Cyt_CDC20_APC*S15*Cyt;
  R287: Nuc_CDC20_APC + S55 => S54; kAspACdc*Nuc_CDC20_APC*S55*Nuc;
  R288: S14 => Cyt_CDC20_APC + S15; kDipACdc*S14*Cyt;
  R289: S54 => Nuc_CDC20_APC + S55; kDipACdc*S54*Nuc;
  R290: Cyt_PPP2R2B_ENSA_ARPP19 + S34 => S35; kAspEB55*Cyt_PPP2R2B_ENSA_ARPP19*S34*Cyt;
  R291: Nuc_PPP2R2B_ENSA_ARPP19 + S78 => S79; kAspEB55*Nuc_PPP2R2B_ENSA_ARPP19*S78*Nuc;
  R292: S35 => Cyt_PPP2R2B_ENSA_ARPP19 + S34; kDipEB55*S35*Cyt;
  R293: S79 => Nuc_PPP2R2B_ENSA_ARPP19 + S78; kDipEB55*S79*Nuc;
  R294: Nuc_E2F_DBD_RB1_Ser332_u + Nuc_CCNE_promoter_E2F => S85; kAsEPx*Nuc_E2F_DBD_RB1_Ser332_u*Nuc_CCNE_promoter_E2F*Nuc;
  R295: S85 => Nuc_E2F_DBD_RB1_Ser332_u + Nuc_CCNE_promoter_E2F; kDiEPx*S85*Nuc;
  R296: Nuc_E2F_DBD_RB1_Ser332_u + Nuc_CCNA_promoter_E2F => S86; kAsEPx*Nuc_E2F_DBD_RB1_Ser332_u*Nuc_CCNA_promoter_E2F*Nuc;
  R297: S86 => Nuc_E2F_DBD_RB1_Ser332_u + Nuc_CCNA_promoter_E2F; kDiEPx*S86*Nuc;
  R298: Nuc_E2F_DBD_RB1_Ser332_u + Nuc_E2F_promoter_E2F => S87; kAsEPx*Nuc_E2F_DBD_RB1_Ser332_u*Nuc_E2F_promoter_E2F*Nuc;
  R299: S87 => Nuc_E2F_DBD_RB1_Ser332_u + Nuc_E2F_promoter_E2F; kDiEPx*S87*Nuc;
  R300: Nuc_E2F_DBD_RB1_Ser332_u + Nuc_FBXO5_promoter_E2F => S88; kAsEPx*Nuc_E2F_DBD_RB1_Ser332_u*Nuc_FBXO5_promoter_E2F*Nuc;
  R301: S88 => Nuc_E2F_DBD_RB1_Ser332_u + Nuc_FBXO5_promoter_E2F; kDiEPx*S88*Nuc;
  R302: Nuc_E2F_DBD_RB1_Ser332_u + Nuc_FOXM1_promoter_E2F => S89; kAsEPx*Nuc_E2F_DBD_RB1_Ser332_u*Nuc_FOXM1_promoter_E2F*Nuc;
  R303: S89 => Nuc_E2F_DBD_RB1_Ser332_u + Nuc_FOXM1_promoter_E2F; kDiEPx*S89*Nuc;
  R304: => Cyt_SKP2; kSySkp2*Cyt;
  R305: Cyt_SKP2 => ; kDeSkp2_1*Cyt_SKP2*Cyt;
  R306: Nuc_SKP2 => ; kDeSkp2_1*Nuc_SKP2*Nuc;
  R307: S16 + Cyt_SKP2 => S16; kDeSkp2_2*S16*Cyt_SKP2*Cyt;
  R308: S22 + Cyt_SKP2 => S22; kDeSkp2_2*S22*Cyt_SKP2*Cyt;
  R309: S56 + Nuc_SKP2 => S56; kDeSkp2_2*S56*Nuc_SKP2*Nuc;
  R310: S62 + Nuc_SKP2 => S62; kDeSkp2_2*S62*Nuc_SKP2*Nuc;
  R311: Nuc_TP53_DBD_Ser15_p + Nuc_CDKN1A_promoter_TP53 => S98; kAsTP53PCDKN1A*Nuc_TP53_DBD_Ser15_p*Nuc_CDKN1A_promoter_TP53*Nuc;
  R312: => Cyt_CDKN1A_CCNE_A_B_Ser130_u; kSyCDKN1A_1*Cyt;
  R313: Nuc_FOXO_DBD + Nuc_CDKN1B_promoter_FOXO => S100; kAsFOXOPCDKN1B*Nuc_FOXO_DBD*Nuc_CDKN1B_promoter_FOXO*Nuc;
  R314: => Cyt_CDKN1B_CCNE_A_Thr187_u; kSyCDKN1B_1*Cyt;
  R315: Cyt_CCND + Num_NUP_pSites_u => Num_NUP_pSites_u + Nuc_CCND; kImImCCND_1*Cyt_CCND*Num_NUP_pSites_u*Num;
  R316: Num_NUP_pSites_u + Nuc_CCND => Cyt_CCND + Num_NUP_pSites_u; kExImCCND_1*Num_NUP_pSites_u*Nuc_CCND*Num;
  R317: Cyt_CCNE_CDKN1A_B + Num_NUP_pSites_u => Num_NUP_pSites_u + Nuc_CCNE_CDKN1A_B; kImImCCNE_CDKN1A_B__1*Cyt_CCNE_CDKN1A_B*Num_NUP_pSites_u*Num;
  R318: Num_NUP_pSites_u + Nuc_CCNE_CDKN1A_B => Cyt_CCNE_CDKN1A_B + Num_NUP_pSites_u; kExImCCNE_CDKN1A_B__1*Num_NUP_pSites_u*Nuc_CCNE_CDKN1A_B*Num;
  R319: Cyt_E2F_DBD_RB1_Ser332_u + Num_NUP_pSites_u => Num_NUP_pSites_u + Nuc_E2F_DBD_RB1_Ser332_u; kImImE2F_DBD_RB1_Ser332u__1*Cyt_E2F_DBD_RB1_Ser332_u*Num_NUP_pSites_u*Num;
  R320: Num_NUP_pSites_u + Nuc_E2F_DBD_RB1_Ser332_u => Cyt_E2F_DBD_RB1_Ser332_u + Num_NUP_pSites_u; kExImE2F_DBD_RB1_Ser332u__1*Num_NUP_pSites_u*Nuc_E2F_DBD_RB1_Ser332_u*Num;
  R321: Cyt_E2F_DBD_RB1_Ser332_p + Num_NUP_pSites_u => Num_NUP_pSites_u + Nuc_E2F_DBD_RB1_Ser332_p; kImImE2F_DBD_RB1_Ser332p__1*Cyt_E2F_DBD_RB1_Ser332_p*Num_NUP_pSites_u*Num;
  R322: Num_NUP_pSites_u + Nuc_E2F_DBD_RB1_Ser332_p => Cyt_E2F_DBD_RB1_Ser332_p + Num_NUP_pSites_u; kExImE2F_DBD_RB1_Ser332p__1*Num_NUP_pSites_u*Nuc_E2F_DBD_RB1_Ser332_p*Num;
  R323: Cyt_CCNA_CDKN1A_B + Num_NUP_pSites_u => Num_NUP_pSites_u + Nuc_CCNA_CDKN1A_B; kImImCCNA_CDKN1A_B__1*Cyt_CCNA_CDKN1A_B*Num_NUP_pSites_u*Num;
  R324: Num_NUP_pSites_u + Nuc_CCNA_CDKN1A_B => Cyt_CCNA_CDKN1A_B + Num_NUP_pSites_u; kExImCCNA_CDKN1A_B__1*Num_NUP_pSites_u*Nuc_CCNA_CDKN1A_B*Num;
  R325: S6 + Num_NUP_pSites_u => Num_NUP_pSites_u + S46; kImImCCNB_CDK1_Thr14_Tyr15u_CDKN1A__1*S6*Num_NUP_pSites_u*Num;
  R326: Num_NUP_pSites_u + S46 => S6 + Num_NUP_pSites_u; kExImCCNB_CDK1_Thr14_Tyr15u_CDKN1A__1*Num_NUP_pSites_u*S46*Num;
  R327: S7 + Num_NUP_pSites_u => Num_NUP_pSites_u + S47; kImImE2F_DBD_RB11_Ser332u__RB1_E2F1_Ser807_Ser811u__1*S7*Num_NUP_pSites_u*Num;
  R328: Num_NUP_pSites_u + S47 => S7 + Num_NUP_pSites_u; kExImE2F_DBD_RB11_Ser332u__RB1_E2F1_Ser807_Ser811u__1*Num_NUP_pSites_u*S47*Num;
  R329: S8 + Num_NUP_pSites_u => Num_NUP_pSites_u + S48; kImImE2F_DBD_RB11_Ser332p__RB1_E2F1_Ser807_Ser811u__1*S8*Num_NUP_pSites_u*Num;
  R330: Num_NUP_pSites_u + S48 => S8 + Num_NUP_pSites_u; kExImE2F_DBD_RB11_Ser332p__RB1_E2F1_Ser807_Ser811u__1*Num_NUP_pSites_u*S48*Num;
  R331: Cyt_RB1_E2F_Ser807_Ser811_u + Num_NUP_pSites_u => Num_NUP_pSites_u + Nuc_RB1_E2F_Ser807_Ser811_u; kImImRB1_E2F_Ser807_Ser811u__1*Cyt_RB1_E2F_Ser807_Ser811_u*Num_NUP_pSites_u*Num;
  R332: Num_NUP_pSites_u + Nuc_RB1_E2F_Ser807_Ser811_u => Cyt_RB1_E2F_Ser807_Ser811_u + Num_NUP_pSites_u; kExImRB1_E2F_Ser807_Ser811u__1*Num_NUP_pSites_u*Nuc_RB1_E2F_Ser807_Ser811_u*Num;
  R333: Cyt_RB1_E2F_Ser807_Ser811_p + Num_NUP_pSites_u => Num_NUP_pSites_u + Nuc_RB1_E2F_Ser807_Ser811_p; kImImRB1_E2F_Ser807_Ser811p__1*Cyt_RB1_E2F_Ser807_Ser811_p*Num_NUP_pSites_u*Num;
  R334: Num_NUP_pSites_u + Nuc_RB1_E2F_Ser807_Ser811_p => Cyt_RB1_E2F_Ser807_Ser811_p + Num_NUP_pSites_u; kExImRB1_E2F_Ser807_Ser811p__1*Num_NUP_pSites_u*Nuc_RB1_E2F_Ser807_Ser811_p*Num;
  R335: Cyt_PPP2R2B_ENSA_ARPP19 + Num_NUP_pSites_u => Num_NUP_pSites_u + Nuc_PPP2R2B_ENSA_ARPP19; kImImPPP2R2B_ENSA_ARPP19__1*Cyt_PPP2R2B_ENSA_ARPP19*Num_NUP_pSites_u*Num;
  R336: Num_NUP_pSites_u + Nuc_PPP2R2B_ENSA_ARPP19 => Cyt_PPP2R2B_ENSA_ARPP19 + Num_NUP_pSites_u; kExImPPP2R2B_ENSA_ARPP19__1*Num_NUP_pSites_u*Nuc_PPP2R2B_ENSA_ARPP19*Num;
  R337: S12 + Num_NUP_pSites_u => Num_NUP_pSites_u + S52; kImImAPC_FBXO5_FZR1_CDC20_Ser355u__1*S12*Num_NUP_pSites_u*Num;
  R338: Num_NUP_pSites_u + S52 => S12 + Num_NUP_pSites_u; kExImAPC_FBXO5_FZR1_CDC20_Ser355u__1*Num_NUP_pSites_u*S52*Num;
  R339: Cyt_CDC20_APC + Num_NUP_pSites_u => Num_NUP_pSites_u + Nuc_CDC20_APC; kImImCDC20_APC__1*Cyt_CDC20_APC*Num_NUP_pSites_u*Num;
  R340: Num_NUP_pSites_u + Nuc_CDC20_APC => Cyt_CDC20_APC + Num_NUP_pSites_u; kExImCDC20_APC__1*Num_NUP_pSites_u*Nuc_CDC20_APC*Num;
  R341: S14 + Num_NUP_pSites_u => Num_NUP_pSites_u + S54; kImImAPC_FBXO5_FZR1_CDC201_Ser355p__CDC20_APC1__1*S14*Num_NUP_pSites_u*Num;
  R342: Num_NUP_pSites_u + S54 => S14 + Num_NUP_pSites_u; kExImAPC_FBXO5_FZR1_CDC201_Ser355p__CDC20_APC1__1*Num_NUP_pSites_u*S54*Num;
  R343: S15 + Num_NUP_pSites_u => Num_NUP_pSites_u + S55; kImImAPC_FBXO5_FZR1_CDC20_Ser355p__1*S15*Num_NUP_pSites_u*Num;
  R344: Num_NUP_pSites_u + S55 => S15 + Num_NUP_pSites_u; kExImAPC_FBXO5_FZR1_CDC20_Ser355p__1*Num_NUP_pSites_u*S55*Num;
  R345: S16 + Num_NUP_pSites_u => Num_NUP_pSites_u + S56; kImImAPC_FBXO5_FZR1_CDC201_Ser355u__FZR1_APC1_FBXO5_nTermu__1*S16*Num_NUP_pSites_u*Num;
  R346: Num_NUP_pSites_u + S56 => S16 + Num_NUP_pSites_u; kExImAPC_FBXO5_FZR1_CDC201_Ser355u__FZR1_APC1_FBXO5_nTermu__1*Num_NUP_pSites_u*S56*Num;
  R347: Cyt_FZR1_APC_FBXO5_nTerm_u + Num_NUP_pSites_u => Num_NUP_pSites_u + Nuc_FZR1_APC_FBXO5_nTerm_u; kImImFZR1_APC_FBXO5_nTermu__1*Cyt_FZR1_APC_FBXO5_nTerm_u*Num_NUP_pSites_u*Num;
  R348: Num_NUP_pSites_u + Nuc_FZR1_APC_FBXO5_nTerm_u => Cyt_FZR1_APC_FBXO5_nTerm_u + Num_NUP_pSites_u; kExImFZR1_APC_FBXO5_nTermu__1*Num_NUP_pSites_u*Nuc_FZR1_APC_FBXO5_nTerm_u*Num;
  R349: Cyt_FZR1_APC_FBXO5_nTerm_p + Num_NUP_pSites_u => Num_NUP_pSites_u + Nuc_FZR1_APC_FBXO5_nTerm_p; kImImFZR1_APC_FBXO5_nTermp__1*Cyt_FZR1_APC_FBXO5_nTerm_p*Num_NUP_pSites_u*Num;
  R350: Num_NUP_pSites_u + Nuc_FZR1_APC_FBXO5_nTerm_p => Cyt_FZR1_APC_FBXO5_nTerm_p + Num_NUP_pSites_u; kExImFZR1_APC_FBXO5_nTermp__1*Num_NUP_pSites_u*Nuc_FZR1_APC_FBXO5_nTerm_p*Num;
  R351: S19 + Num_NUP_pSites_u => Num_NUP_pSites_u + S59; kImImAPC_FBXO51_FZR1_CDC202_Ser355u__FBXO5_APC1_FZR13_Ser182u__FZR1_APC2_FBXO53_nTermu__1*S19*Num_NUP_pSites_u*Num;
  R352: Num_NUP_pSites_u + S59 => S19 + Num_NUP_pSites_u; kExImAPC_FBXO51_FZR1_CDC202_Ser355u__FBXO5_APC1_FZR13_Ser182u__FZR1_APC2_FBXO53_nTermu__1*Num_NUP_pSites_u*S59*Num;
  R353: Cyt_FBXO5_APC_FZR1_Ser182_u + Num_NUP_pSites_u => Num_NUP_pSites_u + Nuc_FBXO5_APC_FZR1_Ser182_u; kImImFBXO5_APC_FZR1_Ser182u__1*Cyt_FBXO5_APC_FZR1_Ser182_u*Num_NUP_pSites_u*Num;
  R354: Num_NUP_pSites_u + Nuc_FBXO5_APC_FZR1_Ser182_u => Cyt_FBXO5_APC_FZR1_Ser182_u + Num_NUP_pSites_u; kExImFBXO5_APC_FZR1_Ser182u__1*Num_NUP_pSites_u*Nuc_FBXO5_APC_FZR1_Ser182_u*Num;
  R355: S21 + Num_NUP_pSites_u => Num_NUP_pSites_u + S61; kImImAPC_FBXO51_FZR1_CDC202_Ser355p__FBXO5_APC1_FZR13_Ser182u__FZR1_APC2_FBXO53_nTermu__1*S21*Num_NUP_pSites_u*Num;
  R356: Num_NUP_pSites_u + S61 => S21 + Num_NUP_pSites_u; kExImAPC_FBXO51_FZR1_CDC202_Ser355p__FBXO5_APC1_FZR13_Ser182u__FZR1_APC2_FBXO53_nTermu__1*Num_NUP_pSites_u*S61*Num;
  R357: S22 + Num_NUP_pSites_u => Num_NUP_pSites_u + S62; kImImAPC_FBXO5_FZR1_CDC201_Ser355p__FZR1_APC1_FBXO5_nTermu__1*S22*Num_NUP_pSites_u*Num;
  R358: Num_NUP_pSites_u + S62 => S22 + Num_NUP_pSites_u; kExImAPC_FBXO5_FZR1_CDC201_Ser355p__FZR1_APC1_FBXO5_nTermu__1*Num_NUP_pSites_u*S62*Num;
  R359: Cyt_FBXO5_APC_FZR1_Ser182_p + Num_NUP_pSites_u => Num_NUP_pSites_u + Nuc_FBXO5_APC_FZR1_Ser182_p; kImImFBXO5_APC_FZR1_Ser182p__1*Cyt_FBXO5_APC_FZR1_Ser182_p*Num_NUP_pSites_u*Num;
  R360: Num_NUP_pSites_u + Nuc_FBXO5_APC_FZR1_Ser182_p => Cyt_FBXO5_APC_FZR1_Ser182_p + Num_NUP_pSites_u; kExImFBXO5_APC_FZR1_Ser182p__1*Num_NUP_pSites_u*Nuc_FBXO5_APC_FZR1_Ser182_p*Num;
  R361: Cyt_FOXM1_DBD_Thr600_u + Num_NUP_pSites_u => Num_NUP_pSites_u + Nuc_FOXM1_DBD_Thr600_u; kImImFOXM1_DBD_Thr600u__1*Cyt_FOXM1_DBD_Thr600_u*Num_NUP_pSites_u*Num;
  R362: Num_NUP_pSites_u + Nuc_FOXM1_DBD_Thr600_u => Cyt_FOXM1_DBD_Thr600_u + Num_NUP_pSites_u; kExImFOXM1_DBD_Thr600u__1*Num_NUP_pSites_u*Nuc_FOXM1_DBD_Thr600_u*Num;
  R363: Cyt_FOXM1_DBD_Thr600_p + Num_NUP_pSites_u => Num_NUP_pSites_u + Nuc_FOXM1_DBD_Thr600_p; kImImFOXM1_DBD_Thr600p__1*Cyt_FOXM1_DBD_Thr600_p*Num_NUP_pSites_u*Num;
  R364: Num_NUP_pSites_u + Nuc_FOXM1_DBD_Thr600_p => Cyt_FOXM1_DBD_Thr600_p + Num_NUP_pSites_u; kExImFOXM1_DBD_Thr600p__1*Num_NUP_pSites_u*Nuc_FOXM1_DBD_Thr600_p*Num;
  R365: Cyt_WEE1_Ser123_u + Num_NUP_pSites_u => Num_NUP_pSites_u + Nuc_WEE1_Ser123_u; kImImWEE1_Ser123u__1*Cyt_WEE1_Ser123_u*Num_NUP_pSites_u*Num;
  R366: Num_NUP_pSites_u + Nuc_WEE1_Ser123_u => Cyt_WEE1_Ser123_u + Num_NUP_pSites_u; kExImWEE1_Ser123u__1*Num_NUP_pSites_u*Nuc_WEE1_Ser123_u*Num;
  R367: S27 + Num_NUP_pSites_u => Num_NUP_pSites_u + S71; kImImCCNB_CDK1_Thr14_Tyr15p_CDKN1A__1*S27*Num_NUP_pSites_u*Num;
  R368: Num_NUP_pSites_u + S71 => S27 + Num_NUP_pSites_u; kExImCCNB_CDK1_Thr14_Tyr15p_CDKN1A__1*Num_NUP_pSites_u*S71*Num;
  R369: Cyt_WEE1_Ser123_p + Num_NUP_pSites_u => Num_NUP_pSites_u + Nuc_WEE1_Ser123_p; kImImWEE1_Ser123p__1*Cyt_WEE1_Ser123_p*Num_NUP_pSites_u*Num;
  R370: Num_NUP_pSites_u + Nuc_WEE1_Ser123_p => Cyt_WEE1_Ser123_p + Num_NUP_pSites_u; kExImWEE1_Ser123p__1*Num_NUP_pSites_u*Nuc_WEE1_Ser123_p*Num;
  R371: Cyt_CDC25_pSites_p + Num_NUP_pSites_u => Num_NUP_pSites_u + Nuc_CDC25_pSites_p; kImImCDC25_pSitesp__1*Cyt_CDC25_pSites_p*Num_NUP_pSites_u*Num;
  R372: Num_NUP_pSites_u + Nuc_CDC25_pSites_p => Cyt_CDC25_pSites_p + Num_NUP_pSites_u; kExImCDC25_pSitesp__1*Num_NUP_pSites_u*Nuc_CDC25_pSites_p*Num;
  R373: Cyt_CDC25_pSites_u + Num_NUP_pSites_u => Num_NUP_pSites_u + Nuc_CDC25_pSites_u; kImImCDC25_pSitesu__1*Cyt_CDC25_pSites_u*Num_NUP_pSites_u*Num;
  R374: Num_NUP_pSites_u + Nuc_CDC25_pSites_u => Cyt_CDC25_pSites_u + Num_NUP_pSites_u; kExImCDC25_pSitesu__1*Num_NUP_pSites_u*Nuc_CDC25_pSites_u*Num;
  R375: Cyt_MASTL_Thr198_u + Num_NUP_pSites_u => Num_NUP_pSites_u + Nuc_MASTL_Thr198_u; kImImMASTL_Thr198u__1*Cyt_MASTL_Thr198_u*Num_NUP_pSites_u*Num;
  R376: Num_NUP_pSites_u + Nuc_MASTL_Thr198_u => Cyt_MASTL_Thr198_u + Num_NUP_pSites_u; kExImMASTL_Thr198u__1*Num_NUP_pSites_u*Nuc_MASTL_Thr198_u*Num;
  R377: Cyt_MASTL_Thr198_p + Num_NUP_pSites_u => Num_NUP_pSites_u + Nuc_MASTL_Thr198_p; kImImMASTL_Thr198p__1*Cyt_MASTL_Thr198_p*Num_NUP_pSites_u*Num;
  R378: Num_NUP_pSites_u + Nuc_MASTL_Thr198_p => Cyt_MASTL_Thr198_p + Num_NUP_pSites_u; kExImMASTL_Thr198p__1*Num_NUP_pSites_u*Nuc_MASTL_Thr198_p*Num;
  R379: S33 + Num_NUP_pSites_u => Num_NUP_pSites_u + S77; kImImENSA_ARPP19_PPP2R2B_Ser62_Ser67u__1*S33*Num_NUP_pSites_u*Num;
  R380: Num_NUP_pSites_u + S77 => S33 + Num_NUP_pSites_u; kExImENSA_ARPP19_PPP2R2B_Ser62_Ser67u__1*Num_NUP_pSites_u*S77*Num;
  R381: S34 + Num_NUP_pSites_u => Num_NUP_pSites_u + S78; kImImENSA_ARPP19_PPP2R2B_Ser62_Ser67p__1*S34*Num_NUP_pSites_u*Num;
  R382: Num_NUP_pSites_u + S78 => S34 + Num_NUP_pSites_u; kExImENSA_ARPP19_PPP2R2B_Ser62_Ser67p__1*Num_NUP_pSites_u*S78*Num;
  R383: S35 + Num_NUP_pSites_u => Num_NUP_pSites_u + S79; kImImENSA_ARPP19_PPP2R2B1_Ser62_Ser67p__PPP2R2B_ENSA_ARPP191__1*S35*Num_NUP_pSites_u*Num;
  R384: Num_NUP_pSites_u + S79 => S35 + Num_NUP_pSites_u; kExImENSA_ARPP19_PPP2R2B1_Ser62_Ser67p__PPP2R2B_ENSA_ARPP191__1*Num_NUP_pSites_u*S79*Num;
  R385: Cyt_iWEE + Num_NUP_pSites_u => Num_NUP_pSites_u + Nuc_iWEE; kImImiWEE_1*Cyt_iWEE*Num_NUP_pSites_u*Num;
  R386: Num_NUP_pSites_u + Nuc_iWEE => Cyt_iWEE + Num_NUP_pSites_u; kExImiWEE_1*Num_NUP_pSites_u*Nuc_iWEE*Num;
  R387: Cyt_SKP2 + Num_NUP_pSites_u => Num_NUP_pSites_u + Nuc_SKP2; kImImSKP2_1*Cyt_SKP2*Num_NUP_pSites_u*Num;
  R388: Num_NUP_pSites_u + Nuc_SKP2 => Cyt_SKP2 + Num_NUP_pSites_u; kExImSKP2_1*Num_NUP_pSites_u*Nuc_SKP2*Num;
  R389: Cyt_TP53_DBD_Ser15_p + Num_NUP_pSites_u => Num_NUP_pSites_u + Nuc_TP53_DBD_Ser15_p; kImImTP53_DBD_Ser15p__1*Cyt_TP53_DBD_Ser15_p*Num_NUP_pSites_u*Num;
  R390: Num_NUP_pSites_u + Nuc_TP53_DBD_Ser15_p => Cyt_TP53_DBD_Ser15_p + Num_NUP_pSites_u; kExImTP53_DBD_Ser15p__1*Num_NUP_pSites_u*Nuc_TP53_DBD_Ser15_p*Num;
  R391: Cyt_FOXO_DBD + Num_NUP_pSites_u => Num_NUP_pSites_u + Nuc_FOXO_DBD; kImImFOXO_DBD__1*Cyt_FOXO_DBD*Num_NUP_pSites_u*Num;
  R392: Num_NUP_pSites_u + Nuc_FOXO_DBD => Cyt_FOXO_DBD + Num_NUP_pSites_u; kExImFOXO_DBD__1*Num_NUP_pSites_u*Nuc_FOXO_DBD*Num;
  R393: S96 => Nuc_CCNB_promoter_FOXM1; kDeFox1*S96*Nuc;
  R394: S97 => Nuc_CDC20_promoter_FOXM1; kDeFox1*S97*Nuc;
  R395: S98 => Nuc_TP53_DBD_Ser15_p + Nuc_CDKN1A_promoter_TP53; kDiTP53PCDKN1A*S98*Nuc;
  R396: S98 => S98 + Cyt_CDKN1A_CCNE_A_B_Ser130_u; kSyCDKN1A_2*S98*Nuc;
  R397: Cyt_CDKN1A_CCNE_A_B_Ser130_u => ; kDeCDKN1A_1*Cyt_CDKN1A_CCNE_A_B_Ser130_u*Cyt;
  R398: Cyt_SKP2 + Cyt_CDKN1A_CCNE_A_B_Ser130_u => Cyt_SKP2; kDeCDKN1A_2*Cyt_SKP2*Cyt_CDKN1A_CCNE_A_B_Ser130_u*Cyt;
  R399: Cyt_CCNA_CDKN1A_B + Cyt_CDKN1A_CCNE_A_B_Ser130_u => S102; kAsCdkn1aC*Cyt_CCNA_CDKN1A_B*Cyt_CDKN1A_CCNE_A_B_Ser130_u*Cyt;
  R400: Cyt_CCNE_CDKN1A_B + Cyt_CDKN1A_CCNE_A_B_Ser130_u => S103; kAsCdkn1aC*Cyt_CCNE_CDKN1A_B*Cyt_CDKN1A_CCNE_A_B_Ser130_u*Cyt;
  R401: S6 + Cyt_CDKN1A_CCNE_A_B_Ser130_u => S104; kAsCdkn1aC*S6*Cyt_CDKN1A_CCNE_A_B_Ser130_u*Cyt;
  R402: S27 + Cyt_CDKN1A_CCNE_A_B_Ser130_u => S105; kAsCdkn1aC*S27*Cyt_CDKN1A_CCNE_A_B_Ser130_u*Cyt;
  R403: Cyt_CCNE_CDKN1A_B + Cyt_CDKN1A_CCNE_A_B_Ser130_u => Cyt_CCNE_CDKN1A_B + Cyt_CDKN1A_CCNE_A_B_Ser130_p; kPhCDKN1AByCe*Cyt_CCNE_CDKN1A_B*Cyt_CDKN1A_CCNE_A_B_Ser130_u*Cyt;
  R404: Cyt_CCNA_CDKN1A_B + Cyt_CDKN1A_CCNE_A_B_Ser130_u => Cyt_CCNA_CDKN1A_B + Cyt_CDKN1A_CCNE_A_B_Ser130_p; kPhCDKN1AByCa*Cyt_CCNA_CDKN1A_B*Cyt_CDKN1A_CCNE_A_B_Ser130_u*Cyt;
  R405: S6 + Cyt_CDKN1A_CCNE_A_B_Ser130_u => S6 + Cyt_CDKN1A_CCNE_A_B_Ser130_p; kPhCDKN1AByCb*S6*Cyt_CDKN1A_CCNE_A_B_Ser130_u*Cyt;
  R406: S100 => Nuc_FOXO_DBD + Nuc_CDKN1B_promoter_FOXO; kDiFOXOPCDKN1B*S100*Nuc;
  R407: S100 => S100 + Cyt_CDKN1B_CCNE_A_Thr187_u; kSyCDKN1B_2*S100*Nuc;
  R408: Cyt_CDKN1B_CCNE_A_Thr187_u => ; kDeCDKN1B_1*Cyt_CDKN1B_CCNE_A_Thr187_u*Cyt;
  R409: Cyt_SKP2 + Cyt_CDKN1B_CCNE_A_Thr187_u => Cyt_SKP2; _rateLaw3*Cyt_SKP2*Cyt_CDKN1B_CCNE_A_Thr187_u*Cyt;
  R410: Cyt_CCNA_CDKN1A_B + Cyt_CDKN1B_CCNE_A_Thr187_u => S107; kAsCdkn1bC*Cyt_CCNA_CDKN1A_B*Cyt_CDKN1B_CCNE_A_Thr187_u*Cyt;
  R411: Cyt_CCNE_CDKN1A_B + Cyt_CDKN1B_CCNE_A_Thr187_u => S108; kAsCdkn1bC*Cyt_CCNE_CDKN1A_B*Cyt_CDKN1B_CCNE_A_Thr187_u*Cyt;
  R412: Cyt_CCNE_CDKN1A_B + Cyt_CDKN1B_CCNE_A_Thr187_u => Cyt_CCNE_CDKN1A_B + Cyt_CDKN1B_CCNE_A_Thr187_p; kPhCDKN1BByCe*Cyt_CCNE_CDKN1A_B*Cyt_CDKN1B_CCNE_A_Thr187_u*Cyt;
  R413: Cyt_CCNA_CDKN1A_B + Cyt_CDKN1B_CCNE_A_Thr187_u => Cyt_CCNA_CDKN1A_B + Cyt_CDKN1B_CCNE_A_Thr187_p; kPhCDKN1BByCa*Cyt_CCNA_CDKN1A_B*Cyt_CDKN1B_CCNE_A_Thr187_u*Cyt;
  R414: S6 + Cyt_CDKN1B_CCNE_A_Thr187_u => S6 + Cyt_CDKN1B_CCNE_A_Thr187_p; kPhCDKN1BByCb*S6*Cyt_CDKN1B_CCNE_A_Thr187_u*Cyt;
  R415: S27 + Cyt_CDKN1B_CCNE_A_Thr187_u => S27 + Cyt_CDKN1B_CCNE_A_Thr187_p; kPhCDKN1BByCb*S27*Cyt_CDKN1B_CCNE_A_Thr187_u*Cyt;
  R416: Num_NUP_pSites_u + Cyt_CDKN1A_CCNE_A_B_Ser130_u => Num_NUP_pSites_u + Nuc_CDKN1A_CCNE_A_B_Ser130_u; kImImCDKN1A_CCNE_A_B_Ser130u__1*Num_NUP_pSites_u*Cyt_CDKN1A_CCNE_A_B_Ser130_u*Num;
  R417: Num_NUP_pSites_u + Cyt_CDKN1B_CCNE_A_Thr187_u => Num_NUP_pSites_u + Nuc_CDKN1B_CCNE_A_Thr187_u; kImImCDKN1B_CCNE_A_Thr187u__1*Num_NUP_pSites_u*Cyt_CDKN1B_CCNE_A_Thr187_u*Num;
  R418: S103 => Cyt_CDKN1A_CCNE_A_B_Ser130_u; kDeCe*S103*Cyt;
  R419: S108 => Cyt_CDKN1B_CCNE_A_Thr187_u; kDeCe*S108*Cyt;
  R420: Cyt_CCNE_CDKN1A_B + S103 => Cyt_CCNE_CDKN1A_B + Cyt_CDKN1A_CCNE_A_B_Ser130_u; kPhCeE*Cyt_CCNE_CDKN1A_B*S103*Cyt;
  R421: Cyt_CCNE_CDKN1A_B + S108 => Cyt_CCNE_CDKN1A_B + Cyt_CDKN1B_CCNE_A_Thr187_u; kPhCeE*Cyt_CCNE_CDKN1A_B*S108*Cyt;
  R422: S102 => Cyt_CDKN1A_CCNE_A_B_Ser130_u; kDeCa1*S102*Cyt;
  R423: S107 => Cyt_CDKN1B_CCNE_A_Thr187_u; kDeCa1*S107*Cyt;
  R424: Cyt_CCNA_CDKN1A_B + S103 => Cyt_CCNA_CDKN1A_B + Cyt_CDKN1A_CCNE_A_B_Ser130_u; kPhCeA*Cyt_CCNA_CDKN1A_B*S103*Cyt;
  R425: Cyt_CCNA_CDKN1A_B + S108 => Cyt_CCNA_CDKN1A_B + Cyt_CDKN1B_CCNE_A_Thr187_u; kPhCeA*Cyt_CCNA_CDKN1A_B*S108*Cyt;
  R426: S16 + S102 => S16 + Cyt_CDKN1A_CCNE_A_B_Ser130_u; kDeCa2*S16*S102*Cyt;
  R427: S22 + S102 => S22 + Cyt_CDKN1A_CCNE_A_B_Ser130_u; kDeCa2*S22*S102*Cyt;
  R428: S16 + S107 => S16 + Cyt_CDKN1B_CCNE_A_Thr187_u; kDeCa2*S16*S107*Cyt;
  R429: S22 + S107 => S22 + Cyt_CDKN1B_CCNE_A_Thr187_u; kDeCa2*S22*S107*Cyt;
  R430: S14 + S102 => S14 + Cyt_CDKN1A_CCNE_A_B_Ser130_u; kDeCa3*S14*S102*Cyt;
  R431: S14 + S107 => S14 + Cyt_CDKN1B_CCNE_A_Thr187_u; kDeCa3*S14*S107*Cyt;
  R432: S104 => Cyt_CDKN1A_CCNE_A_B_Ser130_u; kDeCb1*S104*Cyt;
  R433: S105 => Cyt_CDKN1A_CCNE_A_B_Ser130_u; kDeCb1*S105*Cyt;
  R434: S16 + S104 => S16 + Cyt_CDKN1A_CCNE_A_B_Ser130_u; kDeCb2*S16*S104*Cyt;
  R435: S22 + S104 => S22 + Cyt_CDKN1A_CCNE_A_B_Ser130_u; kDeCb2*S22*S104*Cyt;
  R436: S16 + S105 => S16 + Cyt_CDKN1A_CCNE_A_B_Ser130_u; kDeCb2*S16*S105*Cyt;
  R437: S22 + S105 => S22 + Cyt_CDKN1A_CCNE_A_B_Ser130_u; kDeCb2*S22*S105*Cyt;
  R438: S14 + S104 => S14 + Cyt_CDKN1A_CCNE_A_B_Ser130_u; kDeCb3*S14*S104*Cyt;
  R439: S14 + S105 => S14 + Cyt_CDKN1A_CCNE_A_B_Ser130_u; kDeCb3*S14*S105*Cyt;
  R440: Cyt_WEE1_Ser123_u + S104 => Cyt_WEE1_Ser123_u + S105; kWee2*Cyt_WEE1_Ser123_u*S104*Cyt;
  R441: Cyt_WEE1_Ser123_p + S104 => Cyt_WEE1_Ser123_p + S105; kWee1*Cyt_WEE1_Ser123_p*S104*Cyt;
  R442: Cyt_CDC25_pSites_p + S105 => Cyt_CDC25_pSites_p + S104; kCdc25_2*Cyt_CDC25_pSites_p*S105*Cyt;
  R443: Cyt_CDC25_pSites_u + S105 => Cyt_CDC25_pSites_u + S104; kCdc25_1*Cyt_CDC25_pSites_u*S105*Cyt;
  R444: S102 => Cyt_CCNA_CDKN1A_B; kDeCDKN1A_1*S102*Cyt;
  R445: S103 => Cyt_CCNE_CDKN1A_B; kDeCDKN1A_1*S103*Cyt;
  R446: S104 => S6; kDeCDKN1A_1*S104*Cyt;
  R447: S105 => S27; kDeCDKN1A_1*S105*Cyt;
  R448: Cyt_CDKN1A_CCNE_A_B_Ser130_p => ; kDeCDKN1A_1*Cyt_CDKN1A_CCNE_A_B_Ser130_p*Cyt;
  R449: Nuc_CDKN1A_CCNE_A_B_Ser130_u => ; kDeCDKN1A_1*Nuc_CDKN1A_CCNE_A_B_Ser130_u*Nuc;
  R450: Cyt_SKP2 + Cyt_CDKN1A_CCNE_A_B_Ser130_p => Cyt_SKP2; kDeCDKN1A_2*Cyt_SKP2*Cyt_CDKN1A_CCNE_A_B_Ser130_p*Cyt;
  R451: Cyt_SKP2 + S102 => Cyt_CCNA_CDKN1A_B + Cyt_SKP2; kDeCDKN1A_2*Cyt_SKP2*S102*Cyt;
  R452: Cyt_SKP2 + S103 => Cyt_CCNE_CDKN1A_B + Cyt_SKP2; kDeCDKN1A_2*Cyt_SKP2*S103*Cyt;
  R453: Cyt_SKP2 + S104 => S6 + Cyt_SKP2; kDeCDKN1A_2*Cyt_SKP2*S104*Cyt;
  R454: Cyt_SKP2 + S105 => S27 + Cyt_SKP2; kDeCDKN1A_2*Cyt_SKP2*S105*Cyt;
  R455: Nuc_SKP2 + Nuc_CDKN1A_CCNE_A_B_Ser130_u => Nuc_SKP2; kDeCDKN1A_2*Nuc_SKP2*Nuc_CDKN1A_CCNE_A_B_Ser130_u*Nuc;
  R456: Nuc_CCNA_CDKN1A_B + Nuc_CDKN1A_CCNE_A_B_Ser130_u => S112; kAsCdkn1aC*Nuc_CCNA_CDKN1A_B*Nuc_CDKN1A_CCNE_A_B_Ser130_u*Nuc;
  R457: S102 => Cyt_CCNA_CDKN1A_B + Cyt_CDKN1A_CCNE_A_B_Ser130_u; kDiCdkn1aC*S102*Cyt;
  R458: Nuc_CCNE_CDKN1A_B + Nuc_CDKN1A_CCNE_A_B_Ser130_u => S113; kAsCdkn1aC*Nuc_CCNE_CDKN1A_B*Nuc_CDKN1A_CCNE_A_B_Ser130_u*Nuc;
  R459: S103 => Cyt_CCNE_CDKN1A_B + Cyt_CDKN1A_CCNE_A_B_Ser130_u; kDiCdkn1aC*S103*Cyt;
  R460: S46 + Nuc_CDKN1A_CCNE_A_B_Ser130_u => S114; kAsCdkn1aC*S46*Nuc_CDKN1A_CCNE_A_B_Ser130_u*Nuc;
  R461: S71 + Nuc_CDKN1A_CCNE_A_B_Ser130_u => S115; kAsCdkn1aC*S71*Nuc_CDKN1A_CCNE_A_B_Ser130_u*Nuc;
  R462: S104 => S6 + Cyt_CDKN1A_CCNE_A_B_Ser130_u; kDiCdkn1aC*S104*Cyt;
  R463: S105 => S27 + Cyt_CDKN1A_CCNE_A_B_Ser130_u; kDiCdkn1aC*S105*Cyt;
  R464: Nuc_CCNE_CDKN1A_B + Nuc_CDKN1A_CCNE_A_B_Ser130_u => Nuc_CCNE_CDKN1A_B + Nuc_CDKN1A_CCNE_A_B_Ser130_p; kPhCDKN1AByCe*Nuc_CCNE_CDKN1A_B*Nuc_CDKN1A_CCNE_A_B_Ser130_u*Nuc;
  R465: Cyt_CCNE_CDKN1A_B + S102 => Cyt_CCNE_CDKN1A_B + Cyt_CCNA_CDKN1A_B + Cyt_CDKN1A_CCNE_A_B_Ser130_p; kPhCDKN1AByCe*Cyt_CCNE_CDKN1A_B*S102*Cyt;
  R466: Cyt_CCNE_CDKN1A_B + S103 => Cyt_CCNE_CDKN1A_B + Cyt_CCNE_CDKN1A_B + Cyt_CDKN1A_CCNE_A_B_Ser130_p; kPhCDKN1AByCe*Cyt_CCNE_CDKN1A_B*S103*Cyt;
  R467: Cyt_CCNE_CDKN1A_B + S104 => Cyt_CCNE_CDKN1A_B + S6 + Cyt_CDKN1A_CCNE_A_B_Ser130_p; kPhCDKN1AByCe*Cyt_CCNE_CDKN1A_B*S104*Cyt;
  R468: Cyt_CCNE_CDKN1A_B + S105 => Cyt_CCNE_CDKN1A_B + S27 + Cyt_CDKN1A_CCNE_A_B_Ser130_p; kPhCDKN1AByCe*Cyt_CCNE_CDKN1A_B*S105*Cyt;
  R469: Nuc_CCNA_CDKN1A_B + Nuc_CDKN1A_CCNE_A_B_Ser130_u => Nuc_CCNA_CDKN1A_B + Nuc_CDKN1A_CCNE_A_B_Ser130_p; kPhCDKN1AByCa*Nuc_CCNA_CDKN1A_B*Nuc_CDKN1A_CCNE_A_B_Ser130_u*Nuc;
  R470: Cyt_CCNA_CDKN1A_B + S102 => Cyt_CCNA_CDKN1A_B + Cyt_CCNA_CDKN1A_B + Cyt_CDKN1A_CCNE_A_B_Ser130_p; kPhCDKN1AByCa*Cyt_CCNA_CDKN1A_B*S102*Cyt;
  R471: Cyt_CCNA_CDKN1A_B + S103 => Cyt_CCNE_CDKN1A_B + Cyt_CCNA_CDKN1A_B + Cyt_CDKN1A_CCNE_A_B_Ser130_p; kPhCDKN1AByCa*Cyt_CCNA_CDKN1A_B*S103*Cyt;
  R472: Cyt_CCNA_CDKN1A_B + S104 => Cyt_CCNA_CDKN1A_B + S6 + Cyt_CDKN1A_CCNE_A_B_Ser130_p; kPhCDKN1AByCa*Cyt_CCNA_CDKN1A_B*S104*Cyt;
  R473: Cyt_CCNA_CDKN1A_B + S105 => Cyt_CCNA_CDKN1A_B + S27 + Cyt_CDKN1A_CCNE_A_B_Ser130_p; kPhCDKN1AByCa*Cyt_CCNA_CDKN1A_B*S105*Cyt;
  R474: S46 + Nuc_CDKN1A_CCNE_A_B_Ser130_u => S46 + Nuc_CDKN1A_CCNE_A_B_Ser130_p; kPhCDKN1AByCb*S46*Nuc_CDKN1A_CCNE_A_B_Ser130_u*Nuc;
  R475: S6 + S102 => Cyt_CCNA_CDKN1A_B + S6 + Cyt_CDKN1A_CCNE_A_B_Ser130_p; kPhCDKN1AByCb*S6*S102*Cyt;
  R476: S6 + S103 => Cyt_CCNE_CDKN1A_B + S6 + Cyt_CDKN1A_CCNE_A_B_Ser130_p; kPhCDKN1AByCb*S6*S103*Cyt;
  R477: S6 + S104 => S6 + S6 + Cyt_CDKN1A_CCNE_A_B_Ser130_p; kPhCDKN1AByCb*S6*S104*Cyt;
  R478: S6 + S105 => S6 + S27 + Cyt_CDKN1A_CCNE_A_B_Ser130_p; kPhCDKN1AByCb*S6*S105*Cyt;
  R479: Cyt_CDKN1A_CCNE_A_B_Ser130_p => Cyt_CDKN1A_CCNE_A_B_Ser130_u; kDpCDKN1A*Cyt_CDKN1A_CCNE_A_B_Ser130_p*Cyt;
  R480: S107 => Cyt_CCNA_CDKN1A_B; kDeCDKN1B_1*S107*Cyt;
  R481: S108 => Cyt_CCNE_CDKN1A_B; kDeCDKN1B_1*S108*Cyt;
  R482: Cyt_CDKN1B_CCNE_A_Thr187_p => ; kDeCDKN1B_1*Cyt_CDKN1B_CCNE_A_Thr187_p*Cyt;
  R483: Nuc_CDKN1B_CCNE_A_Thr187_u => ; kDeCDKN1B_1*Nuc_CDKN1B_CCNE_A_Thr187_u*Nuc;
  R484: Cyt_SKP2 + Cyt_CDKN1B_CCNE_A_Thr187_p => Cyt_SKP2; kDeCDKN1B_2*Cyt_SKP2*Cyt_CDKN1B_CCNE_A_Thr187_p*Cyt;
  R485: Cyt_SKP2 + S107 => Cyt_CCNA_CDKN1A_B + Cyt_SKP2; _rateLaw3*Cyt_SKP2*S107*Cyt;
  R486: Cyt_SKP2 + S108 => Cyt_CCNE_CDKN1A_B + Cyt_SKP2; _rateLaw3*Cyt_SKP2*S108*Cyt;
  R487: Nuc_SKP2 + Nuc_CDKN1B_CCNE_A_Thr187_u => Nuc_SKP2; _rateLaw3*Nuc_SKP2*Nuc_CDKN1B_CCNE_A_Thr187_u*Nuc;
  R488: Cyt_CCNA_CDKN1A_B + Cyt_CDKN1B_CCNE_A_Thr187_p => S117; kAsCdkn1bC*Cyt_CCNA_CDKN1A_B*Cyt_CDKN1B_CCNE_A_Thr187_p*Cyt;
  R489: Nuc_CCNA_CDKN1A_B + Nuc_CDKN1B_CCNE_A_Thr187_u => S118; kAsCdkn1bC*Nuc_CCNA_CDKN1A_B*Nuc_CDKN1B_CCNE_A_Thr187_u*Nuc;
  R490: S107 => Cyt_CCNA_CDKN1A_B + Cyt_CDKN1B_CCNE_A_Thr187_u; kDiCdkn1bC*S107*Cyt;
  R491: Cyt_CCNE_CDKN1A_B + Cyt_CDKN1B_CCNE_A_Thr187_p => S119; kAsCdkn1bC*Cyt_CCNE_CDKN1A_B*Cyt_CDKN1B_CCNE_A_Thr187_p*Cyt;
  R492: Nuc_CCNE_CDKN1A_B + Nuc_CDKN1B_CCNE_A_Thr187_u => S120; kAsCdkn1bC*Nuc_CCNE_CDKN1A_B*Nuc_CDKN1B_CCNE_A_Thr187_u*Nuc;
  R493: S108 => Cyt_CCNE_CDKN1A_B + Cyt_CDKN1B_CCNE_A_Thr187_u; kDiCdkn1bC*S108*Cyt;
  R494: Cyt_CCNE_CDKN1A_B + S107 => Cyt_CCNE_CDKN1A_B + S117; kPhCDKN1BByCe*Cyt_CCNE_CDKN1A_B*S107*Cyt;
  R495: Cyt_CCNE_CDKN1A_B + S108 => Cyt_CCNE_CDKN1A_B + S119; kPhCDKN1BByCe*Cyt_CCNE_CDKN1A_B*S108*Cyt;
  R496: Nuc_CCNE_CDKN1A_B + Nuc_CDKN1B_CCNE_A_Thr187_u => Nuc_CCNE_CDKN1A_B + Nuc_CDKN1B_CCNE_A_Thr187_p; kPhCDKN1BByCe*Nuc_CCNE_CDKN1A_B*Nuc_CDKN1B_CCNE_A_Thr187_u*Nuc;
  R497: Cyt_CCNA_CDKN1A_B + S107 => Cyt_CCNA_CDKN1A_B + S117; kPhCDKN1BByCa*Cyt_CCNA_CDKN1A_B*S107*Cyt;
  R498: Cyt_CCNA_CDKN1A_B + S108 => Cyt_CCNA_CDKN1A_B + S119; kPhCDKN1BByCa*Cyt_CCNA_CDKN1A_B*S108*Cyt;
  R499: Nuc_CCNA_CDKN1A_B + Nuc_CDKN1B_CCNE_A_Thr187_u => Nuc_CCNA_CDKN1A_B + Nuc_CDKN1B_CCNE_A_Thr187_p; kPhCDKN1BByCa*Nuc_CCNA_CDKN1A_B*Nuc_CDKN1B_CCNE_A_Thr187_u*Nuc;
  R500: S6 + S107 => S6 + S117; kPhCDKN1BByCb*S6*S107*Cyt;
  R501: S27 + S107 => S27 + S117; kPhCDKN1BByCb*S27*S107*Cyt;
  R502: S6 + S108 => S6 + S119; kPhCDKN1BByCb*S6*S108*Cyt;
  R503: S27 + S108 => S27 + S119; kPhCDKN1BByCb*S27*S108*Cyt;
  R504: S46 + Nuc_CDKN1B_CCNE_A_Thr187_u => S46 + Nuc_CDKN1B_CCNE_A_Thr187_p; kPhCDKN1BByCb*S46*Nuc_CDKN1B_CCNE_A_Thr187_u*Nuc;
  R505: S71 + Nuc_CDKN1B_CCNE_A_Thr187_u => S71 + Nuc_CDKN1B_CCNE_A_Thr187_p; kPhCDKN1BByCb*S71*Nuc_CDKN1B_CCNE_A_Thr187_u*Nuc;
  R506: Cyt_CDKN1B_CCNE_A_Thr187_p => Cyt_CDKN1B_CCNE_A_Thr187_u; kDpCDKN1B*Cyt_CDKN1B_CCNE_A_Thr187_p*Cyt;
  R507: Num_NUP_pSites_u + Nuc_CDKN1A_CCNE_A_B_Ser130_u => Num_NUP_pSites_u + Cyt_CDKN1A_CCNE_A_B_Ser130_u; kExImCDKN1A_CCNE_A_B_Ser130u__1*Num_NUP_pSites_u*Nuc_CDKN1A_CCNE_A_B_Ser130_u*Num;
  R508: Num_NUP_pSites_u + Nuc_CDKN1B_CCNE_A_Thr187_u => Num_NUP_pSites_u + Cyt_CDKN1B_CCNE_A_Thr187_u; kExImCDKN1B_CCNE_A_Thr187u__1*Num_NUP_pSites_u*Nuc_CDKN1B_CCNE_A_Thr187_u*Num;
  R509: Num_NUP_pSites_u + S102 => Num_NUP_pSites_u + S112; kImImCCNA_CDKN1A_B1__CDKN1A_CCNE_A_B1_Ser130u__1*Num_NUP_pSites_u*S102*Num;
  R510: Num_NUP_pSites_u + S103 => Num_NUP_pSites_u + S113; kImImCCNE_CDKN1A_B1__CDKN1A_CCNE_A_B1_Ser130u__1*Num_NUP_pSites_u*S103*Num;
  R511: Num_NUP_pSites_u + S104 => Num_NUP_pSites_u + S114; kImImCCNB_CDK1_Thr14_Tyr15u_CDKN1A1__CDKN1A_CCNE_A_B1_Ser130u__1*Num_NUP_pSites_u*S104*Num;
  R512: Num_NUP_pSites_u + S105 => Num_NUP_pSites_u + S115; kImImCCNB_CDK1_Thr14_Tyr15p_CDKN1A1__CDKN1A_CCNE_A_B1_Ser130u__1*Num_NUP_pSites_u*S105*Num;
  R513: Num_NUP_pSites_u + Cyt_CDKN1A_CCNE_A_B_Ser130_p => Num_NUP_pSites_u + Nuc_CDKN1A_CCNE_A_B_Ser130_p; kImImCDKN1A_CCNE_A_B_Ser130p__1*Num_NUP_pSites_u*Cyt_CDKN1A_CCNE_A_B_Ser130_p*Num;
  R514: Num_NUP_pSites_u + S107 => Num_NUP_pSites_u + S118; kImImCCNA_CDKN1A_B1__CDKN1B_CCNE_A1_Thr187u__1*Num_NUP_pSites_u*S107*Num;
  R515: Num_NUP_pSites_u + S108 => Num_NUP_pSites_u + S120; kImImCCNE_CDKN1A_B1__CDKN1B_CCNE_A1_Thr187u__1*Num_NUP_pSites_u*S108*Num;
  R516: Num_NUP_pSites_u + Cyt_CDKN1B_CCNE_A_Thr187_p => Num_NUP_pSites_u + Nuc_CDKN1B_CCNE_A_Thr187_p; kImImCDKN1B_CCNE_A_Thr187p__1*Num_NUP_pSites_u*Cyt_CDKN1B_CCNE_A_Thr187_p*Num;
  R517: S113 => Nuc_CDKN1A_CCNE_A_B_Ser130_u; kDeCe*S113*Nuc;
  R518: S119 => Cyt_CDKN1B_CCNE_A_Thr187_p; kDeCe*S119*Cyt;
  R519: S120 => Nuc_CDKN1B_CCNE_A_Thr187_u; kDeCe*S120*Nuc;
  R520: Cyt_CCNE_CDKN1A_B + S119 => Cyt_CCNE_CDKN1A_B + Cyt_CDKN1B_CCNE_A_Thr187_p; kPhCeE*Cyt_CCNE_CDKN1A_B*S119*Cyt;
  R521: Nuc_CCNE_CDKN1A_B + S113 => Nuc_CCNE_CDKN1A_B + Nuc_CDKN1A_CCNE_A_B_Ser130_u; kPhCeE*Nuc_CCNE_CDKN1A_B*S113*Nuc;
  R522: Nuc_CCNE_CDKN1A_B + S120 => Nuc_CCNE_CDKN1A_B + Nuc_CDKN1B_CCNE_A_Thr187_u; kPhCeE*Nuc_CCNE_CDKN1A_B*S120*Nuc;
  R523: S112 => Nuc_CDKN1A_CCNE_A_B_Ser130_u; kDeCa1*S112*Nuc;
  R524: S117 => Cyt_CDKN1B_CCNE_A_Thr187_p; kDeCa1*S117*Cyt;
  R525: S118 => Nuc_CDKN1B_CCNE_A_Thr187_u; kDeCa1*S118*Nuc;
  R526: Nuc_CCNA_CDKN1A_B + S113 => Nuc_CCNA_CDKN1A_B + Nuc_CDKN1A_CCNE_A_B_Ser130_u; kPhCeA*Nuc_CCNA_CDKN1A_B*S113*Nuc;
  R527: Cyt_CCNA_CDKN1A_B + S119 => Cyt_CCNA_CDKN1A_B + Cyt_CDKN1B_CCNE_A_Thr187_p; kPhCeA*Cyt_CCNA_CDKN1A_B*S119*Cyt;
  R528: Nuc_CCNA_CDKN1A_B + S120 => Nuc_CCNA_CDKN1A_B + Nuc_CDKN1B_CCNE_A_Thr187_u; kPhCeA*Nuc_CCNA_CDKN1A_B*S120*Nuc;
  R529: S56 + S112 => S56 + Nuc_CDKN1A_CCNE_A_B_Ser130_u; kDeCa2*S56*S112*Nuc;
  R530: S62 + S112 => S62 + Nuc_CDKN1A_CCNE_A_B_Ser130_u; kDeCa2*S62*S112*Nuc;
  R531: S16 + S117 => S16 + Cyt_CDKN1B_CCNE_A_Thr187_p; kDeCa2*S16*S117*Cyt;
  R532: S22 + S117 => S22 + Cyt_CDKN1B_CCNE_A_Thr187_p; kDeCa2*S22*S117*Cyt;
  R533: S56 + S118 => S56 + Nuc_CDKN1B_CCNE_A_Thr187_u; kDeCa2*S56*S118*Nuc;
  R534: S62 + S118 => S62 + Nuc_CDKN1B_CCNE_A_Thr187_u; kDeCa2*S62*S118*Nuc;
  R535: S54 + S112 => S54 + Nuc_CDKN1A_CCNE_A_B_Ser130_u; kDeCa3*S54*S112*Nuc;
  R536: S14 + S117 => S14 + Cyt_CDKN1B_CCNE_A_Thr187_p; kDeCa3*S14*S117*Cyt;
  R537: S54 + S118 => S54 + Nuc_CDKN1B_CCNE_A_Thr187_u; kDeCa3*S54*S118*Nuc;
  R538: S114 => Nuc_CDKN1A_CCNE_A_B_Ser130_u; kDeCb1*S114*Nuc;
  R539: S115 => Nuc_CDKN1A_CCNE_A_B_Ser130_u; kDeCb1*S115*Nuc;
  R540: S56 + S114 => S56 + Nuc_CDKN1A_CCNE_A_B_Ser130_u; kDeCb2*S56*S114*Nuc;
  R541: S62 + S114 => S62 + Nuc_CDKN1A_CCNE_A_B_Ser130_u; kDeCb2*S62*S114*Nuc;
  R542: S56 + S115 => S56 + Nuc_CDKN1A_CCNE_A_B_Ser130_u; kDeCb2*S56*S115*Nuc;
  R543: S62 + S115 => S62 + Nuc_CDKN1A_CCNE_A_B_Ser130_u; kDeCb2*S62*S115*Nuc;
  R544: S54 + S114 => S54 + Nuc_CDKN1A_CCNE_A_B_Ser130_u; kDeCb3*S54*S114*Nuc;
  R545: S54 + S115 => S54 + Nuc_CDKN1A_CCNE_A_B_Ser130_u; kDeCb3*S54*S115*Nuc;
  R546: Nuc_WEE1_Ser123_u + S114 => Nuc_WEE1_Ser123_u + S115; kWee2*Nuc_WEE1_Ser123_u*S114*Nuc;
  R547: Nuc_WEE1_Ser123_p + S114 => Nuc_WEE1_Ser123_p + S115; kWee1*Nuc_WEE1_Ser123_p*S114*Nuc;
  R548: Nuc_CDC25_pSites_p + S115 => Nuc_CDC25_pSites_p + S114; kCdc25_2*Nuc_CDC25_pSites_p*S115*Nuc;
  R549: Nuc_CDC25_pSites_u + S115 => Nuc_CDC25_pSites_u + S114; kCdc25_1*Nuc_CDC25_pSites_u*S115*Nuc;
  R550: S112 => Nuc_CCNA_CDKN1A_B; kDeCDKN1A_1*S112*Nuc;
  R551: S113 => Nuc_CCNE_CDKN1A_B; kDeCDKN1A_1*S113*Nuc;
  R552: S114 => S46; kDeCDKN1A_1*S114*Nuc;
  R553: S115 => S71; kDeCDKN1A_1*S115*Nuc;
  R554: Nuc_CDKN1A_CCNE_A_B_Ser130_p => ; kDeCDKN1A_1*Nuc_CDKN1A_CCNE_A_B_Ser130_p*Nuc;
  R555: Nuc_SKP2 + Nuc_CDKN1A_CCNE_A_B_Ser130_p => Nuc_SKP2; kDeCDKN1A_2*Nuc_SKP2*Nuc_CDKN1A_CCNE_A_B_Ser130_p*Nuc;
  R556: Nuc_SKP2 + S112 => Nuc_CCNA_CDKN1A_B + Nuc_SKP2; kDeCDKN1A_2*Nuc_SKP2*S112*Nuc;
  R557: Nuc_SKP2 + S113 => Nuc_CCNE_CDKN1A_B + Nuc_SKP2; kDeCDKN1A_2*Nuc_SKP2*S113*Nuc;
  R558: Nuc_SKP2 + S114 => S46 + Nuc_SKP2; kDeCDKN1A_2*Nuc_SKP2*S114*Nuc;
  R559: Nuc_SKP2 + S115 => S71 + Nuc_SKP2; kDeCDKN1A_2*Nuc_SKP2*S115*Nuc;
  R560: S112 => Nuc_CCNA_CDKN1A_B + Nuc_CDKN1A_CCNE_A_B_Ser130_u; kDiCdkn1aC*S112*Nuc;
  R561: S113 => Nuc_CCNE_CDKN1A_B + Nuc_CDKN1A_CCNE_A_B_Ser130_u; kDiCdkn1aC*S113*Nuc;
  R562: S114 => S46 + Nuc_CDKN1A_CCNE_A_B_Ser130_u; kDiCdkn1aC*S114*Nuc;
  R563: S115 => S71 + Nuc_CDKN1A_CCNE_A_B_Ser130_u; kDiCdkn1aC*S115*Nuc;
  R564: Nuc_CCNE_CDKN1A_B + S112 => Nuc_CCNE_CDKN1A_B + Nuc_CCNA_CDKN1A_B + Nuc_CDKN1A_CCNE_A_B_Ser130_p; kPhCDKN1AByCe*Nuc_CCNE_CDKN1A_B*S112*Nuc;
  R565: Nuc_CCNE_CDKN1A_B + S113 => Nuc_CCNE_CDKN1A_B + Nuc_CCNE_CDKN1A_B + Nuc_CDKN1A_CCNE_A_B_Ser130_p; kPhCDKN1AByCe*Nuc_CCNE_CDKN1A_B*S113*Nuc;
  R566: Nuc_CCNE_CDKN1A_B + S114 => Nuc_CCNE_CDKN1A_B + S46 + Nuc_CDKN1A_CCNE_A_B_Ser130_p; kPhCDKN1AByCe*Nuc_CCNE_CDKN1A_B*S114*Nuc;
  R567: Nuc_CCNE_CDKN1A_B + S115 => Nuc_CCNE_CDKN1A_B + S71 + Nuc_CDKN1A_CCNE_A_B_Ser130_p; kPhCDKN1AByCe*Nuc_CCNE_CDKN1A_B*S115*Nuc;
  R568: Nuc_CCNA_CDKN1A_B + S112 => Nuc_CCNA_CDKN1A_B + Nuc_CCNA_CDKN1A_B + Nuc_CDKN1A_CCNE_A_B_Ser130_p; kPhCDKN1AByCa*Nuc_CCNA_CDKN1A_B*S112*Nuc;
  R569: Nuc_CCNA_CDKN1A_B + S113 => Nuc_CCNE_CDKN1A_B + Nuc_CCNA_CDKN1A_B + Nuc_CDKN1A_CCNE_A_B_Ser130_p; kPhCDKN1AByCa*Nuc_CCNA_CDKN1A_B*S113*Nuc;
  R570: Nuc_CCNA_CDKN1A_B + S114 => Nuc_CCNA_CDKN1A_B + S46 + Nuc_CDKN1A_CCNE_A_B_Ser130_p; kPhCDKN1AByCa*Nuc_CCNA_CDKN1A_B*S114*Nuc;
  R571: Nuc_CCNA_CDKN1A_B + S115 => Nuc_CCNA_CDKN1A_B + S71 + Nuc_CDKN1A_CCNE_A_B_Ser130_p; kPhCDKN1AByCa*Nuc_CCNA_CDKN1A_B*S115*Nuc;
  R572: S46 + S112 => Nuc_CCNA_CDKN1A_B + S46 + Nuc_CDKN1A_CCNE_A_B_Ser130_p; kPhCDKN1AByCb*S46*S112*Nuc;
  R573: S46 + S113 => Nuc_CCNE_CDKN1A_B + S46 + Nuc_CDKN1A_CCNE_A_B_Ser130_p; kPhCDKN1AByCb*S46*S113*Nuc;
  R574: S46 + S114 => S46 + S46 + Nuc_CDKN1A_CCNE_A_B_Ser130_p; kPhCDKN1AByCb*S46*S114*Nuc;
  R575: S46 + S115 => S46 + S71 + Nuc_CDKN1A_CCNE_A_B_Ser130_p; kPhCDKN1AByCb*S46*S115*Nuc;
  R576: Nuc_CDKN1A_CCNE_A_B_Ser130_p => Nuc_CDKN1A_CCNE_A_B_Ser130_u; kDpCDKN1A*Nuc_CDKN1A_CCNE_A_B_Ser130_p*Nuc;
  R577: S117 => Cyt_CCNA_CDKN1A_B; kDeCDKN1B_1*S117*Cyt;
  R578: S118 => Nuc_CCNA_CDKN1A_B; kDeCDKN1B_1*S118*Nuc;
  R579: S119 => Cyt_CCNE_CDKN1A_B; kDeCDKN1B_1*S119*Cyt;
  R580: S120 => Nuc_CCNE_CDKN1A_B; kDeCDKN1B_1*S120*Nuc;
  R581: Nuc_CDKN1B_CCNE_A_Thr187_p => ; kDeCDKN1B_1*Nuc_CDKN1B_CCNE_A_Thr187_p*Nuc;
  R582: Cyt_SKP2 + S117 => Cyt_CCNA_CDKN1A_B + Cyt_SKP2; kDeCDKN1B_2*Cyt_SKP2*S117*Cyt;
  R583: Cyt_SKP2 + S119 => Cyt_CCNE_CDKN1A_B + Cyt_SKP2; kDeCDKN1B_2*Cyt_SKP2*S119*Cyt;
  R584: Nuc_SKP2 + Nuc_CDKN1B_CCNE_A_Thr187_p => Nuc_SKP2; kDeCDKN1B_2*Nuc_SKP2*Nuc_CDKN1B_CCNE_A_Thr187_p*Nuc;
  R585: Nuc_SKP2 + S118 => Nuc_CCNA_CDKN1A_B + Nuc_SKP2; _rateLaw3*Nuc_SKP2*S118*Nuc;
  R586: Nuc_SKP2 + S120 => Nuc_CCNE_CDKN1A_B + Nuc_SKP2; _rateLaw3*Nuc_SKP2*S120*Nuc;
  R587: Nuc_CCNA_CDKN1A_B + Nuc_CDKN1B_CCNE_A_Thr187_p => S122; kAsCdkn1bC*Nuc_CCNA_CDKN1A_B*Nuc_CDKN1B_CCNE_A_Thr187_p*Nuc;
  R588: S117 => Cyt_CCNA_CDKN1A_B + Cyt_CDKN1B_CCNE_A_Thr187_p; kDiCdkn1bC*S117*Cyt;
  R589: S118 => Nuc_CCNA_CDKN1A_B + Nuc_CDKN1B_CCNE_A_Thr187_u; kDiCdkn1bC*S118*Nuc;
  R590: Nuc_CCNE_CDKN1A_B + Nuc_CDKN1B_CCNE_A_Thr187_p => S123; kAsCdkn1bC*Nuc_CCNE_CDKN1A_B*Nuc_CDKN1B_CCNE_A_Thr187_p*Nuc;
  R591: S119 => Cyt_CCNE_CDKN1A_B + Cyt_CDKN1B_CCNE_A_Thr187_p; kDiCdkn1bC*S119*Cyt;
  R592: S120 => Nuc_CCNE_CDKN1A_B + Nuc_CDKN1B_CCNE_A_Thr187_u; kDiCdkn1bC*S120*Nuc;
  R593: Nuc_CCNE_CDKN1A_B + S118 => Nuc_CCNE_CDKN1A_B + S122; kPhCDKN1BByCe*Nuc_CCNE_CDKN1A_B*S118*Nuc;
  R594: Nuc_CCNE_CDKN1A_B + S120 => Nuc_CCNE_CDKN1A_B + S123; kPhCDKN1BByCe*Nuc_CCNE_CDKN1A_B*S120*Nuc;
  R595: Nuc_CCNA_CDKN1A_B + S118 => Nuc_CCNA_CDKN1A_B + S122; kPhCDKN1BByCa*Nuc_CCNA_CDKN1A_B*S118*Nuc;
  R596: Nuc_CCNA_CDKN1A_B + S120 => Nuc_CCNA_CDKN1A_B + S123; kPhCDKN1BByCa*Nuc_CCNA_CDKN1A_B*S120*Nuc;
  R597: S46 + S118 => S46 + S122; kPhCDKN1BByCb*S46*S118*Nuc;
  R598: S71 + S118 => S71 + S122; kPhCDKN1BByCb*S71*S118*Nuc;
  R599: S46 + S120 => S46 + S123; kPhCDKN1BByCb*S46*S120*Nuc;
  R600: S71 + S120 => S71 + S123; kPhCDKN1BByCb*S71*S120*Nuc;
  R601: S117 => S107; kDpCDKN1B*S117*Cyt;
  R602: S119 => S108; kDpCDKN1B*S119*Cyt;
  R603: Nuc_CDKN1B_CCNE_A_Thr187_p => Nuc_CDKN1B_CCNE_A_Thr187_u; kDpCDKN1B*Nuc_CDKN1B_CCNE_A_Thr187_p*Nuc;
  R604: Num_NUP_pSites_u + S112 => Num_NUP_pSites_u + S102; kExImCCNA_CDKN1A_B1__CDKN1A_CCNE_A_B1_Ser130u__1*Num_NUP_pSites_u*S112*Num;
  R605: Num_NUP_pSites_u + S113 => Num_NUP_pSites_u + S103; kExImCCNE_CDKN1A_B1__CDKN1A_CCNE_A_B1_Ser130u__1*Num_NUP_pSites_u*S113*Num;
  R606: Num_NUP_pSites_u + S114 => Num_NUP_pSites_u + S104; kExImCCNB_CDK1_Thr14_Tyr15u_CDKN1A1__CDKN1A_CCNE_A_B1_Ser130u__1*Num_NUP_pSites_u*S114*Num;
  R607: Num_NUP_pSites_u + S115 => Num_NUP_pSites_u + S105; kExImCCNB_CDK1_Thr14_Tyr15p_CDKN1A1__CDKN1A_CCNE_A_B1_Ser130u__1*Num_NUP_pSites_u*S115*Num;
  R608: Num_NUP_pSites_u + Nuc_CDKN1A_CCNE_A_B_Ser130_p => Num_NUP_pSites_u + Cyt_CDKN1A_CCNE_A_B_Ser130_p; kExImCDKN1A_CCNE_A_B_Ser130p__1*Num_NUP_pSites_u*Nuc_CDKN1A_CCNE_A_B_Ser130_p*Num;
  R609: Num_NUP_pSites_u + S118 => Num_NUP_pSites_u + S107; kExImCCNA_CDKN1A_B1__CDKN1B_CCNE_A1_Thr187u__1*Num_NUP_pSites_u*S118*Num;
  R610: Num_NUP_pSites_u + S120 => Num_NUP_pSites_u + S108; kExImCCNE_CDKN1A_B1__CDKN1B_CCNE_A1_Thr187u__1*Num_NUP_pSites_u*S120*Num;
  R611: Num_NUP_pSites_u + Nuc_CDKN1B_CCNE_A_Thr187_p => Num_NUP_pSites_u + Cyt_CDKN1B_CCNE_A_Thr187_p; kExImCDKN1B_CCNE_A_Thr187p__1*Num_NUP_pSites_u*Nuc_CDKN1B_CCNE_A_Thr187_p*Num;
  R612: Num_NUP_pSites_u + S117 => Num_NUP_pSites_u + S122; kImImCCNA_CDKN1A_B1__CDKN1B_CCNE_A1_Thr187p__1*Num_NUP_pSites_u*S117*Num;
  R613: Num_NUP_pSites_u + S119 => Num_NUP_pSites_u + S123; kImImCCNE_CDKN1A_B1__CDKN1B_CCNE_A1_Thr187p__1*Num_NUP_pSites_u*S119*Num;
  R614: S123 => Nuc_CDKN1B_CCNE_A_Thr187_p; kDeCe*S123*Nuc;
  R615: Nuc_CCNE_CDKN1A_B + S123 => Nuc_CCNE_CDKN1A_B + Nuc_CDKN1B_CCNE_A_Thr187_p; kPhCeE*Nuc_CCNE_CDKN1A_B*S123*Nuc;
  R616: S122 => Nuc_CDKN1B_CCNE_A_Thr187_p; kDeCa1*S122*Nuc;
  R617: Nuc_CCNA_CDKN1A_B + S123 => Nuc_CCNA_CDKN1A_B + Nuc_CDKN1B_CCNE_A_Thr187_p; kPhCeA*Nuc_CCNA_CDKN1A_B*S123*Nuc;
  R618: S56 + S122 => S56 + Nuc_CDKN1B_CCNE_A_Thr187_p; kDeCa2*S56*S122*Nuc;
  R619: S62 + S122 => S62 + Nuc_CDKN1B_CCNE_A_Thr187_p; kDeCa2*S62*S122*Nuc;
  R620: S54 + S122 => S54 + Nuc_CDKN1B_CCNE_A_Thr187_p; kDeCa3*S54*S122*Nuc;
  R621: S122 => Nuc_CCNA_CDKN1A_B; kDeCDKN1B_1*S122*Nuc;
  R622: S123 => Nuc_CCNE_CDKN1A_B; kDeCDKN1B_1*S123*Nuc;
  R623: Nuc_SKP2 + S122 => Nuc_CCNA_CDKN1A_B + Nuc_SKP2; kDeCDKN1B_2*Nuc_SKP2*S122*Nuc;
  R624: Nuc_SKP2 + S123 => Nuc_CCNE_CDKN1A_B + Nuc_SKP2; kDeCDKN1B_2*Nuc_SKP2*S123*Nuc;
  R625: S122 => Nuc_CCNA_CDKN1A_B + Nuc_CDKN1B_CCNE_A_Thr187_p; kDiCdkn1bC*S122*Nuc;
  R626: S123 => Nuc_CCNE_CDKN1A_B + Nuc_CDKN1B_CCNE_A_Thr187_p; kDiCdkn1bC*S123*Nuc;
  R627: S122 => S118; kDpCDKN1B*S122*Nuc;
  R628: S123 => S120; kDpCDKN1B*S123*Nuc;
  R629: Num_NUP_pSites_u + S122 => Num_NUP_pSites_u + S117; kExImCCNA_CDKN1A_B1__CDKN1B_CCNE_A1_Thr187p__1*Num_NUP_pSites_u*S122*Num;
  R630: Num_NUP_pSites_u + S123 => Num_NUP_pSites_u + S119; kExImCCNE_CDKN1A_B1__CDKN1B_CCNE_A1_Thr187p__1*Num_NUP_pSites_u*S123*Num;

  // Unit definitions:
  unit substance = item;
end
