// SBML level 2 version 3

model cell_cycle_v4.0.0()

  // Compartments:
  compartment Plm = 2e-14;  // 2-D
  compartment Cyt in Plm = 1e-12;
  compartment Num in Cyt = 9e-15;  // 2-D
  compartment Nuc in Num = 1e-12;

  // Species:
  species Cyt_CCND in Cyt = 1e-12; Cyt_CCND is "@Cyt::CCND()";
  species Cyt_CCNE_CDKN1A_B in Cyt = 2.3224914e-13; Cyt_CCNE_CDKN1A_B is "@Cyt::CCNE(CDKN1A_B)";
  species Cyt_E2F_DBD_RB1_Ser332_u in Cyt = 1.8479023e-14; Cyt_E2F_DBD_RB1_Ser332_u is "@Cyt::E2F(DBD,RB1,Ser332~u)";
  species Cyt_E2F_DBD_RB1_Ser332_p in Cyt = 3.8081857e-17; Cyt_E2F_DBD_RB1_Ser332_p is "@Cyt::E2F(DBD,RB1,Ser332~p)";
  species Cyt_CCNA_CDKN1A_B in Cyt = 7.0284949e-15; Cyt_CCNA_CDKN1A_B is "@Cyt::CCNA(CDKN1A_B)";
  species S6 in Cyt = 1.8823629e-15; S6 is "@Cyt::CCNB(CDK1_Thr14_Tyr15~u,CDKN1A)";
  species S7 in Cyt = 7.1461332e-14; S7 is "@Cyt::E2F(DBD,RB1!1,Ser332~u).RB1(E2F!1,Ser807_Ser811~u)";
  species S8 in Cyt = 1.5053859e-16; S8 is "@Cyt::E2F(DBD,RB1!1,Ser332~p).RB1(E2F!1,Ser807_Ser811~u)";
  species Cyt_RB1_E2F_Ser807_Ser811_u in Cyt = 8.7642687e-14; Cyt_RB1_E2F_Ser807_Ser811_u is "@Cyt::RB1(E2F,Ser807_Ser811~u)";
  species Cyt_RB1_E2F_Ser807_Ser811_p in Cyt = 8.4074544e-13; Cyt_RB1_E2F_Ser807_Ser811_p is "@Cyt::RB1(E2F,Ser807_Ser811~p)";
  species Cyt_PPP2R2B_ENSA_ARPP19 in Cyt = 7.7191625e-14; Cyt_PPP2R2B_ENSA_ARPP19 is "@Cyt::PPP2R2B(ENSA_ARPP19)";
  species S12 in Cyt = 4.0287133e-12; S12 is "@Cyt::APC(FBXO5,FZR1_CDC20,Ser355~u)";
  species Cyt_CDC20_APC in Cyt = 2.2995279e-13; Cyt_CDC20_APC is "@Cyt::CDC20(APC)";
  species S14 in Cyt = 6.9890078e-14; S14 is "@Cyt::APC(FBXO5,FZR1_CDC20!1,Ser355~p).CDC20(APC!1)";
  species S15 in Cyt = 6.3091065e-14; S15 is "@Cyt::APC(FBXO5,FZR1_CDC20,Ser355~p)";
  species S16 in Cyt = 7.1354419e-13; S16 is "@Cyt::APC(FBXO5,FZR1_CDC20!1,Ser355~u).FZR1(APC!1,FBXO5,nTerm~u)";
  species Cyt_FZR1_APC_FBXO5_nTerm_u in Cyt = 5.7134095e-16; Cyt_FZR1_APC_FBXO5_nTerm_u is "@Cyt::FZR1(APC,FBXO5,nTerm~u)";
  species Cyt_FZR1_APC_FBXO5_nTerm_p in Cyt = 1.6112308e-13; Cyt_FZR1_APC_FBXO5_nTerm_p is "@Cyt::FZR1(APC,FBXO5,nTerm~p)";
  species S19 in Cyt = 1.0894131e-13; S19 is "@Cyt::APC(FBXO5!1,FZR1_CDC20!2,Ser355~u).FBXO5(APC!1,FZR1!3,Ser182~u).FZR1(APC!2,FBXO5!3,nTerm~u)";
  species Cyt_FBXO5_APC_FZR1_Ser182_u in Cyt = 7.1781614e-16; Cyt_FBXO5_APC_FZR1_Ser182_u is "@Cyt::FBXO5(APC,FZR1,Ser182~u)";
  species S21 in Cyt = 2.2125471e-15; S21 is "@Cyt::APC(FBXO5!1,FZR1_CDC20!2,Ser355~p).FBXO5(APC!1,FZR1!3,Ser182~u).FZR1(APC!2,FBXO5!3,nTerm~u)";
  species S22 in Cyt = 1.3607533e-14; S22 is "@Cyt::APC(FBXO5,FZR1_CDC20!1,Ser355~p).FZR1(APC!1,FBXO5,nTerm~u)";
  species Cyt_FBXO5_APC_FZR1_Ser182_p in Cyt = 1.8804937e-17; Cyt_FBXO5_APC_FZR1_Ser182_p is "@Cyt::FBXO5(APC,FZR1,Ser182~p)";
  species Cyt_FOXM1_DBD_Thr600_u in Cyt = 5.5647336e-15; Cyt_FOXM1_DBD_Thr600_u is "@Cyt::FOXM1(DBD,Thr600~u)";
  species Cyt_FOXM1_DBD_Thr600_p in Cyt = 3.8111617e-16; Cyt_FOXM1_DBD_Thr600_p is "@Cyt::FOXM1(DBD,Thr600~p)";
  species S26 in Cyt = 1.9032592e-19; S26 is "@Cyt::CCNB_promoter(FOXM1!1).FOXM1(DBD!1,Thr600~p)";
  species Cyt_CCNB_promoter_FOXM1 in Cyt = 9.9809674e-17; Cyt_CCNB_promoter_FOXM1 is "@Cyt::CCNB_promoter(FOXM1)";
  species Cyt_CDC20_promoter_FOXM1 in Cyt = 9.9923815e-17; Cyt_CDC20_promoter_FOXM1 is "@Cyt::CDC20_promoter(FOXM1)";
  species S29 in Cyt = 7.6185347e-20; S29 is "@Cyt::CDC20_promoter(FOXM1!1).FOXM1(DBD!1,Thr600~p)";
  species Cyt_WEE1_Ser123_u in Cyt = 9.8044163e-13; Cyt_WEE1_Ser123_u is "@Cyt::WEE1(Ser123~u)";
  species S31 in Cyt = 7.5129148e-15; S31 is "@Cyt::CCNB(CDK1_Thr14_Tyr15~p,CDKN1A)";
  species Cyt_WEE1_Ser123_p in Cyt = 1.9558367e-14; Cyt_WEE1_Ser123_p is "@Cyt::WEE1(Ser123~p)";
  species Cyt_CDC25_pSites_p in Cyt = 1.8438067e-14; Cyt_CDC25_pSites_p is "@Cyt::CDC25(pSites~p)";
  species Cyt_CDC25_pSites_u in Cyt = 9.8156193e-13; Cyt_CDC25_pSites_u is "@Cyt::CDC25(pSites~u)";
  species Cyt_MASTL_Thr198_u in Cyt = 9.9752571e-13; Cyt_MASTL_Thr198_u is "@Cyt::MASTL(Thr198~u)";
  species Cyt_MASTL_Thr198_p in Cyt = 2.474295e-15; Cyt_MASTL_Thr198_p is "@Cyt::MASTL(Thr198~p)";
  species S37 in Cyt = 8.2686306e-13; S37 is "@Cyt::ENSA_ARPP19(PPP2R2B,Ser62_Ser67~u)";
  species S38 in Cyt = 3.2856116e-16; S38 is "@Cyt::ENSA_ARPP19(PPP2R2B,Ser62_Ser67~p)";
  species S39 in Cyt = 1.7280837e-13; S39 is "@Cyt::ENSA_ARPP19(PPP2R2B!1,Ser62_Ser67~p).PPP2R2B(ENSA_ARPP19!1)";
  species Cyt_CCNE_promoter_E2F in Cyt = 8.4479024e-17; Cyt_CCNE_promoter_E2F is "@Cyt::CCNE_promoter(E2F)";
  species Cyt_CCNA_promoter_E2F in Cyt = 8.4479024e-17; Cyt_CCNA_promoter_E2F is "@Cyt::CCNA_promoter(E2F)";
  species Cyt_E2F_promoter_E2F in Cyt = 8.4479024e-17; Cyt_E2F_promoter_E2F is "@Cyt::E2F_promoter(E2F)";
  species Cyt_FBXO5_promoter_E2F in Cyt = 8.4479024e-17; Cyt_FBXO5_promoter_E2F is "@Cyt::FBXO5_promoter(E2F)";
  species Cyt_FOXM1_promoter_E2F in Cyt = 8.4479024e-17; Cyt_FOXM1_promoter_E2F is "@Cyt::FOXM1_promoter(E2F)";
  species S45 in Cyt = 1.5520976e-17; S45 is "@Cyt::CCNE_promoter(E2F!1).E2F(DBD!1,RB1,Ser332~u)";
  species S46 in Cyt = 1.5520976e-17; S46 is "@Cyt::CCNA_promoter(E2F!1).E2F(DBD!1,RB1,Ser332~u)";
  species S47 in Cyt = 1.5520976e-17; S47 is "@Cyt::E2F(DBD!1,RB1,Ser332~u).E2F_promoter(E2F!1)";
  species S48 in Cyt = 1.5520976e-17; S48 is "@Cyt::E2F(DBD!1,RB1,Ser332~u).FBXO5_promoter(E2F!1)";
  species S49 in Cyt = 1.5520976e-17; S49 is "@Cyt::E2F(DBD!1,RB1,Ser332~u).FOXM1_promoter(E2F!1)";
  species S50 in Cyt = 0; S50 is "@Cyt::CCNE_promoter(E2F!1).E2F(DBD!1,RB1,Ser332~p)";
  species S51 in Cyt = 0; S51 is "@Cyt::CCNA_promoter(E2F!1).E2F(DBD!1,RB1,Ser332~p)";
  species S52 in Cyt = 0; S52 is "@Cyt::E2F(DBD!1,RB1,Ser332~p).E2F_promoter(E2F!1)";
  species S53 in Cyt = 0; S53 is "@Cyt::E2F(DBD!1,RB1,Ser332~p).FBXO5_promoter(E2F!1)";
  species S54 in Cyt = 0; S54 is "@Cyt::E2F(DBD!1,RB1,Ser332~p).FOXM1_promoter(E2F!1)";
  species Cyt_iWEE in Cyt = 0; Cyt_iWEE is "@Cyt::iWEE()";
  species Cyt_SKP2 in Cyt = 1e-12; Cyt_SKP2 is "@Cyt::SKP2()";
  species Cyt_TP53_DBD_Ser15_p in Cyt = 0; Cyt_TP53_DBD_Ser15_p is "@Cyt::TP53(DBD,Ser15~p)";
  species Cyt_CDKN1A_promoter_TP53 in Cyt = 1e-16; Cyt_CDKN1A_promoter_TP53 is "@Cyt::CDKN1A_promoter(TP53)";
  species Cyt_FOXO_DBD in Cyt = 1e-12; Cyt_FOXO_DBD is "@Cyt::FOXO(DBD)";
  species Cyt_CDKN1B_promoter_FOXO in Cyt = 1e-16; Cyt_CDKN1B_promoter_FOXO is "@Cyt::CDKN1B_promoter(FOXO)";
  species Num_NUP_pSites_u in Num = 3000; Num_NUP_pSites_u is "@Num::NUP(pSites~u)";
  species Nuc_CCND in Nuc = 1e-12; Nuc_CCND is "@Nuc::CCND()";
  species Nuc_CCNE_CDKN1A_B in Nuc = 2.3224914e-13; Nuc_CCNE_CDKN1A_B is "@Nuc::CCNE(CDKN1A_B)";
  species Nuc_E2F_DBD_RB1_Ser332_u in Nuc = 1.8479023e-14; Nuc_E2F_DBD_RB1_Ser332_u is "@Nuc::E2F(DBD,RB1,Ser332~u)";
  species Nuc_E2F_DBD_RB1_Ser332_p in Nuc = 3.8081857e-17; Nuc_E2F_DBD_RB1_Ser332_p is "@Nuc::E2F(DBD,RB1,Ser332~p)";
  species Nuc_CCNA_CDKN1A_B in Nuc = 7.0284949e-15; Nuc_CCNA_CDKN1A_B is "@Nuc::CCNA(CDKN1A_B)";
  species S67 in Nuc = 1.8823629e-15; S67 is "@Nuc::CCNB(CDK1_Thr14_Tyr15~u,CDKN1A)";
  species S68 in Nuc = 7.1461332e-14; S68 is "@Nuc::E2F(DBD,RB1!1,Ser332~u).RB1(E2F!1,Ser807_Ser811~u)";
  species S69 in Nuc = 1.5053859e-16; S69 is "@Nuc::E2F(DBD,RB1!1,Ser332~p).RB1(E2F!1,Ser807_Ser811~u)";
  species Nuc_RB1_E2F_Ser807_Ser811_u in Nuc = 8.7642687e-14; Nuc_RB1_E2F_Ser807_Ser811_u is "@Nuc::RB1(E2F,Ser807_Ser811~u)";
  species Nuc_RB1_E2F_Ser807_Ser811_p in Nuc = 8.4074544e-13; Nuc_RB1_E2F_Ser807_Ser811_p is "@Nuc::RB1(E2F,Ser807_Ser811~p)";
  species Nuc_PPP2R2B_ENSA_ARPP19 in Nuc = 7.7191625e-14; Nuc_PPP2R2B_ENSA_ARPP19 is "@Nuc::PPP2R2B(ENSA_ARPP19)";
  species S73 in Nuc = 4.0287133e-12; S73 is "@Nuc::APC(FBXO5,FZR1_CDC20,Ser355~u)";
  species Nuc_CDC20_APC in Nuc = 2.2995279e-13; Nuc_CDC20_APC is "@Nuc::CDC20(APC)";
  species S75 in Nuc = 6.9890078e-14; S75 is "@Nuc::APC(FBXO5,FZR1_CDC20!1,Ser355~p).CDC20(APC!1)";
  species S76 in Nuc = 6.3091065e-14; S76 is "@Nuc::APC(FBXO5,FZR1_CDC20,Ser355~p)";
  species S77 in Nuc = 7.1354419e-13; S77 is "@Nuc::APC(FBXO5,FZR1_CDC20!1,Ser355~u).FZR1(APC!1,FBXO5,nTerm~u)";
  species Nuc_FZR1_APC_FBXO5_nTerm_u in Nuc = 5.7134095e-16; Nuc_FZR1_APC_FBXO5_nTerm_u is "@Nuc::FZR1(APC,FBXO5,nTerm~u)";
  species Nuc_FZR1_APC_FBXO5_nTerm_p in Nuc = 1.6112308e-13; Nuc_FZR1_APC_FBXO5_nTerm_p is "@Nuc::FZR1(APC,FBXO5,nTerm~p)";
  species S80 in Nuc = 1.0894131e-13; S80 is "@Nuc::APC(FBXO5!1,FZR1_CDC20!2,Ser355~u).FBXO5(APC!1,FZR1!3,Ser182~u).FZR1(APC!2,FBXO5!3,nTerm~u)";
  species Nuc_FBXO5_APC_FZR1_Ser182_u in Nuc = 7.1781614e-16; Nuc_FBXO5_APC_FZR1_Ser182_u is "@Nuc::FBXO5(APC,FZR1,Ser182~u)";
  species S82 in Nuc = 2.2125471e-15; S82 is "@Nuc::APC(FBXO5!1,FZR1_CDC20!2,Ser355~p).FBXO5(APC!1,FZR1!3,Ser182~u).FZR1(APC!2,FBXO5!3,nTerm~u)";
  species S83 in Nuc = 1.3607533e-14; S83 is "@Nuc::APC(FBXO5,FZR1_CDC20!1,Ser355~p).FZR1(APC!1,FBXO5,nTerm~u)";
  species Nuc_FBXO5_APC_FZR1_Ser182_p in Nuc = 1.8804937e-17; Nuc_FBXO5_APC_FZR1_Ser182_p is "@Nuc::FBXO5(APC,FZR1,Ser182~p)";
  species Nuc_FOXM1_DBD_Thr600_u in Nuc = 5.5647336e-15; Nuc_FOXM1_DBD_Thr600_u is "@Nuc::FOXM1(DBD,Thr600~u)";
  species Nuc_FOXM1_DBD_Thr600_p in Nuc = 3.8111617e-16; Nuc_FOXM1_DBD_Thr600_p is "@Nuc::FOXM1(DBD,Thr600~p)";
  species S87 in Nuc = 1.9032592e-19; S87 is "@Nuc::CCNB_promoter(FOXM1!1).FOXM1(DBD!1,Thr600~p)";
  species Nuc_CCNB_promoter_FOXM1 in Nuc = 9.9809674e-17; Nuc_CCNB_promoter_FOXM1 is "@Nuc::CCNB_promoter(FOXM1)";
  species Nuc_CDC20_promoter_FOXM1 in Nuc = 9.9923815e-17; Nuc_CDC20_promoter_FOXM1 is "@Nuc::CDC20_promoter(FOXM1)";
  species S90 in Nuc = 7.6185347e-20; S90 is "@Nuc::CDC20_promoter(FOXM1!1).FOXM1(DBD!1,Thr600~p)";
  species Nuc_WEE1_Ser123_u in Nuc = 9.8044163e-13; Nuc_WEE1_Ser123_u is "@Nuc::WEE1(Ser123~u)";
  species S92 in Nuc = 7.5129148e-15; S92 is "@Nuc::CCNB(CDK1_Thr14_Tyr15~p,CDKN1A)";
  species Nuc_WEE1_Ser123_p in Nuc = 1.9558367e-14; Nuc_WEE1_Ser123_p is "@Nuc::WEE1(Ser123~p)";
  species Nuc_CDC25_pSites_p in Nuc = 1.8438067e-14; Nuc_CDC25_pSites_p is "@Nuc::CDC25(pSites~p)";
  species Nuc_CDC25_pSites_u in Nuc = 9.8156193e-13; Nuc_CDC25_pSites_u is "@Nuc::CDC25(pSites~u)";
  species Nuc_MASTL_Thr198_u in Nuc = 9.9752571e-13; Nuc_MASTL_Thr198_u is "@Nuc::MASTL(Thr198~u)";
  species Nuc_MASTL_Thr198_p in Nuc = 2.474295e-15; Nuc_MASTL_Thr198_p is "@Nuc::MASTL(Thr198~p)";
  species S98 in Nuc = 8.2686306e-13; S98 is "@Nuc::ENSA_ARPP19(PPP2R2B,Ser62_Ser67~u)";
  species S99 in Nuc = 3.2856116e-16; S99 is "@Nuc::ENSA_ARPP19(PPP2R2B,Ser62_Ser67~p)";
  species S100 in Nuc = 1.7280837e-13; S100 is "@Nuc::ENSA_ARPP19(PPP2R2B!1,Ser62_Ser67~p).PPP2R2B(ENSA_ARPP19!1)";
  species Nuc_CCNE_promoter_E2F in Nuc = 8.4479024e-17; Nuc_CCNE_promoter_E2F is "@Nuc::CCNE_promoter(E2F)";
  species Nuc_CCNA_promoter_E2F in Nuc = 8.4479024e-17; Nuc_CCNA_promoter_E2F is "@Nuc::CCNA_promoter(E2F)";
  species Nuc_E2F_promoter_E2F in Nuc = 8.4479024e-17; Nuc_E2F_promoter_E2F is "@Nuc::E2F_promoter(E2F)";
  species Nuc_FBXO5_promoter_E2F in Nuc = 8.4479024e-17; Nuc_FBXO5_promoter_E2F is "@Nuc::FBXO5_promoter(E2F)";
  species Nuc_FOXM1_promoter_E2F in Nuc = 8.4479024e-17; Nuc_FOXM1_promoter_E2F is "@Nuc::FOXM1_promoter(E2F)";
  species S106 in Nuc = 1.5520976e-17; S106 is "@Nuc::CCNE_promoter(E2F!1).E2F(DBD!1,RB1,Ser332~u)";
  species S107 in Nuc = 1.5520976e-17; S107 is "@Nuc::CCNA_promoter(E2F!1).E2F(DBD!1,RB1,Ser332~u)";
  species S108 in Nuc = 1.5520976e-17; S108 is "@Nuc::E2F(DBD!1,RB1,Ser332~u).E2F_promoter(E2F!1)";
  species S109 in Nuc = 1.5520976e-17; S109 is "@Nuc::E2F(DBD!1,RB1,Ser332~u).FBXO5_promoter(E2F!1)";
  species S110 in Nuc = 1.5520976e-17; S110 is "@Nuc::E2F(DBD!1,RB1,Ser332~u).FOXM1_promoter(E2F!1)";
  species S111 in Nuc = 0; S111 is "@Nuc::CCNE_promoter(E2F!1).E2F(DBD!1,RB1,Ser332~p)";
  species S112 in Nuc = 0; S112 is "@Nuc::CCNA_promoter(E2F!1).E2F(DBD!1,RB1,Ser332~p)";
  species S113 in Nuc = 0; S113 is "@Nuc::E2F(DBD!1,RB1,Ser332~p).E2F_promoter(E2F!1)";
  species S114 in Nuc = 0; S114 is "@Nuc::E2F(DBD!1,RB1,Ser332~p).FBXO5_promoter(E2F!1)";
  species S115 in Nuc = 0; S115 is "@Nuc::E2F(DBD!1,RB1,Ser332~p).FOXM1_promoter(E2F!1)";
  species Nuc_iWEE in Nuc = 0; Nuc_iWEE is "@Nuc::iWEE()";
  species Nuc_SKP2 in Nuc = 1e-12; Nuc_SKP2 is "@Nuc::SKP2()";
  species Nuc_TP53_DBD_Ser15_p in Nuc = 0; Nuc_TP53_DBD_Ser15_p is "@Nuc::TP53(DBD,Ser15~p)";
  species Nuc_CDKN1A_promoter_TP53 in Nuc = 1e-16; Nuc_CDKN1A_promoter_TP53 is "@Nuc::CDKN1A_promoter(TP53)";
  species Nuc_FOXO_DBD in Nuc = 1e-12; Nuc_FOXO_DBD is "@Nuc::FOXO(DBD)";
  species Nuc_CDKN1B_promoter_FOXO in Nuc = 1e-16; Nuc_CDKN1B_promoter_FOXO is "@Nuc::CDKN1B_promoter(FOXO)";
  species S122 in Cyt = 0; S122 is "@Cyt::CDKN1A_promoter(TP53!1).TP53(DBD!1,Ser15~p)";
  species S123 in Nuc = 0; S123 is "@Nuc::CDKN1A_promoter(TP53!1).TP53(DBD!1,Ser15~p)";
  species Cyt_CDKN1A_CCNE_A_B_Ser130_u in Cyt = 0; Cyt_CDKN1A_CCNE_A_B_Ser130_u is "@Cyt::CDKN1A(CCNE_A_B,Ser130~u)";
  species S125 in Cyt = 0; S125 is "@Cyt::CDKN1B_promoter(FOXO!1).FOXO(DBD!1)";
  species S126 in Nuc = 0; S126 is "@Nuc::CDKN1B_promoter(FOXO!1).FOXO(DBD!1)";
  species Cyt_CDKN1B_CCNE_A_Thr187_u in Cyt = 0; Cyt_CDKN1B_CCNE_A_Thr187_u is "@Cyt::CDKN1B(CCNE_A,Thr187~u)";
  species S128 in Cyt = 0; S128 is "@Cyt::CCNA(CDKN1A_B!1).CDKN1A(CCNE_A_B!1,Ser130~u)";
  species S129 in Cyt = 0; S129 is "@Cyt::CCNE(CDKN1A_B!1).CDKN1A(CCNE_A_B!1,Ser130~u)";
  species S130 in Cyt = 0; S130 is "@Cyt::CCNB(CDK1_Thr14_Tyr15~u,CDKN1A!1).CDKN1A(CCNE_A_B!1,Ser130~u)";
  species S131 in Cyt = 0; S131 is "@Cyt::CCNB(CDK1_Thr14_Tyr15~p,CDKN1A!1).CDKN1A(CCNE_A_B!1,Ser130~u)";
  species Cyt_CDKN1A_CCNE_A_B_Ser130_p in Cyt = 0; Cyt_CDKN1A_CCNE_A_B_Ser130_p is "@Cyt::CDKN1A(CCNE_A_B,Ser130~p)";
  species S133 in Cyt = 0; S133 is "@Cyt::CCNA(CDKN1A_B!1).CDKN1B(CCNE_A!1,Thr187~u)";
  species S134 in Cyt = 0; S134 is "@Cyt::CCNE(CDKN1A_B!1).CDKN1B(CCNE_A!1,Thr187~u)";
  species Cyt_CDKN1B_CCNE_A_Thr187_p in Cyt = 0; Cyt_CDKN1B_CCNE_A_Thr187_p is "@Cyt::CDKN1B(CCNE_A,Thr187~p)";
  species Nuc_CDKN1A_CCNE_A_B_Ser130_u in Nuc = 0; Nuc_CDKN1A_CCNE_A_B_Ser130_u is "@Nuc::CDKN1A(CCNE_A_B,Ser130~u)";
  species Nuc_CDKN1B_CCNE_A_Thr187_u in Nuc = 0; Nuc_CDKN1B_CCNE_A_Thr187_u is "@Nuc::CDKN1B(CCNE_A,Thr187~u)";
  species S138 in Nuc = 0; S138 is "@Nuc::CCNA(CDKN1A_B!1).CDKN1A(CCNE_A_B!1,Ser130~u)";
  species S139 in Nuc = 0; S139 is "@Nuc::CCNE(CDKN1A_B!1).CDKN1A(CCNE_A_B!1,Ser130~u)";
  species S140 in Nuc = 0; S140 is "@Nuc::CCNB(CDK1_Thr14_Tyr15~u,CDKN1A!1).CDKN1A(CCNE_A_B!1,Ser130~u)";
  species S141 in Nuc = 0; S141 is "@Nuc::CCNB(CDK1_Thr14_Tyr15~p,CDKN1A!1).CDKN1A(CCNE_A_B!1,Ser130~u)";
  species Nuc_CDKN1A_CCNE_A_B_Ser130_p in Nuc = 0; Nuc_CDKN1A_CCNE_A_B_Ser130_p is "@Nuc::CDKN1A(CCNE_A_B,Ser130~p)";
  species S143 in Cyt = 0; S143 is "@Cyt::CCNA(CDKN1A_B!1).CDKN1B(CCNE_A!1,Thr187~p)";
  species S144 in Nuc = 0; S144 is "@Nuc::CCNA(CDKN1A_B!1).CDKN1B(CCNE_A!1,Thr187~u)";
  species S145 in Cyt = 0; S145 is "@Cyt::CCNE(CDKN1A_B!1).CDKN1B(CCNE_A!1,Thr187~p)";
  species S146 in Nuc = 0; S146 is "@Nuc::CCNE(CDKN1A_B!1).CDKN1B(CCNE_A!1,Thr187~u)";
  species Nuc_CDKN1B_CCNE_A_Thr187_p in Nuc = 0; Nuc_CDKN1B_CCNE_A_Thr187_p is "@Nuc::CDKN1B(CCNE_A,Thr187~p)";
  species S148 in Nuc = 0; S148 is "@Nuc::CCNA(CDKN1A_B!1).CDKN1B(CCNE_A!1,Thr187~p)";
  species S149 in Nuc = 0; S149 is "@Nuc::CCNE(CDKN1A_B!1).CDKN1B(CCNE_A!1,Thr187~p)";

  // Parameters:
  kPhRbD = 0.0055440055;
  kPhRbE = 0.0069300069;
  kDpRb = 0.0013860014;
  kPhRb = 0.020790021;
  kSyCe1 = 2.7720028e-5;
  kSyCe2 = 8.3160083;
  kDeCe = 0.00013860014;
  kDiE2fRb = 0.00034650035;
  kAsE2fRb = 0.34650035;
  kSyE2f1 = 1.3860014e-5;
  kSyE2f2 = 1.3860014;
  kDeE2f1 = 6.9300069e-5;
  kDeE2f2 = 0.0013860014;
  kPhE2f = 0.0013860014;
  kDpE2f2 = 0.069300069;
  kSyEmi1 = 6.9300069e-5;
  kSyEmi2 = 6.9300069;
  kDeEmi1 = 0.00034650035;
  kDeEmi2 = 0.00034650035;
  kDeEmi3 = 0.0034650035;
  kPhEmiA = 3.4650035e-5;
  kPhEmiB = 0.00017325017;
  kDpEmi = 3.4650035e-6;
  kSyCa1 = 1.3860014e-5;
  kSyCa2 = 1.039501;
  kDeCa1 = 6.9300069e-6;
  kDeCa2 = 0.0027720028;
  kDeCa3 = 0.00069300069;
  kDpCdh = 0.0034650035;
  kPhCdhA = 0.017325017;
  kPhCdhE = 0.00069300069;
  kPhCdhB = 0.17325017;
  kDiACE = 0.00034650035;
  kAsACE = 0.34650035;
  kDiACdh = 0.00034650035;
  kAsACdh = 0.34650035;
  kPhCeA = 0.0069300069;
  kPhCeE = 6.9300069e-5;
  kPhFoxE = 0.00069300069;
  kPhFoxA = 0.00069300069;
  kPhFoxB = 0.0034650035;
  kDpFox = 1e-5;
  kSyCb1 = 1.3860014e-5;
  kSyCb2 = 1.039501;
  kDeCb1 = 6.9300069e-6;
  kDeCb2 = 0.00086625087;
  kDeCb3 = 0.00086625087;
  kPhEnsa = 0.00069300069;
  kDpEnsa = 0.00034650035;
  kPhGw = 0.0069300069;
  kDpGw1 = 0.0017325017;
  kDpGw2 = 0.069300069;
  kWee1 = 6.9300069e-5;
  kWee2 = 0.0069300069;
  kPhWeeA = 0.00069300069;
  kPhWeeB = 0.0069300069;
  kDpWee = 0.069300069;
  kCdc25_1 = 0.00069300069;
  kCdc25_2 = 0.0069300069;
  kDpCdc25 = 0.069300069;
  kDipEB55 = 4.7124047e-5;
  kAspEB55 = 0.3950104;
  kSyCdc_1 = 1.3860014e-5;
  kSyCdc_2 = 1.3860014;
  kDeCdc_1 = 2.7720028e-5;
  kDeCdc_2 = 0.00027720028;
  kDipACdc = 0.00086625087;
  kAspACdc = 0.0069300069;
  kPhApcA = 6.9300069e-5;
  kDpApc_1 = 0;
  kDpApc_2 = 0.034650035;
  kSyFox1 = 1.3860014e-5;
  kSyFox2 = 1.039501;
  kDeFox1 = 6.9300069e-6;
  kDeFox2 = 0.0034650035;
  kAsEPx = 0.34650035;
  kDiEPx = 0.034650035;
  kAsFPcb = 0.34650035;
  kDiFPcb = 0.069300069;
  kAsFPcdc = 0.34650035;
  kDiFPcdc = 0.17325017;
  kPhC25B = 0.0069300069;
  kPhCAEE = 0.00055440055;
  kPhCAEA = 0.013860014;
  kPhCAEB = 0.13860014;
  ikSyCb = 1;
  jiWee = 0.1;
  kDpE2f1 = 0;
  kPhC25A = 0;
  kSySkp2 = 0.0002;
  kDeSkp2_1 = 0.0001;
  kDeSkp2_2 = 0.002;
  kAsTP53PCDKN1A = 0.3;
  kDiTP53PCDKN1A = 0.15;
  kSyCDKN1A_1 = 2e-5;
  kSyCDKN1A_2 = 8;
  kDeCDKN1A_1 = 2e-5;
  kDeCDKN1A_2 = 0.00025;
  kAsCdkn1aC = 0.007;
  kDiCdkn1aC = 0.0003;
  kPhCDKN1AByCe = 0.005;
  kPhCDKN1AByCa = 0.0005;
  kPhCDKN1AByCb = 0.005;
  kDpCDKN1A = 0.002;
  kAsFOXOPCDKN1B = 0.3;
  kDiFOXOPCDKN1B = 0.15;
  kSyCDKN1B_1 = 2e-5;
  kSyCDKN1B_2 = 1;
  kDeCDKN1B_1 = 2e-5;
  kDeCDKN1B_2 = 0.0025;
  kAsCdkn1bC = 0.007;
  kDiCdkn1bC = 0.0003;
  kPhCDKN1BByCe = 0.005;
  kPhCDKN1BByCa = 0.05;
  kPhCDKN1BByCb = 0.0005;
  kDpCDKN1B = 0.002;
  kPhNup = 3e12;
  kDpNup_1 = 2;
  kImImCCND_1 = 1e9;
  kExImCCND_1 = 1e9;
  kImImCCNE_CDKN1A_B__1 = 1e9;
  kExImCCNE_CDKN1A_B__1 = 1e9;
  kImImE2F_DBD_RB1_Ser332u__1 = 1e9;
  kExImE2F_DBD_RB1_Ser332u__1 = 1e9;
  kImImE2F_DBD_RB1_Ser332p__1 = 1e9;
  kExImE2F_DBD_RB1_Ser332p__1 = 1e9;
  kImImCCNA_CDKN1A_B__1 = 1e9;
  kExImCCNA_CDKN1A_B__1 = 1e9;
  kImImCCNB_CDK1_Thr14_Tyr15u_CDKN1A__1 = 1e9;
  kExImCCNB_CDK1_Thr14_Tyr15u_CDKN1A__1 = 1e9;
  kImImE2F_DBD_RB11_Ser332u__RB1_E2F1_Ser807_Ser811u__1 = 1e9;
  kExImE2F_DBD_RB11_Ser332u__RB1_E2F1_Ser807_Ser811u__1 = 1e9;
  kImImE2F_DBD_RB11_Ser332p__RB1_E2F1_Ser807_Ser811u__1 = 1e9;
  kExImE2F_DBD_RB11_Ser332p__RB1_E2F1_Ser807_Ser811u__1 = 1e9;
  kImImRB1_E2F_Ser807_Ser811u__1 = 1e9;
  kExImRB1_E2F_Ser807_Ser811u__1 = 1e9;
  kImImRB1_E2F_Ser807_Ser811p__1 = 1e9;
  kExImRB1_E2F_Ser807_Ser811p__1 = 1e9;
  kImImPPP2R2B_ENSA_ARPP19__1 = 1e9;
  kExImPPP2R2B_ENSA_ARPP19__1 = 1e9;
  kImImAPC_FBXO5_FZR1_CDC20_Ser355u__1 = 1e9;
  kExImAPC_FBXO5_FZR1_CDC20_Ser355u__1 = 1e9;
  kImImCDC20_APC__1 = 1e9;
  kExImCDC20_APC__1 = 1e9;
  kImImAPC_FBXO5_FZR1_CDC201_Ser355p__CDC20_APC1__1 = 1e9;
  kExImAPC_FBXO5_FZR1_CDC201_Ser355p__CDC20_APC1__1 = 1e9;
  kImImAPC_FBXO5_FZR1_CDC20_Ser355p__1 = 1e9;
  kExImAPC_FBXO5_FZR1_CDC20_Ser355p__1 = 1e9;
  kImImAPC_FBXO5_FZR1_CDC201_Ser355u__FZR1_APC1_FBXO5_nTermu__1 = 1e9;
  kExImAPC_FBXO5_FZR1_CDC201_Ser355u__FZR1_APC1_FBXO5_nTermu__1 = 1e9;
  kImImFZR1_APC_FBXO5_nTermu__1 = 1e9;
  kExImFZR1_APC_FBXO5_nTermu__1 = 1e9;
  kImImFZR1_APC_FBXO5_nTermp__1 = 1e9;
  kExImFZR1_APC_FBXO5_nTermp__1 = 1e9;
  kImImAPC_FBXO51_FZR1_CDC202_Ser355u__FBXO5_APC1_FZR13_Ser182u__FZR1_APC2_FBXO53_nTermu__1 = 1e9;
  kExImAPC_FBXO51_FZR1_CDC202_Ser355u__FBXO5_APC1_FZR13_Ser182u__FZR1_APC2_FBXO53_nTermu__1 = 1e9;
  kImImFBXO5_APC_FZR1_Ser182u__1 = 1e9;
  kExImFBXO5_APC_FZR1_Ser182u__1 = 1e9;
  kImImAPC_FBXO51_FZR1_CDC202_Ser355p__FBXO5_APC1_FZR13_Ser182u__FZR1_APC2_FBXO53_nTermu__1 = 1e9;
  kExImAPC_FBXO51_FZR1_CDC202_Ser355p__FBXO5_APC1_FZR13_Ser182u__FZR1_APC2_FBXO53_nTermu__1 = 1e9;
  kImImAPC_FBXO5_FZR1_CDC201_Ser355p__FZR1_APC1_FBXO5_nTermu__1 = 1e9;
  kExImAPC_FBXO5_FZR1_CDC201_Ser355p__FZR1_APC1_FBXO5_nTermu__1 = 1e9;
  kImImFBXO5_APC_FZR1_Ser182p__1 = 1e9;
  kExImFBXO5_APC_FZR1_Ser182p__1 = 1e9;
  kImImFOXM1_DBD_Thr600u__1 = 1e9;
  kExImFOXM1_DBD_Thr600u__1 = 1e9;
  kImImFOXM1_DBD_Thr600p__1 = 1e9;
  kExImFOXM1_DBD_Thr600p__1 = 1e9;
  kImImWEE1_Ser123u__1 = 1e9;
  kExImWEE1_Ser123u__1 = 1e9;
  kImImCCNB_CDK1_Thr14_Tyr15p_CDKN1A__1 = 1e9;
  kExImCCNB_CDK1_Thr14_Tyr15p_CDKN1A__1 = 1e9;
  kImImWEE1_Ser123p__1 = 1e9;
  kExImWEE1_Ser123p__1 = 1e9;
  kImImCDC25_pSitesp__1 = 1e9;
  kExImCDC25_pSitesp__1 = 1e9;
  kImImCDC25_pSitesu__1 = 1e9;
  kExImCDC25_pSitesu__1 = 1e9;
  kImImMASTL_Thr198u__1 = 1e9;
  kExImMASTL_Thr198u__1 = 1e9;
  kImImMASTL_Thr198p__1 = 1e9;
  kExImMASTL_Thr198p__1 = 1e9;
  kImImENSA_ARPP19_PPP2R2B_Ser62_Ser67u__1 = 1e9;
  kExImENSA_ARPP19_PPP2R2B_Ser62_Ser67u__1 = 1e9;
  kImImENSA_ARPP19_PPP2R2B_Ser62_Ser67p__1 = 1e9;
  kExImENSA_ARPP19_PPP2R2B_Ser62_Ser67p__1 = 1e9;
  kImImENSA_ARPP19_PPP2R2B1_Ser62_Ser67p__PPP2R2B_ENSA_ARPP191__1 = 1e9;
  kExImENSA_ARPP19_PPP2R2B1_Ser62_Ser67p__PPP2R2B_ENSA_ARPP191__1 = 1e9;
  kImImiWEE_1 = 1e9;
  kExImiWEE_1 = 1e9;
  kImImSKP2_1 = 1e9;
  kExImSKP2_1 = 1e9;
  kImImTP53_DBD_Ser15p__1 = 1e9;
  kExImTP53_DBD_Ser15p__1 = 1e9;
  kImImFOXO_DBD__1 = 1e9;
  kExImFOXO_DBD__1 = 1e9;
  kImImCDKN1A_CCNE_A_B_Ser130u__1 = 1e9;
  kExImCDKN1A_CCNE_A_B_Ser130u__1 = 1e9;
  kImImCDKN1B_CCNE_A_Thr187u__1 = 1e9;
  kExImCDKN1B_CCNE_A_Thr187u__1 = 1e9;
  kImImCCNA_CDKN1A_B1__CDKN1A_CCNE_A_B1_Ser130u__1 = 1e9;
  kExImCCNA_CDKN1A_B1__CDKN1A_CCNE_A_B1_Ser130u__1 = 1e9;
  kImImCCNE_CDKN1A_B1__CDKN1A_CCNE_A_B1_Ser130u__1 = 1e9;
  kExImCCNE_CDKN1A_B1__CDKN1A_CCNE_A_B1_Ser130u__1 = 1e9;
  kImImCCNB_CDK1_Thr14_Tyr15u_CDKN1A1__CDKN1A_CCNE_A_B1_Ser130u__1 = 1e9;
  kExImCCNB_CDK1_Thr14_Tyr15u_CDKN1A1__CDKN1A_CCNE_A_B1_Ser130u__1 = 1e9;
  kImImCCNB_CDK1_Thr14_Tyr15p_CDKN1A1__CDKN1A_CCNE_A_B1_Ser130u__1 = 1e9;
  kExImCCNB_CDK1_Thr14_Tyr15p_CDKN1A1__CDKN1A_CCNE_A_B1_Ser130u__1 = 1e9;
  kImImCDKN1A_CCNE_A_B_Ser130p__1 = 1e9;
  kExImCDKN1A_CCNE_A_B_Ser130p__1 = 1e9;
  kImImCCNA_CDKN1A_B1__CDKN1B_CCNE_A1_Thr187u__1 = 1e9;
  kExImCCNA_CDKN1A_B1__CDKN1B_CCNE_A1_Thr187u__1 = 1e9;
  kImImCCNE_CDKN1A_B1__CDKN1B_CCNE_A1_Thr187u__1 = 1e9;
  kExImCCNE_CDKN1A_B1__CDKN1B_CCNE_A1_Thr187u__1 = 1e9;
  kImImCDKN1B_CCNE_A_Thr187p__1 = 1e9;
  kExImCDKN1B_CCNE_A_Thr187p__1 = 1e9;
  kImImCCNA_CDKN1A_B1__CDKN1B_CCNE_A1_Thr187p__1 = 1e9;
  kExImCCNA_CDKN1A_B1__CDKN1B_CCNE_A1_Thr187p__1 = 1e9;
  kImImCCNE_CDKN1A_B1__CDKN1B_CCNE_A1_Thr187p__1 = 1e9;
  kExImCCNE_CDKN1A_B1__CDKN1B_CCNE_A1_Thr187p__1 = 1e9;
  kIm_2 = 1e10;
  kEx_2 = 1e10;
  _InitialConc1 = 1e-12;
  _InitialConc2 = 2.3224914e-13;
  _InitialConc3 = 1.8479023e-14;
  _InitialConc4 = 3.8081857e-17;
  _InitialConc5 = 7.0284949e-15;
  _InitialConc6 = 1.8823629e-15;
  _InitialConc7 = 7.1461332e-14;
  _InitialConc8 = 1.5053859e-16;
  _InitialConc9 = 8.7642687e-14;
  _InitialConc10 = 8.4074544e-13;
  _InitialConc11 = 7.7191625e-14;
  _InitialConc12 = 4.0287133e-12;
  _InitialConc13 = 2.2995279e-13;
  _InitialConc14 = 6.9890078e-14;
  _InitialConc15 = 6.3091065e-14;
  _InitialConc16 = 7.1354419e-13;
  _InitialConc17 = 5.7134095e-16;
  _InitialConc18 = 1.6112308e-13;
  _InitialConc19 = 1.0894131e-13;
  _InitialConc20 = 7.1781614e-16;
  _InitialConc21 = 2.2125471e-15;
  _InitialConc22 = 1.3607533e-14;
  _InitialConc23 = 1.8804937e-17;
  _InitialConc24 = 5.5647336e-15;
  _InitialConc25 = 3.8111617e-16;
  _InitialConc26 = 1.9032592e-19;
  _InitialConc27 = 9.9809674e-17;
  _InitialConc28 = 9.9923815e-17;
  _InitialConc29 = 7.6185347e-20;
  _InitialConc30 = 9.8044163e-13;
  _InitialConc31 = 7.5129148e-15;
  _InitialConc32 = 1.9558367e-14;
  _InitialConc33 = 1.8438067e-14;
  _InitialConc34 = 9.8156193e-13;
  _InitialConc35 = 9.9752571e-13;
  _InitialConc36 = 2.474295e-15;
  _InitialConc37 = 8.2686306e-13;
  _InitialConc38 = 3.2856116e-16;
  _InitialConc39 = 1.7280837e-13;
  _InitialConc40 = 8.4479024e-17;
  _InitialConc41 = 8.4479024e-17;
  _InitialConc42 = 8.4479024e-17;
  _InitialConc43 = 8.4479024e-17;
  _InitialConc44 = 8.4479024e-17;
  _InitialConc45 = 1.5520976e-17;
  _InitialConc46 = 1.5520976e-17;
  _InitialConc47 = 1.5520976e-17;
  _InitialConc48 = 1.5520976e-17;
  _InitialConc49 = 1.5520976e-17;
  _InitialConc50 = 0;
  _InitialConc51 = 0;
  _InitialConc52 = 0;
  _InitialConc53 = 0;
  _InitialConc54 = 0;
  _InitialConc55 = 0;
  _InitialConc56 = 1e-12;
  _InitialConc57 = 0;
  _InitialConc58 = 1e-16;
  _InitialConc59 = 1e-12;
  _InitialConc60 = 1e-16;
  _InitialConc61 = 1e-12;
  _InitialConc62 = 2.3224914e-13;
  _InitialConc63 = 1.8479023e-14;
  _InitialConc64 = 3.8081857e-17;
  _InitialConc65 = 7.0284949e-15;
  _InitialConc66 = 1.8823629e-15;
  _InitialConc67 = 7.1461332e-14;
  _InitialConc68 = 1.5053859e-16;
  _InitialConc69 = 8.7642687e-14;
  _InitialConc70 = 8.4074544e-13;
  _InitialConc71 = 7.7191625e-14;
  _InitialConc72 = 4.0287133e-12;
  _InitialConc73 = 2.2995279e-13;
  _InitialConc74 = 6.9890078e-14;
  _InitialConc75 = 6.3091065e-14;
  _InitialConc76 = 7.1354419e-13;
  _InitialConc77 = 5.7134095e-16;
  _InitialConc78 = 1.6112308e-13;
  _InitialConc79 = 1.0894131e-13;
  _InitialConc80 = 7.1781614e-16;
  _InitialConc81 = 2.2125471e-15;
  _InitialConc82 = 1.3607533e-14;
  _InitialConc83 = 1.8804937e-17;
  _InitialConc84 = 5.5647336e-15;
  _InitialConc85 = 3.8111617e-16;
  _InitialConc86 = 1.9032592e-19;
  _InitialConc87 = 9.9809674e-17;
  _InitialConc88 = 9.9923815e-17;
  _InitialConc89 = 7.6185347e-20;
  _InitialConc90 = 9.8044163e-13;
  _InitialConc91 = 7.5129148e-15;
  _InitialConc92 = 1.9558367e-14;
  _InitialConc93 = 1.8438067e-14;
  _InitialConc94 = 9.8156193e-13;
  _InitialConc95 = 9.9752571e-13;
  _InitialConc96 = 2.474295e-15;
  _InitialConc97 = 8.2686306e-13;
  _InitialConc98 = 3.2856116e-16;
  _InitialConc99 = 1.7280837e-13;
  _InitialConc100 = 8.4479024e-17;
  _InitialConc101 = 8.4479024e-17;
  _InitialConc102 = 8.4479024e-17;
  _InitialConc103 = 8.4479024e-17;
  _InitialConc104 = 8.4479024e-17;
  _InitialConc105 = 1.5520976e-17;
  _InitialConc106 = 1.5520976e-17;
  _InitialConc107 = 1.5520976e-17;
  _InitialConc108 = 1.5520976e-17;
  _InitialConc109 = 1.5520976e-17;
  _InitialConc110 = 0;
  _InitialConc111 = 0;
  _InitialConc112 = 0;
  _InitialConc113 = 0;
  _InitialConc114 = 0;
  _InitialConc115 = 0;
  _InitialConc116 = 1e-12;
  _InitialConc117 = 0;
  _InitialConc118 = 1e-16;
  _InitialConc119 = 1e-12;
  _InitialConc120 = 1e-16;
  _rateLaw3 = 0;
  _rateLaw1 = kSyCb1*ikSyCb;
  _rateLaw2 = kSyCb2*ikSyCb;

  // Assignment rules:
  tCCNE := Cyt_CCNE_CDKN1A_B + Nuc_CCNE_CDKN1A_B + S129 + S134 + S139 + S145 + S146 + S149;
  tCCNA := Cyt_CCNA_CDKN1A_B + Nuc_CCNA_CDKN1A_B + S128 + S133 + S138 + S143 + S144 + S148;
  tCCNB := S6 + S31 + S67 + S92 + S130 + S131 + S140 + S141;
  tCDKN1A := Cyt_CDKN1A_CCNE_A_B_Ser130_u + S128 + S129 + S130 + S131 + Cyt_CDKN1A_CCNE_A_B_Ser130_p + Nuc_CDKN1A_CCNE_A_B_Ser130_u + S138 + S139 + S140 + S141 + Nuc_CDKN1A_CCNE_A_B_Ser130_p;
  tCDKN1B := Cyt_CDKN1B_CCNE_A_Thr187_u + S133 + S134 + Cyt_CDKN1B_CCNE_A_Thr187_p + Nuc_CDKN1B_CCNE_A_Thr187_u + S143 + S144 + S145 + S146 + Nuc_CDKN1B_CCNE_A_Thr187_p + S148 + S149;
  tSKP2 := Cyt_SKP2 + Nuc_SKP2;
  ApcCdh := S16 + S22 + S77 + S83;
  aCCNB := S6 + S67;

  // Reactions:
  R1: => Cyt_E2F_DBD_RB1_Ser332_u; kSyE2f1;
  R2: Cyt_FOXM1_DBD_Thr600_p + Cyt_CCNB_promoter_FOXM1 => S26; kAsFPcb*Cyt_FOXM1_DBD_Thr600_p*Cyt_CCNB_promoter_FOXM1;
  R3: Nuc_FOXM1_DBD_Thr600_p + Nuc_CCNB_promoter_FOXM1 => S87; kAsFPcb*Nuc_FOXM1_DBD_Thr600_p*Nuc_CCNB_promoter_FOXM1;
  R4: S26 => Cyt_FOXM1_DBD_Thr600_p + Cyt_CCNB_promoter_FOXM1; kDiFPcb*S26;
  R5: S87 => Nuc_FOXM1_DBD_Thr600_p + Nuc_CCNB_promoter_FOXM1; kDiFPcb*S87;
  R6: S47 => Cyt_E2F_DBD_RB1_Ser332_u + S47; kSyE2f2*S47;
  R7: S52 => Cyt_E2F_DBD_RB1_Ser332_u + S52; kSyE2f2*S52;
  R8: S108 => Cyt_E2F_DBD_RB1_Ser332_u + S108; kSyE2f2*S108;
  R9: S113 => Cyt_E2F_DBD_RB1_Ser332_u + S113; kSyE2f2*S113;
  R10: Cyt_E2F_DBD_RB1_Ser332_u => ; kDeE2f1*Cyt_E2F_DBD_RB1_Ser332_u;
  R11: Cyt_E2F_DBD_RB1_Ser332_p => ; kDeE2f1*Cyt_E2F_DBD_RB1_Ser332_p;
  R12: S7 => Cyt_RB1_E2F_Ser807_Ser811_u; kDeE2f1*S7;
  R13: S8 => Cyt_RB1_E2F_Ser807_Ser811_u; kDeE2f1*S8;
  R14: S45 => Cyt_CCNE_promoter_E2F; kDeE2f1*S45;
  R15: S46 => Cyt_CCNA_promoter_E2F; kDeE2f1*S46;
  R16: S47 => Cyt_E2F_promoter_E2F; kDeE2f1*S47;
  R17: S48 => Cyt_FBXO5_promoter_E2F; kDeE2f1*S48;
  R18: S49 => Cyt_FOXM1_promoter_E2F; kDeE2f1*S49;
  R19: S50 => Cyt_CCNE_promoter_E2F; kDeE2f1*S50;
  R20: S51 => Cyt_CCNA_promoter_E2F; kDeE2f1*S51;
  R21: S52 => Cyt_E2F_promoter_E2F; kDeE2f1*S52;
  R22: S53 => Cyt_FBXO5_promoter_E2F; kDeE2f1*S53;
  R23: S54 => Cyt_FOXM1_promoter_E2F; kDeE2f1*S54;
  R24: Nuc_E2F_DBD_RB1_Ser332_u => ; kDeE2f1*Nuc_E2F_DBD_RB1_Ser332_u;
  R25: Nuc_E2F_DBD_RB1_Ser332_p => ; kDeE2f1*Nuc_E2F_DBD_RB1_Ser332_p;
  R26: S68 => Nuc_RB1_E2F_Ser807_Ser811_u; kDeE2f1*S68;
  R27: S69 => Nuc_RB1_E2F_Ser807_Ser811_u; kDeE2f1*S69;
  R28: S106 => Nuc_CCNE_promoter_E2F; kDeE2f1*S106;
  R29: S107 => Nuc_CCNA_promoter_E2F; kDeE2f1*S107;
  R30: S108 => Nuc_E2F_promoter_E2F; kDeE2f1*S108;
  R31: S109 => Nuc_FBXO5_promoter_E2F; kDeE2f1*S109;
  R32: S110 => Nuc_FOXM1_promoter_E2F; kDeE2f1*S110;
  R33: S111 => Nuc_CCNE_promoter_E2F; kDeE2f1*S111;
  R34: S112 => Nuc_CCNA_promoter_E2F; kDeE2f1*S112;
  R35: S113 => Nuc_E2F_promoter_E2F; kDeE2f1*S113;
  R36: S114 => Nuc_FBXO5_promoter_E2F; kDeE2f1*S114;
  R37: S115 => Nuc_FOXM1_promoter_E2F; kDeE2f1*S115;
  R38: Cyt_CCND + S7 => Cyt_CCND + Cyt_E2F_DBD_RB1_Ser332_u + Cyt_RB1_E2F_Ser807_Ser811_p; kPhRbD*Cyt_CCND*S7;
  R39: Cyt_CCND + S8 => Cyt_CCND + Cyt_E2F_DBD_RB1_Ser332_p + Cyt_RB1_E2F_Ser807_Ser811_p; kPhRbD*Cyt_CCND*S8;
  R40: Nuc_CCND + S68 => Nuc_CCND + Nuc_E2F_DBD_RB1_Ser332_u + Nuc_RB1_E2F_Ser807_Ser811_p; kPhRbD*Nuc_CCND*S68;
  R41: Nuc_CCND + S69 => Nuc_CCND + Nuc_E2F_DBD_RB1_Ser332_p + Nuc_RB1_E2F_Ser807_Ser811_p; kPhRbD*Nuc_CCND*S69;
  R42: Cyt_CCNE_CDKN1A_B + S7 => Cyt_CCNE_CDKN1A_B + Cyt_E2F_DBD_RB1_Ser332_u + Cyt_RB1_E2F_Ser807_Ser811_p; kPhRbE*Cyt_CCNE_CDKN1A_B*S7;
  R43: Cyt_CCNE_CDKN1A_B + S8 => Cyt_CCNE_CDKN1A_B + Cyt_E2F_DBD_RB1_Ser332_p + Cyt_RB1_E2F_Ser807_Ser811_p; kPhRbE*Cyt_CCNE_CDKN1A_B*S8;
  R44: Nuc_CCNE_CDKN1A_B + S68 => Nuc_CCNE_CDKN1A_B + Nuc_E2F_DBD_RB1_Ser332_u + Nuc_RB1_E2F_Ser807_Ser811_p; kPhRbE*Nuc_CCNE_CDKN1A_B*S68;
  R45: Nuc_CCNE_CDKN1A_B + S69 => Nuc_CCNE_CDKN1A_B + Nuc_E2F_DBD_RB1_Ser332_p + Nuc_RB1_E2F_Ser807_Ser811_p; kPhRbE*Nuc_CCNE_CDKN1A_B*S69;
  R46: Cyt_CCNA_CDKN1A_B + S7 => Cyt_E2F_DBD_RB1_Ser332_u + Cyt_CCNA_CDKN1A_B + Cyt_RB1_E2F_Ser807_Ser811_p; kPhRb*Cyt_CCNA_CDKN1A_B*S7;
  R47: Cyt_CCNA_CDKN1A_B + S8 => Cyt_E2F_DBD_RB1_Ser332_p + Cyt_CCNA_CDKN1A_B + Cyt_RB1_E2F_Ser807_Ser811_p; kPhRb*Cyt_CCNA_CDKN1A_B*S8;
  R48: Nuc_CCNA_CDKN1A_B + S68 => Nuc_E2F_DBD_RB1_Ser332_u + Nuc_CCNA_CDKN1A_B + Nuc_RB1_E2F_Ser807_Ser811_p; kPhRb*Nuc_CCNA_CDKN1A_B*S68;
  R49: Nuc_CCNA_CDKN1A_B + S69 => Nuc_E2F_DBD_RB1_Ser332_p + Nuc_CCNA_CDKN1A_B + Nuc_RB1_E2F_Ser807_Ser811_p; kPhRb*Nuc_CCNA_CDKN1A_B*S69;
  R50: S6 + S7 => Cyt_E2F_DBD_RB1_Ser332_u + S6 + Cyt_RB1_E2F_Ser807_Ser811_p; kPhRb*S6*S7;
  R51: S6 + S8 => Cyt_E2F_DBD_RB1_Ser332_p + S6 + Cyt_RB1_E2F_Ser807_Ser811_p; kPhRb*S6*S8;
  R52: S67 + S68 => Nuc_E2F_DBD_RB1_Ser332_u + S67 + Nuc_RB1_E2F_Ser807_Ser811_p; kPhRb*S67*S68;
  R53: S67 + S69 => Nuc_E2F_DBD_RB1_Ser332_p + S67 + Nuc_RB1_E2F_Ser807_Ser811_p; kPhRb*S67*S69;
  R54: Cyt_E2F_DBD_RB1_Ser332_u + Cyt_CCNA_CDKN1A_B => Cyt_E2F_DBD_RB1_Ser332_p + Cyt_CCNA_CDKN1A_B; kPhE2f*Cyt_E2F_DBD_RB1_Ser332_u*Cyt_CCNA_CDKN1A_B;
  R55: Cyt_CCNA_CDKN1A_B + S7 => Cyt_CCNA_CDKN1A_B + S8; kPhE2f*Cyt_CCNA_CDKN1A_B*S7;
  R56: Cyt_CCNA_CDKN1A_B + S45 => Cyt_CCNA_CDKN1A_B + S50; kPhE2f*Cyt_CCNA_CDKN1A_B*S45;
  R57: Cyt_CCNA_CDKN1A_B + S46 => Cyt_CCNA_CDKN1A_B + S51; kPhE2f*Cyt_CCNA_CDKN1A_B*S46;
  R58: Cyt_CCNA_CDKN1A_B + S47 => Cyt_CCNA_CDKN1A_B + S52; kPhE2f*Cyt_CCNA_CDKN1A_B*S47;
  R59: Cyt_CCNA_CDKN1A_B + S48 => Cyt_CCNA_CDKN1A_B + S53; kPhE2f*Cyt_CCNA_CDKN1A_B*S48;
  R60: Cyt_CCNA_CDKN1A_B + S49 => Cyt_CCNA_CDKN1A_B + S54; kPhE2f*Cyt_CCNA_CDKN1A_B*S49;
  R61: Nuc_E2F_DBD_RB1_Ser332_u + Nuc_CCNA_CDKN1A_B => Nuc_E2F_DBD_RB1_Ser332_p + Nuc_CCNA_CDKN1A_B; kPhE2f*Nuc_E2F_DBD_RB1_Ser332_u*Nuc_CCNA_CDKN1A_B;
  R62: Nuc_CCNA_CDKN1A_B + S68 => Nuc_CCNA_CDKN1A_B + S69; kPhE2f*Nuc_CCNA_CDKN1A_B*S68;
  R63: Nuc_CCNA_CDKN1A_B + S106 => Nuc_CCNA_CDKN1A_B + S111; kPhE2f*Nuc_CCNA_CDKN1A_B*S106;
  R64: Nuc_CCNA_CDKN1A_B + S107 => Nuc_CCNA_CDKN1A_B + S112; kPhE2f*Nuc_CCNA_CDKN1A_B*S107;
  R65: Nuc_CCNA_CDKN1A_B + S108 => Nuc_CCNA_CDKN1A_B + S113; kPhE2f*Nuc_CCNA_CDKN1A_B*S108;
  R66: Nuc_CCNA_CDKN1A_B + S109 => Nuc_CCNA_CDKN1A_B + S114; kPhE2f*Nuc_CCNA_CDKN1A_B*S109;
  R67: Nuc_CCNA_CDKN1A_B + S110 => Nuc_CCNA_CDKN1A_B + S115; kPhE2f*Nuc_CCNA_CDKN1A_B*S110;
  R68: Cyt_E2F_DBD_RB1_Ser332_u + S6 => Cyt_E2F_DBD_RB1_Ser332_p + S6; kPhE2f*Cyt_E2F_DBD_RB1_Ser332_u*S6;
  R69: S6 + S7 => S6 + S8; kPhE2f*S6*S7;
  R70: S6 + S45 => S6 + S50; kPhE2f*S6*S45;
  R71: S6 + S46 => S6 + S51; kPhE2f*S6*S46;
  R72: S6 + S47 => S6 + S52; kPhE2f*S6*S47;
  R73: S6 + S48 => S6 + S53; kPhE2f*S6*S48;
  R74: S6 + S49 => S6 + S54; kPhE2f*S6*S49;
  R75: Nuc_E2F_DBD_RB1_Ser332_u + S67 => Nuc_E2F_DBD_RB1_Ser332_p + S67; kPhE2f*Nuc_E2F_DBD_RB1_Ser332_u*S67;
  R76: S67 + S68 => S67 + S69; kPhE2f*S67*S68;
  R77: S67 + S106 => S67 + S111; kPhE2f*S67*S106;
  R78: S67 + S107 => S67 + S112; kPhE2f*S67*S107;
  R79: S67 + S108 => S67 + S113; kPhE2f*S67*S108;
  R80: S67 + S109 => S67 + S114; kPhE2f*S67*S109;
  R81: S67 + S110 => S67 + S115; kPhE2f*S67*S110;
  R82: Cyt_E2F_DBD_RB1_Ser332_p => Cyt_E2F_DBD_RB1_Ser332_u; kDpE2f1*Cyt_E2F_DBD_RB1_Ser332_p;
  R83: S8 => S7; kDpE2f1*S8;
  R84: S50 => S45; kDpE2f1*S50;
  R85: S51 => S46; kDpE2f1*S51;
  R86: S52 => S47; kDpE2f1*S52;
  R87: S53 => S48; kDpE2f1*S53;
  R88: S54 => S49; kDpE2f1*S54;
  R89: Nuc_E2F_DBD_RB1_Ser332_p => Nuc_E2F_DBD_RB1_Ser332_u; kDpE2f1*Nuc_E2F_DBD_RB1_Ser332_p;
  R90: S69 => S68; kDpE2f1*S69;
  R91: S111 => S106; kDpE2f1*S111;
  R92: S112 => S107; kDpE2f1*S112;
  R93: S113 => S108; kDpE2f1*S113;
  R94: S114 => S109; kDpE2f1*S114;
  R95: S115 => S110; kDpE2f1*S115;
  R96: Cyt_E2F_DBD_RB1_Ser332_p + Cyt_PPP2R2B_ENSA_ARPP19 => Cyt_E2F_DBD_RB1_Ser332_u + Cyt_PPP2R2B_ENSA_ARPP19; kDpE2f2*Cyt_E2F_DBD_RB1_Ser332_p*Cyt_PPP2R2B_ENSA_ARPP19;
  R97: S8 + Cyt_PPP2R2B_ENSA_ARPP19 => S7 + Cyt_PPP2R2B_ENSA_ARPP19; kDpE2f2*S8*Cyt_PPP2R2B_ENSA_ARPP19;
  R98: Cyt_PPP2R2B_ENSA_ARPP19 + S50 => Cyt_PPP2R2B_ENSA_ARPP19 + S45; kDpE2f2*Cyt_PPP2R2B_ENSA_ARPP19*S50;
  R99: Cyt_PPP2R2B_ENSA_ARPP19 + S51 => Cyt_PPP2R2B_ENSA_ARPP19 + S46; kDpE2f2*Cyt_PPP2R2B_ENSA_ARPP19*S51;
  R100: Cyt_PPP2R2B_ENSA_ARPP19 + S52 => Cyt_PPP2R2B_ENSA_ARPP19 + S47; kDpE2f2*Cyt_PPP2R2B_ENSA_ARPP19*S52;
  R101: Cyt_PPP2R2B_ENSA_ARPP19 + S53 => Cyt_PPP2R2B_ENSA_ARPP19 + S48; kDpE2f2*Cyt_PPP2R2B_ENSA_ARPP19*S53;
  R102: Cyt_PPP2R2B_ENSA_ARPP19 + S54 => Cyt_PPP2R2B_ENSA_ARPP19 + S49; kDpE2f2*Cyt_PPP2R2B_ENSA_ARPP19*S54;
  R103: Nuc_E2F_DBD_RB1_Ser332_p + Nuc_PPP2R2B_ENSA_ARPP19 => Nuc_E2F_DBD_RB1_Ser332_u + Nuc_PPP2R2B_ENSA_ARPP19; kDpE2f2*Nuc_E2F_DBD_RB1_Ser332_p*Nuc_PPP2R2B_ENSA_ARPP19;
  R104: S69 + Nuc_PPP2R2B_ENSA_ARPP19 => S68 + Nuc_PPP2R2B_ENSA_ARPP19; kDpE2f2*S69*Nuc_PPP2R2B_ENSA_ARPP19;
  R105: Nuc_PPP2R2B_ENSA_ARPP19 + S111 => Nuc_PPP2R2B_ENSA_ARPP19 + S106; kDpE2f2*Nuc_PPP2R2B_ENSA_ARPP19*S111;
  R106: Nuc_PPP2R2B_ENSA_ARPP19 + S112 => Nuc_PPP2R2B_ENSA_ARPP19 + S107; kDpE2f2*Nuc_PPP2R2B_ENSA_ARPP19*S112;
  R107: Nuc_PPP2R2B_ENSA_ARPP19 + S113 => Nuc_PPP2R2B_ENSA_ARPP19 + S108; kDpE2f2*Nuc_PPP2R2B_ENSA_ARPP19*S113;
  R108: Nuc_PPP2R2B_ENSA_ARPP19 + S114 => Nuc_PPP2R2B_ENSA_ARPP19 + S109; kDpE2f2*Nuc_PPP2R2B_ENSA_ARPP19*S114;
  R109: Nuc_PPP2R2B_ENSA_ARPP19 + S115 => Nuc_PPP2R2B_ENSA_ARPP19 + S110; kDpE2f2*Nuc_PPP2R2B_ENSA_ARPP19*S115;
  R110: Cyt_E2F_DBD_RB1_Ser332_p + Cyt_SKP2 => Cyt_SKP2; kDeE2f2*Cyt_E2F_DBD_RB1_Ser332_p*Cyt_SKP2;
  R111: S8 + Cyt_SKP2 => Cyt_RB1_E2F_Ser807_Ser811_u + Cyt_SKP2; kDeE2f2*S8*Cyt_SKP2;
  R112: S50 + Cyt_SKP2 => Cyt_CCNE_promoter_E2F + Cyt_SKP2; kDeE2f2*S50*Cyt_SKP2;
  R113: S51 + Cyt_SKP2 => Cyt_CCNA_promoter_E2F + Cyt_SKP2; kDeE2f2*S51*Cyt_SKP2;
  R114: S52 + Cyt_SKP2 => Cyt_E2F_promoter_E2F + Cyt_SKP2; kDeE2f2*S52*Cyt_SKP2;
  R115: S53 + Cyt_SKP2 => Cyt_FBXO5_promoter_E2F + Cyt_SKP2; kDeE2f2*S53*Cyt_SKP2;
  R116: S54 + Cyt_SKP2 => Cyt_FOXM1_promoter_E2F + Cyt_SKP2; kDeE2f2*S54*Cyt_SKP2;
  R117: Nuc_E2F_DBD_RB1_Ser332_p + Nuc_SKP2 => Nuc_SKP2; kDeE2f2*Nuc_E2F_DBD_RB1_Ser332_p*Nuc_SKP2;
  R118: S69 + Nuc_SKP2 => Nuc_RB1_E2F_Ser807_Ser811_u + Nuc_SKP2; kDeE2f2*S69*Nuc_SKP2;
  R119: S111 + Nuc_SKP2 => Nuc_CCNE_promoter_E2F + Nuc_SKP2; kDeE2f2*S111*Nuc_SKP2;
  R120: S112 + Nuc_SKP2 => Nuc_CCNA_promoter_E2F + Nuc_SKP2; kDeE2f2*S112*Nuc_SKP2;
  R121: S113 + Nuc_SKP2 => Nuc_E2F_promoter_E2F + Nuc_SKP2; kDeE2f2*S113*Nuc_SKP2;
  R122: S114 + Nuc_SKP2 => Nuc_FBXO5_promoter_E2F + Nuc_SKP2; kDeE2f2*S114*Nuc_SKP2;
  R123: S115 + Nuc_SKP2 => Nuc_FOXM1_promoter_E2F + Nuc_SKP2; kDeE2f2*S115*Nuc_SKP2;
  R124: Cyt_CCND + Cyt_RB1_E2F_Ser807_Ser811_u => Cyt_CCND + Cyt_RB1_E2F_Ser807_Ser811_p; kPhRbD*Cyt_CCND*Cyt_RB1_E2F_Ser807_Ser811_u;
  R125: Nuc_CCND + Nuc_RB1_E2F_Ser807_Ser811_u => Nuc_CCND + Nuc_RB1_E2F_Ser807_Ser811_p; kPhRbD*Nuc_CCND*Nuc_RB1_E2F_Ser807_Ser811_u;
  R126: Cyt_CCNE_CDKN1A_B + Cyt_RB1_E2F_Ser807_Ser811_u => Cyt_CCNE_CDKN1A_B + Cyt_RB1_E2F_Ser807_Ser811_p; kPhRbE*Cyt_CCNE_CDKN1A_B*Cyt_RB1_E2F_Ser807_Ser811_u;
  R127: Nuc_CCNE_CDKN1A_B + Nuc_RB1_E2F_Ser807_Ser811_u => Nuc_CCNE_CDKN1A_B + Nuc_RB1_E2F_Ser807_Ser811_p; kPhRbE*Nuc_CCNE_CDKN1A_B*Nuc_RB1_E2F_Ser807_Ser811_u;
  R128: Cyt_CCNA_CDKN1A_B + Cyt_RB1_E2F_Ser807_Ser811_u => Cyt_CCNA_CDKN1A_B + Cyt_RB1_E2F_Ser807_Ser811_p; kPhRb*Cyt_CCNA_CDKN1A_B*Cyt_RB1_E2F_Ser807_Ser811_u;
  R129: Nuc_CCNA_CDKN1A_B + Nuc_RB1_E2F_Ser807_Ser811_u => Nuc_CCNA_CDKN1A_B + Nuc_RB1_E2F_Ser807_Ser811_p; kPhRb*Nuc_CCNA_CDKN1A_B*Nuc_RB1_E2F_Ser807_Ser811_u;
  R130: S6 + Cyt_RB1_E2F_Ser807_Ser811_u => S6 + Cyt_RB1_E2F_Ser807_Ser811_p; kPhRb*S6*Cyt_RB1_E2F_Ser807_Ser811_u;
  R131: S67 + Nuc_RB1_E2F_Ser807_Ser811_u => S67 + Nuc_RB1_E2F_Ser807_Ser811_p; kPhRb*S67*Nuc_RB1_E2F_Ser807_Ser811_u;
  R132: => Cyt_CCNE_CDKN1A_B; kSyCe1;
  R133: S46 => Cyt_CCNA_CDKN1A_B + S46; kSyCa2*S46;
  R134: S51 => Cyt_CCNA_CDKN1A_B + S51; kSyCa2*S51;
  R135: S107 => Cyt_CCNA_CDKN1A_B + S107; kSyCa2*S107;
  R136: S112 => Cyt_CCNA_CDKN1A_B + S112; kSyCa2*S112;
  R137: Cyt_CCNE_CDKN1A_B => ; kDeCe*Cyt_CCNE_CDKN1A_B;
  R138: Nuc_CCNE_CDKN1A_B => ; kDeCe*Nuc_CCNE_CDKN1A_B;
  R139: Cyt_CCNE_CDKN1A_B + Cyt_CCNE_CDKN1A_B => Cyt_CCNE_CDKN1A_B; kPhCeE*Cyt_CCNE_CDKN1A_B*Cyt_CCNE_CDKN1A_B;
  R140: Nuc_CCNE_CDKN1A_B + Nuc_CCNE_CDKN1A_B => Nuc_CCNE_CDKN1A_B; kPhCeE*Nuc_CCNE_CDKN1A_B*Nuc_CCNE_CDKN1A_B;
  R141: Cyt_RB1_E2F_Ser807_Ser811_p => Cyt_RB1_E2F_Ser807_Ser811_u; kDpRb*Cyt_RB1_E2F_Ser807_Ser811_p;
  R142: Nuc_RB1_E2F_Ser807_Ser811_p => Nuc_RB1_E2F_Ser807_Ser811_u; kDpRb*Nuc_RB1_E2F_Ser807_Ser811_p;
  R143: S14 => S12 + Cyt_CDC20_APC; kDpApc_1*S14;
  R144: S75 => S73 + Nuc_CDC20_APC; kDpApc_1*S75;
  R145: Cyt_PPP2R2B_ENSA_ARPP19 + S14 => Cyt_PPP2R2B_ENSA_ARPP19 + S12 + Cyt_CDC20_APC; kDpApc_2*Cyt_PPP2R2B_ENSA_ARPP19*S14;
  R146: Nuc_PPP2R2B_ENSA_ARPP19 + S75 => Nuc_PPP2R2B_ENSA_ARPP19 + S73 + Nuc_CDC20_APC; kDpApc_2*Nuc_PPP2R2B_ENSA_ARPP19*S75;
  R147: Cyt_CCNA_CDKN1A_B + S12 => Cyt_CCNA_CDKN1A_B + S15; kPhApcA*Cyt_CCNA_CDKN1A_B*S12;
  R148: Cyt_CCNA_CDKN1A_B + S16 => Cyt_CCNA_CDKN1A_B + S22; kPhApcA*Cyt_CCNA_CDKN1A_B*S16;
  R149: Cyt_CCNA_CDKN1A_B + S19 => Cyt_CCNA_CDKN1A_B + S21; kPhApcA*Cyt_CCNA_CDKN1A_B*S19;
  R150: Nuc_CCNA_CDKN1A_B + S73 => Nuc_CCNA_CDKN1A_B + S76; kPhApcA*Nuc_CCNA_CDKN1A_B*S73;
  R151: Nuc_CCNA_CDKN1A_B + S77 => Nuc_CCNA_CDKN1A_B + S83; kPhApcA*Nuc_CCNA_CDKN1A_B*S77;
  R152: Nuc_CCNA_CDKN1A_B + S80 => Nuc_CCNA_CDKN1A_B + S82; kPhApcA*Nuc_CCNA_CDKN1A_B*S80;
  R153: S6 + S12 => S6 + S15; kPhApcA*S6*S12;
  R154: S6 + S16 => S6 + S22; kPhApcA*S6*S16;
  R155: S6 + S19 => S6 + S21; kPhApcA*S6*S19;
  R156: S67 + S73 => S67 + S76; kPhApcA*S67*S73;
  R157: S67 + S77 => S67 + S83; kPhApcA*S67*S77;
  R158: S67 + S80 => S67 + S82; kPhApcA*S67*S80;
  R159: S15 => S12; kDpApc_1*S15;
  R160: S21 => S19; kDpApc_1*S21;
  R161: S22 => S16; kDpApc_1*S22;
  R162: S76 => S73; kDpApc_1*S76;
  R163: S82 => S80; kDpApc_1*S82;
  R164: S83 => S77; kDpApc_1*S83;
  R165: Cyt_PPP2R2B_ENSA_ARPP19 + S15 => Cyt_PPP2R2B_ENSA_ARPP19 + S12; kDpApc_2*Cyt_PPP2R2B_ENSA_ARPP19*S15;
  R166: Cyt_PPP2R2B_ENSA_ARPP19 + S21 => Cyt_PPP2R2B_ENSA_ARPP19 + S19; kDpApc_2*Cyt_PPP2R2B_ENSA_ARPP19*S21;
  R167: Cyt_PPP2R2B_ENSA_ARPP19 + S22 => Cyt_PPP2R2B_ENSA_ARPP19 + S16; kDpApc_2*Cyt_PPP2R2B_ENSA_ARPP19*S22;
  R168: Nuc_PPP2R2B_ENSA_ARPP19 + S76 => Nuc_PPP2R2B_ENSA_ARPP19 + S73; kDpApc_2*Nuc_PPP2R2B_ENSA_ARPP19*S76;
  R169: Nuc_PPP2R2B_ENSA_ARPP19 + S82 => Nuc_PPP2R2B_ENSA_ARPP19 + S80; kDpApc_2*Nuc_PPP2R2B_ENSA_ARPP19*S82;
  R170: Nuc_PPP2R2B_ENSA_ARPP19 + S83 => Nuc_PPP2R2B_ENSA_ARPP19 + S77; kDpApc_2*Nuc_PPP2R2B_ENSA_ARPP19*S83;
  R171: Cyt_CCNA_CDKN1A_B + S16 => Cyt_CCNA_CDKN1A_B + S12 + Cyt_FZR1_APC_FBXO5_nTerm_p; kPhCdhA*Cyt_CCNA_CDKN1A_B*S16;
  R172: Cyt_CCNA_CDKN1A_B + S22 => Cyt_CCNA_CDKN1A_B + S15 + Cyt_FZR1_APC_FBXO5_nTerm_p; kPhCdhA*Cyt_CCNA_CDKN1A_B*S22;
  R173: Nuc_CCNA_CDKN1A_B + S77 => Nuc_CCNA_CDKN1A_B + S73 + Nuc_FZR1_APC_FBXO5_nTerm_p; kPhCdhA*Nuc_CCNA_CDKN1A_B*S77;
  R174: Nuc_CCNA_CDKN1A_B + S83 => Nuc_CCNA_CDKN1A_B + S76 + Nuc_FZR1_APC_FBXO5_nTerm_p; kPhCdhA*Nuc_CCNA_CDKN1A_B*S83;
  R175: Cyt_CCNE_CDKN1A_B + S19 => Cyt_CCNE_CDKN1A_B + S12 + Cyt_FZR1_APC_FBXO5_nTerm_p + Cyt_FBXO5_APC_FZR1_Ser182_u; kPhCAEE*Cyt_CCNE_CDKN1A_B*S19;
  R176: Cyt_CCNE_CDKN1A_B + S21 => Cyt_CCNE_CDKN1A_B + S15 + Cyt_FZR1_APC_FBXO5_nTerm_p + Cyt_FBXO5_APC_FZR1_Ser182_u; kPhCAEE*Cyt_CCNE_CDKN1A_B*S21;
  R177: Nuc_CCNE_CDKN1A_B + S80 => Nuc_CCNE_CDKN1A_B + S73 + Nuc_FZR1_APC_FBXO5_nTerm_p + Nuc_FBXO5_APC_FZR1_Ser182_u; kPhCAEE*Nuc_CCNE_CDKN1A_B*S80;
  R178: Nuc_CCNE_CDKN1A_B + S82 => Nuc_CCNE_CDKN1A_B + S76 + Nuc_FZR1_APC_FBXO5_nTerm_p + Nuc_FBXO5_APC_FZR1_Ser182_u; kPhCAEE*Nuc_CCNE_CDKN1A_B*S82;
  R179: Cyt_CCNA_CDKN1A_B + S19 => Cyt_CCNA_CDKN1A_B + S12 + Cyt_FZR1_APC_FBXO5_nTerm_p + Cyt_FBXO5_APC_FZR1_Ser182_u; kPhCAEA*Cyt_CCNA_CDKN1A_B*S19;
  R180: Cyt_CCNA_CDKN1A_B + S21 => Cyt_CCNA_CDKN1A_B + S15 + Cyt_FZR1_APC_FBXO5_nTerm_p + Cyt_FBXO5_APC_FZR1_Ser182_u; kPhCAEA*Cyt_CCNA_CDKN1A_B*S21;
  R181: Nuc_CCNA_CDKN1A_B + S80 => Nuc_CCNA_CDKN1A_B + S73 + Nuc_FZR1_APC_FBXO5_nTerm_p + Nuc_FBXO5_APC_FZR1_Ser182_u; kPhCAEA*Nuc_CCNA_CDKN1A_B*S80;
  R182: Nuc_CCNA_CDKN1A_B + S82 => Nuc_CCNA_CDKN1A_B + S76 + Nuc_FZR1_APC_FBXO5_nTerm_p + Nuc_FBXO5_APC_FZR1_Ser182_u; kPhCAEA*Nuc_CCNA_CDKN1A_B*S82;
  R183: S6 + S19 => S6 + S12 + Cyt_FZR1_APC_FBXO5_nTerm_p + Cyt_FBXO5_APC_FZR1_Ser182_u; kPhCAEB*S6*S19;
  R184: S6 + S21 => S6 + S15 + Cyt_FZR1_APC_FBXO5_nTerm_p + Cyt_FBXO5_APC_FZR1_Ser182_u; kPhCAEB*S6*S21;
  R185: S67 + S80 => S67 + S73 + Nuc_FZR1_APC_FBXO5_nTerm_p + Nuc_FBXO5_APC_FZR1_Ser182_u; kPhCAEB*S67*S80;
  R186: S67 + S82 => S67 + S76 + Nuc_FZR1_APC_FBXO5_nTerm_p + Nuc_FBXO5_APC_FZR1_Ser182_u; kPhCAEB*S67*S82;
  R187: Cyt_CCNE_CDKN1A_B + S16 => Cyt_CCNE_CDKN1A_B + S12 + Cyt_FZR1_APC_FBXO5_nTerm_p; kPhCdhE*Cyt_CCNE_CDKN1A_B*S16;
  R188: Cyt_CCNE_CDKN1A_B + S22 => Cyt_CCNE_CDKN1A_B + S15 + Cyt_FZR1_APC_FBXO5_nTerm_p; kPhCdhE*Cyt_CCNE_CDKN1A_B*S22;
  R189: Nuc_CCNE_CDKN1A_B + S77 => Nuc_CCNE_CDKN1A_B + S73 + Nuc_FZR1_APC_FBXO5_nTerm_p; kPhCdhE*Nuc_CCNE_CDKN1A_B*S77;
  R190: Nuc_CCNE_CDKN1A_B + S83 => Nuc_CCNE_CDKN1A_B + S76 + Nuc_FZR1_APC_FBXO5_nTerm_p; kPhCdhE*Nuc_CCNE_CDKN1A_B*S83;
  R191: S19 => S16; kDeEmi1*S19;
  R192: Cyt_FBXO5_APC_FZR1_Ser182_u => ; kDeEmi1*Cyt_FBXO5_APC_FZR1_Ser182_u;
  R193: S21 => S22; kDeEmi1*S21;
  R194: Cyt_FBXO5_APC_FZR1_Ser182_p => ; kDeEmi1*Cyt_FBXO5_APC_FZR1_Ser182_p;
  R195: S80 => S77; kDeEmi1*S80;
  R196: Nuc_FBXO5_APC_FZR1_Ser182_u => ; kDeEmi1*Nuc_FBXO5_APC_FZR1_Ser182_u;
  R197: S82 => S83; kDeEmi1*S82;
  R198: Nuc_FBXO5_APC_FZR1_Ser182_p => ; kDeEmi1*Nuc_FBXO5_APC_FZR1_Ser182_p;
  R199: S19 => S16; kDeEmi2*S19;
  R200: S21 => S22; kDeEmi2*S21;
  R201: S80 => S77; kDeEmi2*S80;
  R202: S82 => S83; kDeEmi2*S82;
  R203: Cyt_CCNA_CDKN1A_B + S19 => Cyt_CCNA_CDKN1A_B + S16 + Cyt_FBXO5_APC_FZR1_Ser182_p; kPhEmiA*Cyt_CCNA_CDKN1A_B*S19;
  R204: Cyt_CCNA_CDKN1A_B + S21 => Cyt_CCNA_CDKN1A_B + S22 + Cyt_FBXO5_APC_FZR1_Ser182_p; kPhEmiA*Cyt_CCNA_CDKN1A_B*S21;
  R205: Nuc_CCNA_CDKN1A_B + S80 => Nuc_CCNA_CDKN1A_B + S77 + Nuc_FBXO5_APC_FZR1_Ser182_p; kPhEmiA*Nuc_CCNA_CDKN1A_B*S80;
  R206: Nuc_CCNA_CDKN1A_B + S82 => Nuc_CCNA_CDKN1A_B + S83 + Nuc_FBXO5_APC_FZR1_Ser182_p; kPhEmiA*Nuc_CCNA_CDKN1A_B*S82;
  R207: S6 + S19 => S6 + S16 + Cyt_FBXO5_APC_FZR1_Ser182_p; kPhEmiB*S6*S19;
  R208: S6 + S21 => S6 + S22 + Cyt_FBXO5_APC_FZR1_Ser182_p; kPhEmiB*S6*S21;
  R209: S67 + S80 => S67 + S77 + Nuc_FBXO5_APC_FZR1_Ser182_p; kPhEmiB*S67*S80;
  R210: S67 + S82 => S67 + S83 + Nuc_FBXO5_APC_FZR1_Ser182_p; kPhEmiB*S67*S82;
  R211: Cyt_CCNA_CDKN1A_B + Cyt_FBXO5_APC_FZR1_Ser182_u => Cyt_CCNA_CDKN1A_B + Cyt_FBXO5_APC_FZR1_Ser182_p; kPhEmiA*Cyt_CCNA_CDKN1A_B*Cyt_FBXO5_APC_FZR1_Ser182_u;
  R212: Nuc_CCNA_CDKN1A_B + Nuc_FBXO5_APC_FZR1_Ser182_u => Nuc_CCNA_CDKN1A_B + Nuc_FBXO5_APC_FZR1_Ser182_p; kPhEmiA*Nuc_CCNA_CDKN1A_B*Nuc_FBXO5_APC_FZR1_Ser182_u;
  R213: S6 + Cyt_FBXO5_APC_FZR1_Ser182_u => S6 + Cyt_FBXO5_APC_FZR1_Ser182_p; kPhEmiB*S6*Cyt_FBXO5_APC_FZR1_Ser182_u;
  R214: S67 + Nuc_FBXO5_APC_FZR1_Ser182_u => S67 + Nuc_FBXO5_APC_FZR1_Ser182_p; kPhEmiB*S67*Nuc_FBXO5_APC_FZR1_Ser182_u;
  R215: Cyt_FBXO5_APC_FZR1_Ser182_p => Cyt_FBXO5_APC_FZR1_Ser182_u; kDpEmi*Cyt_FBXO5_APC_FZR1_Ser182_p;
  R216: Nuc_FBXO5_APC_FZR1_Ser182_p => Nuc_FBXO5_APC_FZR1_Ser182_u; kDpEmi*Nuc_FBXO5_APC_FZR1_Ser182_p;
  R217: Cyt_FBXO5_APC_FZR1_Ser182_p => ; kDeEmi3*Cyt_FBXO5_APC_FZR1_Ser182_p;
  R218: Nuc_FBXO5_APC_FZR1_Ser182_p => ; kDeEmi3*Nuc_FBXO5_APC_FZR1_Ser182_p;
  R219: => Cyt_FOXM1_DBD_Thr600_u; kSyFox1;
  R220: S48 => Cyt_FBXO5_APC_FZR1_Ser182_u + S48; kSyEmi2*S48;
  R221: S53 => Cyt_FBXO5_APC_FZR1_Ser182_u + S53; kSyEmi2*S53;
  R222: S109 => Cyt_FBXO5_APC_FZR1_Ser182_u + S109; kSyEmi2*S109;
  R223: S114 => Cyt_FBXO5_APC_FZR1_Ser182_u + S114; kSyEmi2*S114;
  R224: Cyt_CCNE_CDKN1A_B + Cyt_FZR1_APC_FBXO5_nTerm_u => Cyt_CCNE_CDKN1A_B + Cyt_FZR1_APC_FBXO5_nTerm_p; kPhCdhE*Cyt_CCNE_CDKN1A_B*Cyt_FZR1_APC_FBXO5_nTerm_u;
  R225: Nuc_CCNE_CDKN1A_B + Nuc_FZR1_APC_FBXO5_nTerm_u => Nuc_CCNE_CDKN1A_B + Nuc_FZR1_APC_FBXO5_nTerm_p; kPhCdhE*Nuc_CCNE_CDKN1A_B*Nuc_FZR1_APC_FBXO5_nTerm_u;
  R226: Cyt_CCNA_CDKN1A_B + Cyt_FZR1_APC_FBXO5_nTerm_u => Cyt_CCNA_CDKN1A_B + Cyt_FZR1_APC_FBXO5_nTerm_p; kPhCdhA*Cyt_CCNA_CDKN1A_B*Cyt_FZR1_APC_FBXO5_nTerm_u;
  R227: Nuc_CCNA_CDKN1A_B + Nuc_FZR1_APC_FBXO5_nTerm_u => Nuc_CCNA_CDKN1A_B + Nuc_FZR1_APC_FBXO5_nTerm_p; kPhCdhA*Nuc_CCNA_CDKN1A_B*Nuc_FZR1_APC_FBXO5_nTerm_u;
  R228: S6 + Cyt_FZR1_APC_FBXO5_nTerm_u => S6 + Cyt_FZR1_APC_FBXO5_nTerm_p; kPhCdhB*S6*Cyt_FZR1_APC_FBXO5_nTerm_u;
  R229: S67 + Nuc_FZR1_APC_FBXO5_nTerm_u => S67 + Nuc_FZR1_APC_FBXO5_nTerm_p; kPhCdhB*S67*Nuc_FZR1_APC_FBXO5_nTerm_u;
  R230: Cyt_FZR1_APC_FBXO5_nTerm_p => Cyt_FZR1_APC_FBXO5_nTerm_u; kDpCdh*Cyt_FZR1_APC_FBXO5_nTerm_p;
  R231: Nuc_FZR1_APC_FBXO5_nTerm_p => Nuc_FZR1_APC_FBXO5_nTerm_u; kDpCdh*Nuc_FZR1_APC_FBXO5_nTerm_p;
  R232: => Cyt_CCNA_CDKN1A_B; kSyCa1;
  R233: Cyt_CCNA_CDKN1A_B => ; kDeCa1*Cyt_CCNA_CDKN1A_B;
  R234: Nuc_CCNA_CDKN1A_B => ; kDeCa1*Nuc_CCNA_CDKN1A_B;
  R235: Cyt_CCNE_CDKN1A_B + Cyt_CCNA_CDKN1A_B => Cyt_CCNA_CDKN1A_B; kPhCeA*Cyt_CCNE_CDKN1A_B*Cyt_CCNA_CDKN1A_B;
  R236: Nuc_CCNE_CDKN1A_B + Nuc_CCNA_CDKN1A_B => Nuc_CCNA_CDKN1A_B; kPhCeA*Nuc_CCNE_CDKN1A_B*Nuc_CCNA_CDKN1A_B;
  R237: Cyt_CCNA_CDKN1A_B + S16 => S16; kDeCa2*Cyt_CCNA_CDKN1A_B*S16;
  R238: Cyt_CCNA_CDKN1A_B + S22 => S22; kDeCa2*Cyt_CCNA_CDKN1A_B*S22;
  R239: Nuc_CCNA_CDKN1A_B + S77 => S77; kDeCa2*Nuc_CCNA_CDKN1A_B*S77;
  R240: Nuc_CCNA_CDKN1A_B + S83 => S83; kDeCa2*Nuc_CCNA_CDKN1A_B*S83;
  R241: Cyt_CCNA_CDKN1A_B + S14 => S14; kDeCa3*Cyt_CCNA_CDKN1A_B*S14;
  R242: Nuc_CCNA_CDKN1A_B + S75 => S75; kDeCa3*Nuc_CCNA_CDKN1A_B*S75;
  R243: S49 => Cyt_FOXM1_DBD_Thr600_u + S49; kSyFox2*S49;
  R244: S54 => Cyt_FOXM1_DBD_Thr600_u + S54; kSyFox2*S54;
  R245: S110 => Cyt_FOXM1_DBD_Thr600_u + S110; kSyFox2*S110;
  R246: S115 => Cyt_FOXM1_DBD_Thr600_u + S115; kSyFox2*S115;
  R247: Cyt_FOXM1_DBD_Thr600_u => ; kDeFox1*Cyt_FOXM1_DBD_Thr600_u;
  R248: Cyt_FOXM1_DBD_Thr600_p => ; kDeFox1*Cyt_FOXM1_DBD_Thr600_p;
  R249: S26 => Cyt_CCNB_promoter_FOXM1; kDeFox1*S26;
  R250: S29 => Cyt_CDC20_promoter_FOXM1; kDeFox1*S29;
  R251: Nuc_FOXM1_DBD_Thr600_u => ; kDeFox1*Nuc_FOXM1_DBD_Thr600_u;
  R252: Nuc_FOXM1_DBD_Thr600_p => ; kDeFox1*Nuc_FOXM1_DBD_Thr600_p;
  R253: S87 => Nuc_CCNB_promoter_FOXM1; kDeFox1*S87;
  R254: S90 => Nuc_CDC20_promoter_FOXM1; kDeFox1*S90;
  R255: S16 + Cyt_FOXM1_DBD_Thr600_u => S16; kDeFox2*S16*Cyt_FOXM1_DBD_Thr600_u;
  R256: S22 + Cyt_FOXM1_DBD_Thr600_u => S22; kDeFox2*S22*Cyt_FOXM1_DBD_Thr600_u;
  R257: S16 + Cyt_FOXM1_DBD_Thr600_p => S16; kDeFox2*S16*Cyt_FOXM1_DBD_Thr600_p;
  R258: S22 + Cyt_FOXM1_DBD_Thr600_p => S22; kDeFox2*S22*Cyt_FOXM1_DBD_Thr600_p;
  R259: S16 + S26 => S16 + Cyt_CCNB_promoter_FOXM1; kDeFox2*S16*S26;
  R260: S22 + S26 => S22 + Cyt_CCNB_promoter_FOXM1; kDeFox2*S22*S26;
  R261: S16 + S29 => S16 + Cyt_CDC20_promoter_FOXM1; kDeFox2*S16*S29;
  R262: S22 + S29 => S22 + Cyt_CDC20_promoter_FOXM1; kDeFox2*S22*S29;
  R263: S77 + Nuc_FOXM1_DBD_Thr600_u => S77; kDeFox2*S77*Nuc_FOXM1_DBD_Thr600_u;
  R264: S83 + Nuc_FOXM1_DBD_Thr600_u => S83; kDeFox2*S83*Nuc_FOXM1_DBD_Thr600_u;
  R265: S77 + Nuc_FOXM1_DBD_Thr600_p => S77; kDeFox2*S77*Nuc_FOXM1_DBD_Thr600_p;
  R266: S83 + Nuc_FOXM1_DBD_Thr600_p => S83; kDeFox2*S83*Nuc_FOXM1_DBD_Thr600_p;
  R267: S77 + S87 => S77 + Nuc_CCNB_promoter_FOXM1; kDeFox2*S77*S87;
  R268: S83 + S87 => S83 + Nuc_CCNB_promoter_FOXM1; kDeFox2*S83*S87;
  R269: S77 + S90 => S77 + Nuc_CDC20_promoter_FOXM1; kDeFox2*S77*S90;
  R270: S83 + S90 => S83 + Nuc_CDC20_promoter_FOXM1; kDeFox2*S83*S90;
  R271: Cyt_CCNE_CDKN1A_B + Cyt_FOXM1_DBD_Thr600_u => Cyt_CCNE_CDKN1A_B + Cyt_FOXM1_DBD_Thr600_p; kPhFoxE*Cyt_CCNE_CDKN1A_B*Cyt_FOXM1_DBD_Thr600_u;
  R272: Nuc_CCNE_CDKN1A_B + Nuc_FOXM1_DBD_Thr600_u => Nuc_CCNE_CDKN1A_B + Nuc_FOXM1_DBD_Thr600_p; kPhFoxE*Nuc_CCNE_CDKN1A_B*Nuc_FOXM1_DBD_Thr600_u;
  R273: Cyt_CCNA_CDKN1A_B + Cyt_FOXM1_DBD_Thr600_u => Cyt_CCNA_CDKN1A_B + Cyt_FOXM1_DBD_Thr600_p; kPhFoxA*Cyt_CCNA_CDKN1A_B*Cyt_FOXM1_DBD_Thr600_u;
  R274: Nuc_CCNA_CDKN1A_B + Nuc_FOXM1_DBD_Thr600_u => Nuc_CCNA_CDKN1A_B + Nuc_FOXM1_DBD_Thr600_p; kPhFoxA*Nuc_CCNA_CDKN1A_B*Nuc_FOXM1_DBD_Thr600_u;
  R275: S6 + Cyt_FOXM1_DBD_Thr600_u => S6 + Cyt_FOXM1_DBD_Thr600_p; kPhFoxB*S6*Cyt_FOXM1_DBD_Thr600_u;
  R276: S67 + Nuc_FOXM1_DBD_Thr600_u => S67 + Nuc_FOXM1_DBD_Thr600_p; kPhFoxB*S67*Nuc_FOXM1_DBD_Thr600_u;
  R277: Cyt_FOXM1_DBD_Thr600_p => Cyt_FOXM1_DBD_Thr600_u; kDpFox*Cyt_FOXM1_DBD_Thr600_p;
  R278: Nuc_FOXM1_DBD_Thr600_p => Nuc_FOXM1_DBD_Thr600_u; kDpFox*Nuc_FOXM1_DBD_Thr600_p;
  R279: S29 => Cyt_FOXM1_DBD_Thr600_u + Cyt_CDC20_promoter_FOXM1; kDpFox*S29;
  R280: S90 => Nuc_FOXM1_DBD_Thr600_u + Nuc_CDC20_promoter_FOXM1; kDpFox*S90;
  R281: S26 => Cyt_FOXM1_DBD_Thr600_u + Cyt_CCNB_promoter_FOXM1; kDpFox*S26;
  R282: S87 => Nuc_FOXM1_DBD_Thr600_u + Nuc_CCNB_promoter_FOXM1; kDpFox*S87;
  R283: => S6; _rateLaw1;
  R284: S26 => S6 + S26; _rateLaw2*S26;
  R285: S87 => S6 + S87; _rateLaw2*S87;
  R286: S6 => ; kDeCb1*S6;
  R287: S31 => ; kDeCb1*S31;
  R288: S67 => ; kDeCb1*S67;
  R289: S92 => ; kDeCb1*S92;
  R290: S6 + S16 => S16; kDeCb2*S6*S16;
  R291: S6 + S22 => S22; kDeCb2*S6*S22;
  R292: S16 + S31 => S16; kDeCb2*S16*S31;
  R293: S22 + S31 => S22; kDeCb2*S22*S31;
  R294: S67 + S77 => S77; kDeCb2*S67*S77;
  R295: S67 + S83 => S83; kDeCb2*S67*S83;
  R296: S77 + S92 => S77; kDeCb2*S77*S92;
  R297: S83 + S92 => S83; kDeCb2*S83*S92;
  R298: S6 + S14 => S14; kDeCb3*S6*S14;
  R299: S14 + S31 => S14; kDeCb3*S14*S31;
  R300: S67 + S75 => S75; kDeCb3*S67*S75;
  R301: S75 + S92 => S75; kDeCb3*S75*S92;
  R302: Cyt_CDC20_APC => ; kDeCdc_1*Cyt_CDC20_APC;
  R303: S14 => S15; kDeCdc_1*S14;
  R304: Nuc_CDC20_APC => ; kDeCdc_1*Nuc_CDC20_APC;
  R305: S75 => S76; kDeCdc_1*S75;
  R306: Cyt_CDC20_APC + S16 => S16; kDeCdc_2*Cyt_CDC20_APC*S16;
  R307: Cyt_CDC20_APC + S22 => S22; kDeCdc_2*Cyt_CDC20_APC*S22;
  R308: S14 + S16 => S15 + S16; kDeCdc_2*S14*S16;
  R309: S14 + S22 => S15 + S22; kDeCdc_2*S14*S22;
  R310: Nuc_CDC20_APC + S77 => S77; kDeCdc_2*Nuc_CDC20_APC*S77;
  R311: Nuc_CDC20_APC + S83 => S83; kDeCdc_2*Nuc_CDC20_APC*S83;
  R312: S75 + S77 => S76 + S77; kDeCdc_2*S75*S77;
  R313: S75 + S83 => S76 + S83; kDeCdc_2*S75*S83;
  R314: => Cyt_CDC20_APC; kSyCdc_1;
  R315: S29 => Cyt_CDC20_APC + S29; kSyCdc_2*S29;
  R316: S90 => Cyt_CDC20_APC + S90; kSyCdc_2*S90;
  R317: Cyt_FOXM1_DBD_Thr600_p + Cyt_CDC20_promoter_FOXM1 => S29; kAsFPcdc*Cyt_FOXM1_DBD_Thr600_p*Cyt_CDC20_promoter_FOXM1;
  R318: Nuc_FOXM1_DBD_Thr600_p + Nuc_CDC20_promoter_FOXM1 => S90; kAsFPcdc*Nuc_FOXM1_DBD_Thr600_p*Nuc_CDC20_promoter_FOXM1;
  R319: S29 => Cyt_FOXM1_DBD_Thr600_p + Cyt_CDC20_promoter_FOXM1; kDiFPcdc*S29;
  R320: S90 => Nuc_FOXM1_DBD_Thr600_p + Nuc_CDC20_promoter_FOXM1; kDiFPcdc*S90;
  R321: S6 + Cyt_WEE1_Ser123_u => Cyt_WEE1_Ser123_u + S31; kWee2*S6*Cyt_WEE1_Ser123_u;
  R322: S67 + Nuc_WEE1_Ser123_u => Nuc_WEE1_Ser123_u + S92; kWee2*S67*Nuc_WEE1_Ser123_u;
  R323: S6 + Cyt_WEE1_Ser123_p => S31 + Cyt_WEE1_Ser123_p; kWee1*S6*Cyt_WEE1_Ser123_p;
  R324: S67 + Nuc_WEE1_Ser123_p => S92 + Nuc_WEE1_Ser123_p; kWee1*S67*Nuc_WEE1_Ser123_p;
  R325: S31 + Cyt_CDC25_pSites_p => S6 + Cyt_CDC25_pSites_p; kCdc25_2*S31*Cyt_CDC25_pSites_p;
  R326: S92 + Nuc_CDC25_pSites_p => S67 + Nuc_CDC25_pSites_p; kCdc25_2*S92*Nuc_CDC25_pSites_p;
  R327: S31 + Cyt_CDC25_pSites_u => S6 + Cyt_CDC25_pSites_u; kCdc25_1*S31*Cyt_CDC25_pSites_u;
  R328: S92 + Nuc_CDC25_pSites_u => S67 + Nuc_CDC25_pSites_u; kCdc25_1*S92*Nuc_CDC25_pSites_u;
  R329: S6 + Cyt_CDC25_pSites_u => S6 + Cyt_CDC25_pSites_p; kPhC25B*S6*Cyt_CDC25_pSites_u;
  R330: S67 + Nuc_CDC25_pSites_u => S67 + Nuc_CDC25_pSites_p; kPhC25B*S67*Nuc_CDC25_pSites_u;
  R331: Cyt_CCNA_CDKN1A_B + Cyt_CDC25_pSites_u => Cyt_CCNA_CDKN1A_B + Cyt_CDC25_pSites_p; kPhC25A*Cyt_CCNA_CDKN1A_B*Cyt_CDC25_pSites_u;
  R332: Nuc_CCNA_CDKN1A_B + Nuc_CDC25_pSites_u => Nuc_CCNA_CDKN1A_B + Nuc_CDC25_pSites_p; kPhC25A*Nuc_CCNA_CDKN1A_B*Nuc_CDC25_pSites_u;
  R333: Cyt_PPP2R2B_ENSA_ARPP19 + Cyt_CDC25_pSites_p => Cyt_PPP2R2B_ENSA_ARPP19 + Cyt_CDC25_pSites_u; kDpCdc25*Cyt_PPP2R2B_ENSA_ARPP19*Cyt_CDC25_pSites_p;
  R334: Nuc_PPP2R2B_ENSA_ARPP19 + Nuc_CDC25_pSites_p => Nuc_PPP2R2B_ENSA_ARPP19 + Nuc_CDC25_pSites_u; kDpCdc25*Nuc_PPP2R2B_ENSA_ARPP19*Nuc_CDC25_pSites_p;
  R335: Cyt_PPP2R2B_ENSA_ARPP19 + Cyt_WEE1_Ser123_p => Cyt_PPP2R2B_ENSA_ARPP19 + Cyt_WEE1_Ser123_u; kDpWee*Cyt_PPP2R2B_ENSA_ARPP19*Cyt_WEE1_Ser123_p;
  R336: Nuc_PPP2R2B_ENSA_ARPP19 + Nuc_WEE1_Ser123_p => Nuc_PPP2R2B_ENSA_ARPP19 + Nuc_WEE1_Ser123_u; kDpWee*Nuc_PPP2R2B_ENSA_ARPP19*Nuc_WEE1_Ser123_p;
  R337: Cyt_CCNA_CDKN1A_B + Cyt_WEE1_Ser123_u => Cyt_CCNA_CDKN1A_B + Cyt_WEE1_Ser123_p; kPhWeeA*Cyt_CCNA_CDKN1A_B*Cyt_WEE1_Ser123_u;
  R338: Nuc_CCNA_CDKN1A_B + Nuc_WEE1_Ser123_u => Nuc_CCNA_CDKN1A_B + Nuc_WEE1_Ser123_p; kPhWeeA*Nuc_CCNA_CDKN1A_B*Nuc_WEE1_Ser123_u;
  R339: S6 + Cyt_WEE1_Ser123_u => S6 + Cyt_WEE1_Ser123_p; kPhWeeB*S6*Cyt_WEE1_Ser123_u;
  R340: S67 + Nuc_WEE1_Ser123_u => S67 + Nuc_WEE1_Ser123_p; kPhWeeB*S67*Nuc_WEE1_Ser123_u;
  R341: S6 + Cyt_MASTL_Thr198_u => S6 + Cyt_MASTL_Thr198_p; kPhGw*S6*Cyt_MASTL_Thr198_u;
  R342: S67 + Nuc_MASTL_Thr198_u => S67 + Nuc_MASTL_Thr198_p; kPhGw*S67*Nuc_MASTL_Thr198_u;
  R343: Cyt_MASTL_Thr198_p => Cyt_MASTL_Thr198_u; kDpGw1*Cyt_MASTL_Thr198_p;
  R344: Nuc_MASTL_Thr198_p => Nuc_MASTL_Thr198_u; kDpGw1*Nuc_MASTL_Thr198_p;
  R345: Cyt_PPP2R2B_ENSA_ARPP19 + Cyt_MASTL_Thr198_p => Cyt_PPP2R2B_ENSA_ARPP19 + Cyt_MASTL_Thr198_u; kDpGw2*Cyt_PPP2R2B_ENSA_ARPP19*Cyt_MASTL_Thr198_p;
  R346: Nuc_PPP2R2B_ENSA_ARPP19 + Nuc_MASTL_Thr198_p => Nuc_PPP2R2B_ENSA_ARPP19 + Nuc_MASTL_Thr198_u; kDpGw2*Nuc_PPP2R2B_ENSA_ARPP19*Nuc_MASTL_Thr198_p;
  R347: Cyt_MASTL_Thr198_p + S37 => Cyt_MASTL_Thr198_p + S38; kPhEnsa*Cyt_MASTL_Thr198_p*S37;
  R348: Nuc_MASTL_Thr198_p + S98 => Nuc_MASTL_Thr198_p + S99; kPhEnsa*Nuc_MASTL_Thr198_p*S98;
  R349: S39 => Cyt_PPP2R2B_ENSA_ARPP19 + S37; kDpEnsa*S39;
  R350: S100 => Nuc_PPP2R2B_ENSA_ARPP19 + S98; kDpEnsa*S100;
  R351: => Cyt_FBXO5_APC_FZR1_Ser182_u; kSyEmi1;
  R352: S45 => Cyt_CCNE_CDKN1A_B + S45; kSyCe2*S45;
  R353: S50 => Cyt_CCNE_CDKN1A_B + S50; kSyCe2*S50;
  R354: S106 => Cyt_CCNE_CDKN1A_B + S106; kSyCe2*S106;
  R355: S111 => Cyt_CCNE_CDKN1A_B + S111; kSyCe2*S111;
  R356: S6 + S16 => S6 + S12 + Cyt_FZR1_APC_FBXO5_nTerm_p; kPhCdhB*S6*S16;
  R357: S6 + S22 => S6 + S15 + Cyt_FZR1_APC_FBXO5_nTerm_p; kPhCdhB*S6*S22;
  R358: S67 + S77 => S67 + S73 + Nuc_FZR1_APC_FBXO5_nTerm_p; kPhCdhB*S67*S77;
  R359: S67 + S83 => S67 + S76 + Nuc_FZR1_APC_FBXO5_nTerm_p; kPhCdhB*S67*S83;
  R360: Cyt_E2F_DBD_RB1_Ser332_u + Cyt_RB1_E2F_Ser807_Ser811_u => S7; kAsE2fRb*Cyt_E2F_DBD_RB1_Ser332_u*Cyt_RB1_E2F_Ser807_Ser811_u;
  R361: Cyt_E2F_DBD_RB1_Ser332_p + Cyt_RB1_E2F_Ser807_Ser811_u => S8; kAsE2fRb*Cyt_E2F_DBD_RB1_Ser332_p*Cyt_RB1_E2F_Ser807_Ser811_u;
  R362: Nuc_E2F_DBD_RB1_Ser332_u + Nuc_RB1_E2F_Ser807_Ser811_u => S68; kAsE2fRb*Nuc_E2F_DBD_RB1_Ser332_u*Nuc_RB1_E2F_Ser807_Ser811_u;
  R363: Nuc_E2F_DBD_RB1_Ser332_p + Nuc_RB1_E2F_Ser807_Ser811_u => S69; kAsE2fRb*Nuc_E2F_DBD_RB1_Ser332_p*Nuc_RB1_E2F_Ser807_Ser811_u;
  R364: S7 => Cyt_E2F_DBD_RB1_Ser332_u + Cyt_RB1_E2F_Ser807_Ser811_u; kDiE2fRb*S7;
  R365: S8 => Cyt_E2F_DBD_RB1_Ser332_p + Cyt_RB1_E2F_Ser807_Ser811_u; kDiE2fRb*S8;
  R366: S68 => Nuc_E2F_DBD_RB1_Ser332_u + Nuc_RB1_E2F_Ser807_Ser811_u; kDiE2fRb*S68;
  R367: S69 => Nuc_E2F_DBD_RB1_Ser332_p + Nuc_RB1_E2F_Ser807_Ser811_u; kDiE2fRb*S69;
  R368: S12 + Cyt_FZR1_APC_FBXO5_nTerm_u => S16; kAsACdh*S12*Cyt_FZR1_APC_FBXO5_nTerm_u;
  R369: S15 + Cyt_FZR1_APC_FBXO5_nTerm_u => S22; kAsACdh*S15*Cyt_FZR1_APC_FBXO5_nTerm_u;
  R370: S73 + Nuc_FZR1_APC_FBXO5_nTerm_u => S77; kAsACdh*S73*Nuc_FZR1_APC_FBXO5_nTerm_u;
  R371: S76 + Nuc_FZR1_APC_FBXO5_nTerm_u => S83; kAsACdh*S76*Nuc_FZR1_APC_FBXO5_nTerm_u;
  R372: S16 => S12 + Cyt_FZR1_APC_FBXO5_nTerm_u; kDiACdh*S16;
  R373: S22 => S15 + Cyt_FZR1_APC_FBXO5_nTerm_u; kDiACdh*S22;
  R374: S77 => S73 + Nuc_FZR1_APC_FBXO5_nTerm_u; kDiACdh*S77;
  R375: S83 => S76 + Nuc_FZR1_APC_FBXO5_nTerm_u; kDiACdh*S83;
  R376: S16 + Cyt_FBXO5_APC_FZR1_Ser182_u => S19; kAsACE*S16*Cyt_FBXO5_APC_FZR1_Ser182_u;
  R377: Cyt_FBXO5_APC_FZR1_Ser182_u + S22 => S21; kAsACE*Cyt_FBXO5_APC_FZR1_Ser182_u*S22;
  R378: S77 + Nuc_FBXO5_APC_FZR1_Ser182_u => S80; kAsACE*S77*Nuc_FBXO5_APC_FZR1_Ser182_u;
  R379: Nuc_FBXO5_APC_FZR1_Ser182_u + S83 => S82; kAsACE*Nuc_FBXO5_APC_FZR1_Ser182_u*S83;
  R380: S19 => S16 + Cyt_FBXO5_APC_FZR1_Ser182_u; kDiACE*S19;
  R381: S21 => Cyt_FBXO5_APC_FZR1_Ser182_u + S22; kDiACE*S21;
  R382: S80 => S77 + Nuc_FBXO5_APC_FZR1_Ser182_u; kDiACE*S80;
  R383: S82 => Nuc_FBXO5_APC_FZR1_Ser182_u + S83; kDiACE*S82;
  R384: Cyt_CDC20_APC + S15 => S14; kAspACdc*Cyt_CDC20_APC*S15;
  R385: Nuc_CDC20_APC + S76 => S75; kAspACdc*Nuc_CDC20_APC*S76;
  R386: S14 => Cyt_CDC20_APC + S15; kDipACdc*S14;
  R387: S75 => Nuc_CDC20_APC + S76; kDipACdc*S75;
  R388: Cyt_PPP2R2B_ENSA_ARPP19 + S38 => S39; kAspEB55*Cyt_PPP2R2B_ENSA_ARPP19*S38;
  R389: Nuc_PPP2R2B_ENSA_ARPP19 + S99 => S100; kAspEB55*Nuc_PPP2R2B_ENSA_ARPP19*S99;
  R390: S39 => Cyt_PPP2R2B_ENSA_ARPP19 + S38; kDipEB55*S39;
  R391: S100 => Nuc_PPP2R2B_ENSA_ARPP19 + S99; kDipEB55*S100;
  R392: Cyt_E2F_DBD_RB1_Ser332_u + Cyt_CCNE_promoter_E2F => S45; kAsEPx*Cyt_E2F_DBD_RB1_Ser332_u*Cyt_CCNE_promoter_E2F;
  R393: Cyt_E2F_DBD_RB1_Ser332_p + Cyt_CCNE_promoter_E2F => S50; kAsEPx*Cyt_E2F_DBD_RB1_Ser332_p*Cyt_CCNE_promoter_E2F;
  R394: Nuc_E2F_DBD_RB1_Ser332_u + Nuc_CCNE_promoter_E2F => S106; kAsEPx*Nuc_E2F_DBD_RB1_Ser332_u*Nuc_CCNE_promoter_E2F;
  R395: Nuc_E2F_DBD_RB1_Ser332_p + Nuc_CCNE_promoter_E2F => S111; kAsEPx*Nuc_E2F_DBD_RB1_Ser332_p*Nuc_CCNE_promoter_E2F;
  R396: S45 => Cyt_E2F_DBD_RB1_Ser332_u + Cyt_CCNE_promoter_E2F; kDiEPx*S45;
  R397: S50 => Cyt_E2F_DBD_RB1_Ser332_p + Cyt_CCNE_promoter_E2F; kDiEPx*S50;
  R398: S106 => Nuc_E2F_DBD_RB1_Ser332_u + Nuc_CCNE_promoter_E2F; kDiEPx*S106;
  R399: S111 => Nuc_E2F_DBD_RB1_Ser332_p + Nuc_CCNE_promoter_E2F; kDiEPx*S111;
  R400: Cyt_E2F_DBD_RB1_Ser332_u + Cyt_CCNA_promoter_E2F => S46; kAsEPx*Cyt_E2F_DBD_RB1_Ser332_u*Cyt_CCNA_promoter_E2F;
  R401: Cyt_E2F_DBD_RB1_Ser332_p + Cyt_CCNA_promoter_E2F => S51; kAsEPx*Cyt_E2F_DBD_RB1_Ser332_p*Cyt_CCNA_promoter_E2F;
  R402: Nuc_E2F_DBD_RB1_Ser332_u + Nuc_CCNA_promoter_E2F => S107; kAsEPx*Nuc_E2F_DBD_RB1_Ser332_u*Nuc_CCNA_promoter_E2F;
  R403: Nuc_E2F_DBD_RB1_Ser332_p + Nuc_CCNA_promoter_E2F => S112; kAsEPx*Nuc_E2F_DBD_RB1_Ser332_p*Nuc_CCNA_promoter_E2F;
  R404: S46 => Cyt_E2F_DBD_RB1_Ser332_u + Cyt_CCNA_promoter_E2F; kDiEPx*S46;
  R405: S51 => Cyt_E2F_DBD_RB1_Ser332_p + Cyt_CCNA_promoter_E2F; kDiEPx*S51;
  R406: S107 => Nuc_E2F_DBD_RB1_Ser332_u + Nuc_CCNA_promoter_E2F; kDiEPx*S107;
  R407: S112 => Nuc_E2F_DBD_RB1_Ser332_p + Nuc_CCNA_promoter_E2F; kDiEPx*S112;
  R408: Cyt_E2F_DBD_RB1_Ser332_u + Cyt_E2F_promoter_E2F => S47; kAsEPx*Cyt_E2F_DBD_RB1_Ser332_u*Cyt_E2F_promoter_E2F;
  R409: Cyt_E2F_DBD_RB1_Ser332_p + Cyt_E2F_promoter_E2F => S52; kAsEPx*Cyt_E2F_DBD_RB1_Ser332_p*Cyt_E2F_promoter_E2F;
  R410: Nuc_E2F_DBD_RB1_Ser332_u + Nuc_E2F_promoter_E2F => S108; kAsEPx*Nuc_E2F_DBD_RB1_Ser332_u*Nuc_E2F_promoter_E2F;
  R411: Nuc_E2F_DBD_RB1_Ser332_p + Nuc_E2F_promoter_E2F => S113; kAsEPx*Nuc_E2F_DBD_RB1_Ser332_p*Nuc_E2F_promoter_E2F;
  R412: S47 => Cyt_E2F_DBD_RB1_Ser332_u + Cyt_E2F_promoter_E2F; kDiEPx*S47;
  R413: S52 => Cyt_E2F_DBD_RB1_Ser332_p + Cyt_E2F_promoter_E2F; kDiEPx*S52;
  R414: S108 => Nuc_E2F_DBD_RB1_Ser332_u + Nuc_E2F_promoter_E2F; kDiEPx*S108;
  R415: S113 => Nuc_E2F_DBD_RB1_Ser332_p + Nuc_E2F_promoter_E2F; kDiEPx*S113;
  R416: Cyt_E2F_DBD_RB1_Ser332_u + Cyt_FBXO5_promoter_E2F => S48; kAsEPx*Cyt_E2F_DBD_RB1_Ser332_u*Cyt_FBXO5_promoter_E2F;
  R417: Cyt_E2F_DBD_RB1_Ser332_p + Cyt_FBXO5_promoter_E2F => S53; kAsEPx*Cyt_E2F_DBD_RB1_Ser332_p*Cyt_FBXO5_promoter_E2F;
  R418: Nuc_E2F_DBD_RB1_Ser332_u + Nuc_FBXO5_promoter_E2F => S109; kAsEPx*Nuc_E2F_DBD_RB1_Ser332_u*Nuc_FBXO5_promoter_E2F;
  R419: Nuc_E2F_DBD_RB1_Ser332_p + Nuc_FBXO5_promoter_E2F => S114; kAsEPx*Nuc_E2F_DBD_RB1_Ser332_p*Nuc_FBXO5_promoter_E2F;
  R420: S48 => Cyt_E2F_DBD_RB1_Ser332_u + Cyt_FBXO5_promoter_E2F; kDiEPx*S48;
  R421: S53 => Cyt_E2F_DBD_RB1_Ser332_p + Cyt_FBXO5_promoter_E2F; kDiEPx*S53;
  R422: S109 => Nuc_E2F_DBD_RB1_Ser332_u + Nuc_FBXO5_promoter_E2F; kDiEPx*S109;
  R423: S114 => Nuc_E2F_DBD_RB1_Ser332_p + Nuc_FBXO5_promoter_E2F; kDiEPx*S114;
  R424: Cyt_E2F_DBD_RB1_Ser332_u + Cyt_FOXM1_promoter_E2F => S49; kAsEPx*Cyt_E2F_DBD_RB1_Ser332_u*Cyt_FOXM1_promoter_E2F;
  R425: Cyt_E2F_DBD_RB1_Ser332_p + Cyt_FOXM1_promoter_E2F => S54; kAsEPx*Cyt_E2F_DBD_RB1_Ser332_p*Cyt_FOXM1_promoter_E2F;
  R426: Nuc_E2F_DBD_RB1_Ser332_u + Nuc_FOXM1_promoter_E2F => S110; kAsEPx*Nuc_E2F_DBD_RB1_Ser332_u*Nuc_FOXM1_promoter_E2F;
  R427: Nuc_E2F_DBD_RB1_Ser332_p + Nuc_FOXM1_promoter_E2F => S115; kAsEPx*Nuc_E2F_DBD_RB1_Ser332_p*Nuc_FOXM1_promoter_E2F;
  R428: S49 => Cyt_E2F_DBD_RB1_Ser332_u + Cyt_FOXM1_promoter_E2F; kDiEPx*S49;
  R429: S54 => Cyt_E2F_DBD_RB1_Ser332_p + Cyt_FOXM1_promoter_E2F; kDiEPx*S54;
  R430: S110 => Nuc_E2F_DBD_RB1_Ser332_u + Nuc_FOXM1_promoter_E2F; kDiEPx*S110;
  R431: S115 => Nuc_E2F_DBD_RB1_Ser332_p + Nuc_FOXM1_promoter_E2F; kDiEPx*S115;
  R432: => Cyt_SKP2; kSySkp2;
  R433: Cyt_SKP2 => ; kDeSkp2_1*Cyt_SKP2;
  R434: Nuc_SKP2 => ; kDeSkp2_1*Nuc_SKP2;
  R435: S16 + Cyt_SKP2 => S16; kDeSkp2_2*S16*Cyt_SKP2;
  R436: S22 + Cyt_SKP2 => S22; kDeSkp2_2*S22*Cyt_SKP2;
  R437: S77 + Nuc_SKP2 => S77; kDeSkp2_2*S77*Nuc_SKP2;
  R438: S83 + Nuc_SKP2 => S83; kDeSkp2_2*S83*Nuc_SKP2;
  R439: Cyt_TP53_DBD_Ser15_p + Cyt_CDKN1A_promoter_TP53 => S122; kAsTP53PCDKN1A*Cyt_TP53_DBD_Ser15_p*Cyt_CDKN1A_promoter_TP53;
  R440: Nuc_TP53_DBD_Ser15_p + Nuc_CDKN1A_promoter_TP53 => S123; kAsTP53PCDKN1A*Nuc_TP53_DBD_Ser15_p*Nuc_CDKN1A_promoter_TP53;
  R441: => Cyt_CDKN1A_CCNE_A_B_Ser130_u; kSyCDKN1A_1;
  R442: Cyt_FOXO_DBD + Cyt_CDKN1B_promoter_FOXO => S125; kAsFOXOPCDKN1B*Cyt_FOXO_DBD*Cyt_CDKN1B_promoter_FOXO;
  R443: Nuc_FOXO_DBD + Nuc_CDKN1B_promoter_FOXO => S126; kAsFOXOPCDKN1B*Nuc_FOXO_DBD*Nuc_CDKN1B_promoter_FOXO;
  R444: => Cyt_CDKN1B_CCNE_A_Thr187_u; kSyCDKN1B_1;
  R445: Cyt_CCND + Num_NUP_pSites_u => Num_NUP_pSites_u + Nuc_CCND; kImImCCND_1*Cyt_CCND*Num_NUP_pSites_u;
  R446: Num_NUP_pSites_u + Nuc_CCND => Cyt_CCND + Num_NUP_pSites_u; kExImCCND_1*Num_NUP_pSites_u*Nuc_CCND;
  R447: Cyt_CCNE_CDKN1A_B + Num_NUP_pSites_u => Num_NUP_pSites_u + Nuc_CCNE_CDKN1A_B; kImImCCNE_CDKN1A_B__1*Cyt_CCNE_CDKN1A_B*Num_NUP_pSites_u;
  R448: Num_NUP_pSites_u + Nuc_CCNE_CDKN1A_B => Cyt_CCNE_CDKN1A_B + Num_NUP_pSites_u; kExImCCNE_CDKN1A_B__1*Num_NUP_pSites_u*Nuc_CCNE_CDKN1A_B;
  R449: Cyt_E2F_DBD_RB1_Ser332_u + Num_NUP_pSites_u => Num_NUP_pSites_u + Nuc_E2F_DBD_RB1_Ser332_u; kImImE2F_DBD_RB1_Ser332u__1*Cyt_E2F_DBD_RB1_Ser332_u*Num_NUP_pSites_u;
  R450: Num_NUP_pSites_u + Nuc_E2F_DBD_RB1_Ser332_u => Cyt_E2F_DBD_RB1_Ser332_u + Num_NUP_pSites_u; kExImE2F_DBD_RB1_Ser332u__1*Num_NUP_pSites_u*Nuc_E2F_DBD_RB1_Ser332_u;
  R451: Cyt_E2F_DBD_RB1_Ser332_p + Num_NUP_pSites_u => Num_NUP_pSites_u + Nuc_E2F_DBD_RB1_Ser332_p; kImImE2F_DBD_RB1_Ser332p__1*Cyt_E2F_DBD_RB1_Ser332_p*Num_NUP_pSites_u;
  R452: Num_NUP_pSites_u + Nuc_E2F_DBD_RB1_Ser332_p => Cyt_E2F_DBD_RB1_Ser332_p + Num_NUP_pSites_u; kExImE2F_DBD_RB1_Ser332p__1*Num_NUP_pSites_u*Nuc_E2F_DBD_RB1_Ser332_p;
  R453: Cyt_CCNA_CDKN1A_B + Num_NUP_pSites_u => Num_NUP_pSites_u + Nuc_CCNA_CDKN1A_B; kImImCCNA_CDKN1A_B__1*Cyt_CCNA_CDKN1A_B*Num_NUP_pSites_u;
  R454: Num_NUP_pSites_u + Nuc_CCNA_CDKN1A_B => Cyt_CCNA_CDKN1A_B + Num_NUP_pSites_u; kExImCCNA_CDKN1A_B__1*Num_NUP_pSites_u*Nuc_CCNA_CDKN1A_B;
  R455: S6 + Num_NUP_pSites_u => Num_NUP_pSites_u + S67; kImImCCNB_CDK1_Thr14_Tyr15u_CDKN1A__1*S6*Num_NUP_pSites_u;
  R456: Num_NUP_pSites_u + S67 => S6 + Num_NUP_pSites_u; kExImCCNB_CDK1_Thr14_Tyr15u_CDKN1A__1*Num_NUP_pSites_u*S67;
  R457: S7 + Num_NUP_pSites_u => Num_NUP_pSites_u + S68; kImImE2F_DBD_RB11_Ser332u__RB1_E2F1_Ser807_Ser811u__1*S7*Num_NUP_pSites_u;
  R458: Num_NUP_pSites_u + S68 => S7 + Num_NUP_pSites_u; kExImE2F_DBD_RB11_Ser332u__RB1_E2F1_Ser807_Ser811u__1*Num_NUP_pSites_u*S68;
  R459: S8 + Num_NUP_pSites_u => Num_NUP_pSites_u + S69; kImImE2F_DBD_RB11_Ser332p__RB1_E2F1_Ser807_Ser811u__1*S8*Num_NUP_pSites_u;
  R460: Num_NUP_pSites_u + S69 => S8 + Num_NUP_pSites_u; kExImE2F_DBD_RB11_Ser332p__RB1_E2F1_Ser807_Ser811u__1*Num_NUP_pSites_u*S69;
  R461: Cyt_RB1_E2F_Ser807_Ser811_u + Num_NUP_pSites_u => Num_NUP_pSites_u + Nuc_RB1_E2F_Ser807_Ser811_u; kImImRB1_E2F_Ser807_Ser811u__1*Cyt_RB1_E2F_Ser807_Ser811_u*Num_NUP_pSites_u;
  R462: Num_NUP_pSites_u + Nuc_RB1_E2F_Ser807_Ser811_u => Cyt_RB1_E2F_Ser807_Ser811_u + Num_NUP_pSites_u; kExImRB1_E2F_Ser807_Ser811u__1*Num_NUP_pSites_u*Nuc_RB1_E2F_Ser807_Ser811_u;
  R463: Cyt_RB1_E2F_Ser807_Ser811_p + Num_NUP_pSites_u => Num_NUP_pSites_u + Nuc_RB1_E2F_Ser807_Ser811_p; kImImRB1_E2F_Ser807_Ser811p__1*Cyt_RB1_E2F_Ser807_Ser811_p*Num_NUP_pSites_u;
  R464: Num_NUP_pSites_u + Nuc_RB1_E2F_Ser807_Ser811_p => Cyt_RB1_E2F_Ser807_Ser811_p + Num_NUP_pSites_u; kExImRB1_E2F_Ser807_Ser811p__1*Num_NUP_pSites_u*Nuc_RB1_E2F_Ser807_Ser811_p;
  R465: Cyt_PPP2R2B_ENSA_ARPP19 + Num_NUP_pSites_u => Num_NUP_pSites_u + Nuc_PPP2R2B_ENSA_ARPP19; kImImPPP2R2B_ENSA_ARPP19__1*Cyt_PPP2R2B_ENSA_ARPP19*Num_NUP_pSites_u;
  R466: Num_NUP_pSites_u + Nuc_PPP2R2B_ENSA_ARPP19 => Cyt_PPP2R2B_ENSA_ARPP19 + Num_NUP_pSites_u; kExImPPP2R2B_ENSA_ARPP19__1*Num_NUP_pSites_u*Nuc_PPP2R2B_ENSA_ARPP19;
  R467: S12 + Num_NUP_pSites_u => Num_NUP_pSites_u + S73; kImImAPC_FBXO5_FZR1_CDC20_Ser355u__1*S12*Num_NUP_pSites_u;
  R468: Num_NUP_pSites_u + S73 => S12 + Num_NUP_pSites_u; kExImAPC_FBXO5_FZR1_CDC20_Ser355u__1*Num_NUP_pSites_u*S73;
  R469: Cyt_CDC20_APC + Num_NUP_pSites_u => Num_NUP_pSites_u + Nuc_CDC20_APC; kImImCDC20_APC__1*Cyt_CDC20_APC*Num_NUP_pSites_u;
  R470: Num_NUP_pSites_u + Nuc_CDC20_APC => Cyt_CDC20_APC + Num_NUP_pSites_u; kExImCDC20_APC__1*Num_NUP_pSites_u*Nuc_CDC20_APC;
  R471: S14 + Num_NUP_pSites_u => Num_NUP_pSites_u + S75; kImImAPC_FBXO5_FZR1_CDC201_Ser355p__CDC20_APC1__1*S14*Num_NUP_pSites_u;
  R472: Num_NUP_pSites_u + S75 => S14 + Num_NUP_pSites_u; kExImAPC_FBXO5_FZR1_CDC201_Ser355p__CDC20_APC1__1*Num_NUP_pSites_u*S75;
  R473: S15 + Num_NUP_pSites_u => Num_NUP_pSites_u + S76; kImImAPC_FBXO5_FZR1_CDC20_Ser355p__1*S15*Num_NUP_pSites_u;
  R474: Num_NUP_pSites_u + S76 => S15 + Num_NUP_pSites_u; kExImAPC_FBXO5_FZR1_CDC20_Ser355p__1*Num_NUP_pSites_u*S76;
  R475: S16 + Num_NUP_pSites_u => Num_NUP_pSites_u + S77; kImImAPC_FBXO5_FZR1_CDC201_Ser355u__FZR1_APC1_FBXO5_nTermu__1*S16*Num_NUP_pSites_u;
  R476: Num_NUP_pSites_u + S77 => S16 + Num_NUP_pSites_u; kExImAPC_FBXO5_FZR1_CDC201_Ser355u__FZR1_APC1_FBXO5_nTermu__1*Num_NUP_pSites_u*S77;
  R477: Cyt_FZR1_APC_FBXO5_nTerm_u + Num_NUP_pSites_u => Num_NUP_pSites_u + Nuc_FZR1_APC_FBXO5_nTerm_u; kImImFZR1_APC_FBXO5_nTermu__1*Cyt_FZR1_APC_FBXO5_nTerm_u*Num_NUP_pSites_u;
  R478: Num_NUP_pSites_u + Nuc_FZR1_APC_FBXO5_nTerm_u => Cyt_FZR1_APC_FBXO5_nTerm_u + Num_NUP_pSites_u; kExImFZR1_APC_FBXO5_nTermu__1*Num_NUP_pSites_u*Nuc_FZR1_APC_FBXO5_nTerm_u;
  R479: Cyt_FZR1_APC_FBXO5_nTerm_p + Num_NUP_pSites_u => Num_NUP_pSites_u + Nuc_FZR1_APC_FBXO5_nTerm_p; kImImFZR1_APC_FBXO5_nTermp__1*Cyt_FZR1_APC_FBXO5_nTerm_p*Num_NUP_pSites_u;
  R480: Num_NUP_pSites_u + Nuc_FZR1_APC_FBXO5_nTerm_p => Cyt_FZR1_APC_FBXO5_nTerm_p + Num_NUP_pSites_u; kExImFZR1_APC_FBXO5_nTermp__1*Num_NUP_pSites_u*Nuc_FZR1_APC_FBXO5_nTerm_p;
  R481: S19 + Num_NUP_pSites_u => Num_NUP_pSites_u + S80; kImImAPC_FBXO51_FZR1_CDC202_Ser355u__FBXO5_APC1_FZR13_Ser182u__FZR1_APC2_FBXO53_nTermu__1*S19*Num_NUP_pSites_u;
  R482: Num_NUP_pSites_u + S80 => S19 + Num_NUP_pSites_u; kExImAPC_FBXO51_FZR1_CDC202_Ser355u__FBXO5_APC1_FZR13_Ser182u__FZR1_APC2_FBXO53_nTermu__1*Num_NUP_pSites_u*S80;
  R483: Cyt_FBXO5_APC_FZR1_Ser182_u + Num_NUP_pSites_u => Num_NUP_pSites_u + Nuc_FBXO5_APC_FZR1_Ser182_u; kImImFBXO5_APC_FZR1_Ser182u__1*Cyt_FBXO5_APC_FZR1_Ser182_u*Num_NUP_pSites_u;
  R484: Num_NUP_pSites_u + Nuc_FBXO5_APC_FZR1_Ser182_u => Cyt_FBXO5_APC_FZR1_Ser182_u + Num_NUP_pSites_u; kExImFBXO5_APC_FZR1_Ser182u__1*Num_NUP_pSites_u*Nuc_FBXO5_APC_FZR1_Ser182_u;
  R485: S21 + Num_NUP_pSites_u => Num_NUP_pSites_u + S82; kImImAPC_FBXO51_FZR1_CDC202_Ser355p__FBXO5_APC1_FZR13_Ser182u__FZR1_APC2_FBXO53_nTermu__1*S21*Num_NUP_pSites_u;
  R486: Num_NUP_pSites_u + S82 => S21 + Num_NUP_pSites_u; kExImAPC_FBXO51_FZR1_CDC202_Ser355p__FBXO5_APC1_FZR13_Ser182u__FZR1_APC2_FBXO53_nTermu__1*Num_NUP_pSites_u*S82;
  R487: S22 + Num_NUP_pSites_u => Num_NUP_pSites_u + S83; kImImAPC_FBXO5_FZR1_CDC201_Ser355p__FZR1_APC1_FBXO5_nTermu__1*S22*Num_NUP_pSites_u;
  R488: Num_NUP_pSites_u + S83 => S22 + Num_NUP_pSites_u; kExImAPC_FBXO5_FZR1_CDC201_Ser355p__FZR1_APC1_FBXO5_nTermu__1*Num_NUP_pSites_u*S83;
  R489: Cyt_FBXO5_APC_FZR1_Ser182_p + Num_NUP_pSites_u => Num_NUP_pSites_u + Nuc_FBXO5_APC_FZR1_Ser182_p; kImImFBXO5_APC_FZR1_Ser182p__1*Cyt_FBXO5_APC_FZR1_Ser182_p*Num_NUP_pSites_u;
  R490: Num_NUP_pSites_u + Nuc_FBXO5_APC_FZR1_Ser182_p => Cyt_FBXO5_APC_FZR1_Ser182_p + Num_NUP_pSites_u; kExImFBXO5_APC_FZR1_Ser182p__1*Num_NUP_pSites_u*Nuc_FBXO5_APC_FZR1_Ser182_p;
  R491: Cyt_FOXM1_DBD_Thr600_u + Num_NUP_pSites_u => Num_NUP_pSites_u + Nuc_FOXM1_DBD_Thr600_u; kImImFOXM1_DBD_Thr600u__1*Cyt_FOXM1_DBD_Thr600_u*Num_NUP_pSites_u;
  R492: Num_NUP_pSites_u + Nuc_FOXM1_DBD_Thr600_u => Cyt_FOXM1_DBD_Thr600_u + Num_NUP_pSites_u; kExImFOXM1_DBD_Thr600u__1*Num_NUP_pSites_u*Nuc_FOXM1_DBD_Thr600_u;
  R493: Cyt_FOXM1_DBD_Thr600_p + Num_NUP_pSites_u => Num_NUP_pSites_u + Nuc_FOXM1_DBD_Thr600_p; kImImFOXM1_DBD_Thr600p__1*Cyt_FOXM1_DBD_Thr600_p*Num_NUP_pSites_u;
  R494: Num_NUP_pSites_u + Nuc_FOXM1_DBD_Thr600_p => Cyt_FOXM1_DBD_Thr600_p + Num_NUP_pSites_u; kExImFOXM1_DBD_Thr600p__1*Num_NUP_pSites_u*Nuc_FOXM1_DBD_Thr600_p;
  R495: Cyt_WEE1_Ser123_u + Num_NUP_pSites_u => Num_NUP_pSites_u + Nuc_WEE1_Ser123_u; kImImWEE1_Ser123u__1*Cyt_WEE1_Ser123_u*Num_NUP_pSites_u;
  R496: Num_NUP_pSites_u + Nuc_WEE1_Ser123_u => Cyt_WEE1_Ser123_u + Num_NUP_pSites_u; kExImWEE1_Ser123u__1*Num_NUP_pSites_u*Nuc_WEE1_Ser123_u;
  R497: S31 + Num_NUP_pSites_u => Num_NUP_pSites_u + S92; kImImCCNB_CDK1_Thr14_Tyr15p_CDKN1A__1*S31*Num_NUP_pSites_u;
  R498: Num_NUP_pSites_u + S92 => S31 + Num_NUP_pSites_u; kExImCCNB_CDK1_Thr14_Tyr15p_CDKN1A__1*Num_NUP_pSites_u*S92;
  R499: Cyt_WEE1_Ser123_p + Num_NUP_pSites_u => Num_NUP_pSites_u + Nuc_WEE1_Ser123_p; kImImWEE1_Ser123p__1*Cyt_WEE1_Ser123_p*Num_NUP_pSites_u;
  R500: Num_NUP_pSites_u + Nuc_WEE1_Ser123_p => Cyt_WEE1_Ser123_p + Num_NUP_pSites_u; kExImWEE1_Ser123p__1*Num_NUP_pSites_u*Nuc_WEE1_Ser123_p;
  R501: Cyt_CDC25_pSites_p + Num_NUP_pSites_u => Num_NUP_pSites_u + Nuc_CDC25_pSites_p; kImImCDC25_pSitesp__1*Cyt_CDC25_pSites_p*Num_NUP_pSites_u;
  R502: Num_NUP_pSites_u + Nuc_CDC25_pSites_p => Cyt_CDC25_pSites_p + Num_NUP_pSites_u; kExImCDC25_pSitesp__1*Num_NUP_pSites_u*Nuc_CDC25_pSites_p;
  R503: Cyt_CDC25_pSites_u + Num_NUP_pSites_u => Num_NUP_pSites_u + Nuc_CDC25_pSites_u; kImImCDC25_pSitesu__1*Cyt_CDC25_pSites_u*Num_NUP_pSites_u;
  R504: Num_NUP_pSites_u + Nuc_CDC25_pSites_u => Cyt_CDC25_pSites_u + Num_NUP_pSites_u; kExImCDC25_pSitesu__1*Num_NUP_pSites_u*Nuc_CDC25_pSites_u;
  R505: Cyt_MASTL_Thr198_u + Num_NUP_pSites_u => Num_NUP_pSites_u + Nuc_MASTL_Thr198_u; kImImMASTL_Thr198u__1*Cyt_MASTL_Thr198_u*Num_NUP_pSites_u;
  R506: Num_NUP_pSites_u + Nuc_MASTL_Thr198_u => Cyt_MASTL_Thr198_u + Num_NUP_pSites_u; kExImMASTL_Thr198u__1*Num_NUP_pSites_u*Nuc_MASTL_Thr198_u;
  R507: Cyt_MASTL_Thr198_p + Num_NUP_pSites_u => Num_NUP_pSites_u + Nuc_MASTL_Thr198_p; kImImMASTL_Thr198p__1*Cyt_MASTL_Thr198_p*Num_NUP_pSites_u;
  R508: Num_NUP_pSites_u + Nuc_MASTL_Thr198_p => Cyt_MASTL_Thr198_p + Num_NUP_pSites_u; kExImMASTL_Thr198p__1*Num_NUP_pSites_u*Nuc_MASTL_Thr198_p;
  R509: S37 + Num_NUP_pSites_u => Num_NUP_pSites_u + S98; kImImENSA_ARPP19_PPP2R2B_Ser62_Ser67u__1*S37*Num_NUP_pSites_u;
  R510: Num_NUP_pSites_u + S98 => S37 + Num_NUP_pSites_u; kExImENSA_ARPP19_PPP2R2B_Ser62_Ser67u__1*Num_NUP_pSites_u*S98;
  R511: S38 + Num_NUP_pSites_u => Num_NUP_pSites_u + S99; kImImENSA_ARPP19_PPP2R2B_Ser62_Ser67p__1*S38*Num_NUP_pSites_u;
  R512: Num_NUP_pSites_u + S99 => S38 + Num_NUP_pSites_u; kExImENSA_ARPP19_PPP2R2B_Ser62_Ser67p__1*Num_NUP_pSites_u*S99;
  R513: S39 + Num_NUP_pSites_u => Num_NUP_pSites_u + S100; kImImENSA_ARPP19_PPP2R2B1_Ser62_Ser67p__PPP2R2B_ENSA_ARPP191__1*S39*Num_NUP_pSites_u;
  R514: Num_NUP_pSites_u + S100 => S39 + Num_NUP_pSites_u; kExImENSA_ARPP19_PPP2R2B1_Ser62_Ser67p__PPP2R2B_ENSA_ARPP191__1*Num_NUP_pSites_u*S100;
  R515: Cyt_iWEE + Num_NUP_pSites_u => Num_NUP_pSites_u + Nuc_iWEE; kImImiWEE_1*Cyt_iWEE*Num_NUP_pSites_u;
  R516: Num_NUP_pSites_u + Nuc_iWEE => Cyt_iWEE + Num_NUP_pSites_u; kExImiWEE_1*Num_NUP_pSites_u*Nuc_iWEE;
  R517: Cyt_SKP2 + Num_NUP_pSites_u => Num_NUP_pSites_u + Nuc_SKP2; kImImSKP2_1*Cyt_SKP2*Num_NUP_pSites_u;
  R518: Num_NUP_pSites_u + Nuc_SKP2 => Cyt_SKP2 + Num_NUP_pSites_u; kExImSKP2_1*Num_NUP_pSites_u*Nuc_SKP2;
  R519: Cyt_TP53_DBD_Ser15_p + Num_NUP_pSites_u => Num_NUP_pSites_u + Nuc_TP53_DBD_Ser15_p; kImImTP53_DBD_Ser15p__1*Cyt_TP53_DBD_Ser15_p*Num_NUP_pSites_u;
  R520: Num_NUP_pSites_u + Nuc_TP53_DBD_Ser15_p => Cyt_TP53_DBD_Ser15_p + Num_NUP_pSites_u; kExImTP53_DBD_Ser15p__1*Num_NUP_pSites_u*Nuc_TP53_DBD_Ser15_p;
  R521: Cyt_FOXO_DBD + Num_NUP_pSites_u => Num_NUP_pSites_u + Nuc_FOXO_DBD; kImImFOXO_DBD__1*Cyt_FOXO_DBD*Num_NUP_pSites_u;
  R522: Num_NUP_pSites_u + Nuc_FOXO_DBD => Cyt_FOXO_DBD + Num_NUP_pSites_u; kExImFOXO_DBD__1*Num_NUP_pSites_u*Nuc_FOXO_DBD;
  R523: S122 => Cyt_TP53_DBD_Ser15_p + Cyt_CDKN1A_promoter_TP53; kDiTP53PCDKN1A*S122;
  R524: S123 => Nuc_TP53_DBD_Ser15_p + Nuc_CDKN1A_promoter_TP53; kDiTP53PCDKN1A*S123;
  R525: S122 => S122 + Cyt_CDKN1A_CCNE_A_B_Ser130_u; kSyCDKN1A_2*S122;
  R526: S123 => S123 + Cyt_CDKN1A_CCNE_A_B_Ser130_u; kSyCDKN1A_2*S123;
  R527: Cyt_CDKN1A_CCNE_A_B_Ser130_u => ; kDeCDKN1A_1*Cyt_CDKN1A_CCNE_A_B_Ser130_u;
  R528: Cyt_SKP2 + Cyt_CDKN1A_CCNE_A_B_Ser130_u => Cyt_SKP2; kDeCDKN1A_2*Cyt_SKP2*Cyt_CDKN1A_CCNE_A_B_Ser130_u;
  R529: Cyt_CCNA_CDKN1A_B + Cyt_CDKN1A_CCNE_A_B_Ser130_u => S128; kAsCdkn1aC*Cyt_CCNA_CDKN1A_B*Cyt_CDKN1A_CCNE_A_B_Ser130_u;
  R530: Cyt_CCNE_CDKN1A_B + Cyt_CDKN1A_CCNE_A_B_Ser130_u => S129; kAsCdkn1aC*Cyt_CCNE_CDKN1A_B*Cyt_CDKN1A_CCNE_A_B_Ser130_u;
  R531: S6 + Cyt_CDKN1A_CCNE_A_B_Ser130_u => S130; kAsCdkn1aC*S6*Cyt_CDKN1A_CCNE_A_B_Ser130_u;
  R532: S31 + Cyt_CDKN1A_CCNE_A_B_Ser130_u => S131; kAsCdkn1aC*S31*Cyt_CDKN1A_CCNE_A_B_Ser130_u;
  R533: Cyt_CCNE_CDKN1A_B + Cyt_CDKN1A_CCNE_A_B_Ser130_u => Cyt_CCNE_CDKN1A_B + Cyt_CDKN1A_CCNE_A_B_Ser130_p; kPhCDKN1AByCe*Cyt_CCNE_CDKN1A_B*Cyt_CDKN1A_CCNE_A_B_Ser130_u;
  R534: Cyt_CCNA_CDKN1A_B + Cyt_CDKN1A_CCNE_A_B_Ser130_u => Cyt_CCNA_CDKN1A_B + Cyt_CDKN1A_CCNE_A_B_Ser130_p; kPhCDKN1AByCa*Cyt_CCNA_CDKN1A_B*Cyt_CDKN1A_CCNE_A_B_Ser130_u;
  R535: S6 + Cyt_CDKN1A_CCNE_A_B_Ser130_u => S6 + Cyt_CDKN1A_CCNE_A_B_Ser130_p; kPhCDKN1AByCb*S6*Cyt_CDKN1A_CCNE_A_B_Ser130_u;
  R536: S125 => Cyt_FOXO_DBD + Cyt_CDKN1B_promoter_FOXO; kDiFOXOPCDKN1B*S125;
  R537: S126 => Nuc_FOXO_DBD + Nuc_CDKN1B_promoter_FOXO; kDiFOXOPCDKN1B*S126;
  R538: S125 => S125 + Cyt_CDKN1B_CCNE_A_Thr187_u; kSyCDKN1B_2*S125;
  R539: S126 => S126 + Cyt_CDKN1B_CCNE_A_Thr187_u; kSyCDKN1B_2*S126;
  R540: Cyt_CDKN1B_CCNE_A_Thr187_u => ; kDeCDKN1B_1*Cyt_CDKN1B_CCNE_A_Thr187_u;
  R541: Cyt_SKP2 + Cyt_CDKN1B_CCNE_A_Thr187_u => Cyt_SKP2; _rateLaw3*Cyt_SKP2*Cyt_CDKN1B_CCNE_A_Thr187_u;
  R542: Cyt_CCNA_CDKN1A_B + Cyt_CDKN1B_CCNE_A_Thr187_u => S133; kAsCdkn1bC*Cyt_CCNA_CDKN1A_B*Cyt_CDKN1B_CCNE_A_Thr187_u;
  R543: Cyt_CCNE_CDKN1A_B + Cyt_CDKN1B_CCNE_A_Thr187_u => S134; kAsCdkn1bC*Cyt_CCNE_CDKN1A_B*Cyt_CDKN1B_CCNE_A_Thr187_u;
  R544: Cyt_CCNE_CDKN1A_B + Cyt_CDKN1B_CCNE_A_Thr187_u => Cyt_CCNE_CDKN1A_B + Cyt_CDKN1B_CCNE_A_Thr187_p; kPhCDKN1BByCe*Cyt_CCNE_CDKN1A_B*Cyt_CDKN1B_CCNE_A_Thr187_u;
  R545: Cyt_CCNA_CDKN1A_B + Cyt_CDKN1B_CCNE_A_Thr187_u => Cyt_CCNA_CDKN1A_B + Cyt_CDKN1B_CCNE_A_Thr187_p; kPhCDKN1BByCa*Cyt_CCNA_CDKN1A_B*Cyt_CDKN1B_CCNE_A_Thr187_u;
  R546: S6 + Cyt_CDKN1B_CCNE_A_Thr187_u => S6 + Cyt_CDKN1B_CCNE_A_Thr187_p; kPhCDKN1BByCb*S6*Cyt_CDKN1B_CCNE_A_Thr187_u;
  R547: Num_NUP_pSites_u + Cyt_CDKN1A_CCNE_A_B_Ser130_u => Num_NUP_pSites_u + Nuc_CDKN1A_CCNE_A_B_Ser130_u; kImImCDKN1A_CCNE_A_B_Ser130u__1*Num_NUP_pSites_u*Cyt_CDKN1A_CCNE_A_B_Ser130_u;
  R548: Num_NUP_pSites_u + Cyt_CDKN1B_CCNE_A_Thr187_u => Num_NUP_pSites_u + Nuc_CDKN1B_CCNE_A_Thr187_u; kImImCDKN1B_CCNE_A_Thr187u__1*Num_NUP_pSites_u*Cyt_CDKN1B_CCNE_A_Thr187_u;
  R549: S129 => Cyt_CDKN1A_CCNE_A_B_Ser130_u; kDeCe*S129;
  R550: S134 => Cyt_CDKN1B_CCNE_A_Thr187_u; kDeCe*S134;
  R551: Cyt_CCNE_CDKN1A_B + S129 => Cyt_CCNE_CDKN1A_B + Cyt_CDKN1A_CCNE_A_B_Ser130_u; kPhCeE*Cyt_CCNE_CDKN1A_B*S129;
  R552: Cyt_CCNE_CDKN1A_B + S134 => Cyt_CCNE_CDKN1A_B + Cyt_CDKN1B_CCNE_A_Thr187_u; kPhCeE*Cyt_CCNE_CDKN1A_B*S134;
  R553: S128 => Cyt_CDKN1A_CCNE_A_B_Ser130_u; kDeCa1*S128;
  R554: S133 => Cyt_CDKN1B_CCNE_A_Thr187_u; kDeCa1*S133;
  R555: Cyt_CCNA_CDKN1A_B + S129 => Cyt_CCNA_CDKN1A_B + Cyt_CDKN1A_CCNE_A_B_Ser130_u; kPhCeA*Cyt_CCNA_CDKN1A_B*S129;
  R556: Cyt_CCNA_CDKN1A_B + S134 => Cyt_CCNA_CDKN1A_B + Cyt_CDKN1B_CCNE_A_Thr187_u; kPhCeA*Cyt_CCNA_CDKN1A_B*S134;
  R557: S16 + S128 => S16 + Cyt_CDKN1A_CCNE_A_B_Ser130_u; kDeCa2*S16*S128;
  R558: S22 + S128 => S22 + Cyt_CDKN1A_CCNE_A_B_Ser130_u; kDeCa2*S22*S128;
  R559: S16 + S133 => S16 + Cyt_CDKN1B_CCNE_A_Thr187_u; kDeCa2*S16*S133;
  R560: S22 + S133 => S22 + Cyt_CDKN1B_CCNE_A_Thr187_u; kDeCa2*S22*S133;
  R561: S14 + S128 => S14 + Cyt_CDKN1A_CCNE_A_B_Ser130_u; kDeCa3*S14*S128;
  R562: S14 + S133 => S14 + Cyt_CDKN1B_CCNE_A_Thr187_u; kDeCa3*S14*S133;
  R563: S130 => Cyt_CDKN1A_CCNE_A_B_Ser130_u; kDeCb1*S130;
  R564: S131 => Cyt_CDKN1A_CCNE_A_B_Ser130_u; kDeCb1*S131;
  R565: S16 + S130 => S16 + Cyt_CDKN1A_CCNE_A_B_Ser130_u; kDeCb2*S16*S130;
  R566: S22 + S130 => S22 + Cyt_CDKN1A_CCNE_A_B_Ser130_u; kDeCb2*S22*S130;
  R567: S16 + S131 => S16 + Cyt_CDKN1A_CCNE_A_B_Ser130_u; kDeCb2*S16*S131;
  R568: S22 + S131 => S22 + Cyt_CDKN1A_CCNE_A_B_Ser130_u; kDeCb2*S22*S131;
  R569: S14 + S130 => S14 + Cyt_CDKN1A_CCNE_A_B_Ser130_u; kDeCb3*S14*S130;
  R570: S14 + S131 => S14 + Cyt_CDKN1A_CCNE_A_B_Ser130_u; kDeCb3*S14*S131;
  R571: Cyt_WEE1_Ser123_u + S130 => Cyt_WEE1_Ser123_u + S131; kWee2*Cyt_WEE1_Ser123_u*S130;
  R572: Cyt_WEE1_Ser123_p + S130 => Cyt_WEE1_Ser123_p + S131; kWee1*Cyt_WEE1_Ser123_p*S130;
  R573: Cyt_CDC25_pSites_p + S131 => Cyt_CDC25_pSites_p + S130; kCdc25_2*Cyt_CDC25_pSites_p*S131;
  R574: Cyt_CDC25_pSites_u + S131 => Cyt_CDC25_pSites_u + S130; kCdc25_1*Cyt_CDC25_pSites_u*S131;
  R575: S128 => Cyt_CCNA_CDKN1A_B; kDeCDKN1A_1*S128;
  R576: S129 => Cyt_CCNE_CDKN1A_B; kDeCDKN1A_1*S129;
  R577: S130 => S6; kDeCDKN1A_1*S130;
  R578: S131 => S31; kDeCDKN1A_1*S131;
  R579: Cyt_CDKN1A_CCNE_A_B_Ser130_p => ; kDeCDKN1A_1*Cyt_CDKN1A_CCNE_A_B_Ser130_p;
  R580: Nuc_CDKN1A_CCNE_A_B_Ser130_u => ; kDeCDKN1A_1*Nuc_CDKN1A_CCNE_A_B_Ser130_u;
  R581: Cyt_SKP2 + Cyt_CDKN1A_CCNE_A_B_Ser130_p => Cyt_SKP2; kDeCDKN1A_2*Cyt_SKP2*Cyt_CDKN1A_CCNE_A_B_Ser130_p;
  R582: Cyt_SKP2 + S128 => Cyt_CCNA_CDKN1A_B + Cyt_SKP2; kDeCDKN1A_2*Cyt_SKP2*S128;
  R583: Cyt_SKP2 + S129 => Cyt_CCNE_CDKN1A_B + Cyt_SKP2; kDeCDKN1A_2*Cyt_SKP2*S129;
  R584: Cyt_SKP2 + S130 => S6 + Cyt_SKP2; kDeCDKN1A_2*Cyt_SKP2*S130;
  R585: Cyt_SKP2 + S131 => S31 + Cyt_SKP2; kDeCDKN1A_2*Cyt_SKP2*S131;
  R586: Nuc_SKP2 + Nuc_CDKN1A_CCNE_A_B_Ser130_u => Nuc_SKP2; kDeCDKN1A_2*Nuc_SKP2*Nuc_CDKN1A_CCNE_A_B_Ser130_u;
  R587: Nuc_CCNA_CDKN1A_B + Nuc_CDKN1A_CCNE_A_B_Ser130_u => S138; kAsCdkn1aC*Nuc_CCNA_CDKN1A_B*Nuc_CDKN1A_CCNE_A_B_Ser130_u;
  R588: S128 => Cyt_CCNA_CDKN1A_B + Cyt_CDKN1A_CCNE_A_B_Ser130_u; kDiCdkn1aC*S128;
  R589: Nuc_CCNE_CDKN1A_B + Nuc_CDKN1A_CCNE_A_B_Ser130_u => S139; kAsCdkn1aC*Nuc_CCNE_CDKN1A_B*Nuc_CDKN1A_CCNE_A_B_Ser130_u;
  R590: S129 => Cyt_CCNE_CDKN1A_B + Cyt_CDKN1A_CCNE_A_B_Ser130_u; kDiCdkn1aC*S129;
  R591: S67 + Nuc_CDKN1A_CCNE_A_B_Ser130_u => S140; kAsCdkn1aC*S67*Nuc_CDKN1A_CCNE_A_B_Ser130_u;
  R592: S92 + Nuc_CDKN1A_CCNE_A_B_Ser130_u => S141; kAsCdkn1aC*S92*Nuc_CDKN1A_CCNE_A_B_Ser130_u;
  R593: S130 => S6 + Cyt_CDKN1A_CCNE_A_B_Ser130_u; kDiCdkn1aC*S130;
  R594: S131 => S31 + Cyt_CDKN1A_CCNE_A_B_Ser130_u; kDiCdkn1aC*S131;
  R595: Nuc_CCNE_CDKN1A_B + Nuc_CDKN1A_CCNE_A_B_Ser130_u => Nuc_CCNE_CDKN1A_B + Nuc_CDKN1A_CCNE_A_B_Ser130_p; kPhCDKN1AByCe*Nuc_CCNE_CDKN1A_B*Nuc_CDKN1A_CCNE_A_B_Ser130_u;
  R596: Cyt_CCNE_CDKN1A_B + S128 => Cyt_CCNE_CDKN1A_B + Cyt_CCNA_CDKN1A_B + Cyt_CDKN1A_CCNE_A_B_Ser130_p; kPhCDKN1AByCe*Cyt_CCNE_CDKN1A_B*S128;
  R597: Cyt_CCNE_CDKN1A_B + S129 => Cyt_CCNE_CDKN1A_B + Cyt_CCNE_CDKN1A_B + Cyt_CDKN1A_CCNE_A_B_Ser130_p; kPhCDKN1AByCe*Cyt_CCNE_CDKN1A_B*S129;
  R598: Cyt_CCNE_CDKN1A_B + S130 => Cyt_CCNE_CDKN1A_B + S6 + Cyt_CDKN1A_CCNE_A_B_Ser130_p; kPhCDKN1AByCe*Cyt_CCNE_CDKN1A_B*S130;
  R599: Cyt_CCNE_CDKN1A_B + S131 => Cyt_CCNE_CDKN1A_B + S31 + Cyt_CDKN1A_CCNE_A_B_Ser130_p; kPhCDKN1AByCe*Cyt_CCNE_CDKN1A_B*S131;
  R600: Nuc_CCNA_CDKN1A_B + Nuc_CDKN1A_CCNE_A_B_Ser130_u => Nuc_CCNA_CDKN1A_B + Nuc_CDKN1A_CCNE_A_B_Ser130_p; kPhCDKN1AByCa*Nuc_CCNA_CDKN1A_B*Nuc_CDKN1A_CCNE_A_B_Ser130_u;
  R601: Cyt_CCNA_CDKN1A_B + S128 => Cyt_CCNA_CDKN1A_B + Cyt_CCNA_CDKN1A_B + Cyt_CDKN1A_CCNE_A_B_Ser130_p; kPhCDKN1AByCa*Cyt_CCNA_CDKN1A_B*S128;
  R602: Cyt_CCNA_CDKN1A_B + S129 => Cyt_CCNE_CDKN1A_B + Cyt_CCNA_CDKN1A_B + Cyt_CDKN1A_CCNE_A_B_Ser130_p; kPhCDKN1AByCa*Cyt_CCNA_CDKN1A_B*S129;
  R603: Cyt_CCNA_CDKN1A_B + S130 => Cyt_CCNA_CDKN1A_B + S6 + Cyt_CDKN1A_CCNE_A_B_Ser130_p; kPhCDKN1AByCa*Cyt_CCNA_CDKN1A_B*S130;
  R604: Cyt_CCNA_CDKN1A_B + S131 => Cyt_CCNA_CDKN1A_B + S31 + Cyt_CDKN1A_CCNE_A_B_Ser130_p; kPhCDKN1AByCa*Cyt_CCNA_CDKN1A_B*S131;
  R605: S67 + Nuc_CDKN1A_CCNE_A_B_Ser130_u => S67 + Nuc_CDKN1A_CCNE_A_B_Ser130_p; kPhCDKN1AByCb*S67*Nuc_CDKN1A_CCNE_A_B_Ser130_u;
  R606: S6 + S128 => Cyt_CCNA_CDKN1A_B + S6 + Cyt_CDKN1A_CCNE_A_B_Ser130_p; kPhCDKN1AByCb*S6*S128;
  R607: S6 + S129 => Cyt_CCNE_CDKN1A_B + S6 + Cyt_CDKN1A_CCNE_A_B_Ser130_p; kPhCDKN1AByCb*S6*S129;
  R608: S6 + S130 => S6 + S6 + Cyt_CDKN1A_CCNE_A_B_Ser130_p; kPhCDKN1AByCb*S6*S130;
  R609: S6 + S131 => S6 + S31 + Cyt_CDKN1A_CCNE_A_B_Ser130_p; kPhCDKN1AByCb*S6*S131;
  R610: Cyt_CDKN1A_CCNE_A_B_Ser130_p => Cyt_CDKN1A_CCNE_A_B_Ser130_u; kDpCDKN1A*Cyt_CDKN1A_CCNE_A_B_Ser130_p;
  R611: S133 => Cyt_CCNA_CDKN1A_B; kDeCDKN1B_1*S133;
  R612: S134 => Cyt_CCNE_CDKN1A_B; kDeCDKN1B_1*S134;
  R613: Cyt_CDKN1B_CCNE_A_Thr187_p => ; kDeCDKN1B_1*Cyt_CDKN1B_CCNE_A_Thr187_p;
  R614: Nuc_CDKN1B_CCNE_A_Thr187_u => ; kDeCDKN1B_1*Nuc_CDKN1B_CCNE_A_Thr187_u;
  R615: Cyt_SKP2 + Cyt_CDKN1B_CCNE_A_Thr187_p => Cyt_SKP2; kDeCDKN1B_2*Cyt_SKP2*Cyt_CDKN1B_CCNE_A_Thr187_p;
  R616: Cyt_SKP2 + S133 => Cyt_CCNA_CDKN1A_B + Cyt_SKP2; _rateLaw3*Cyt_SKP2*S133;
  R617: Cyt_SKP2 + S134 => Cyt_CCNE_CDKN1A_B + Cyt_SKP2; _rateLaw3*Cyt_SKP2*S134;
  R618: Nuc_SKP2 + Nuc_CDKN1B_CCNE_A_Thr187_u => Nuc_SKP2; _rateLaw3*Nuc_SKP2*Nuc_CDKN1B_CCNE_A_Thr187_u;
  R619: Cyt_CCNA_CDKN1A_B + Cyt_CDKN1B_CCNE_A_Thr187_p => S143; kAsCdkn1bC*Cyt_CCNA_CDKN1A_B*Cyt_CDKN1B_CCNE_A_Thr187_p;
  R620: Nuc_CCNA_CDKN1A_B + Nuc_CDKN1B_CCNE_A_Thr187_u => S144; kAsCdkn1bC*Nuc_CCNA_CDKN1A_B*Nuc_CDKN1B_CCNE_A_Thr187_u;
  R621: S133 => Cyt_CCNA_CDKN1A_B + Cyt_CDKN1B_CCNE_A_Thr187_u; kDiCdkn1bC*S133;
  R622: Cyt_CCNE_CDKN1A_B + Cyt_CDKN1B_CCNE_A_Thr187_p => S145; kAsCdkn1bC*Cyt_CCNE_CDKN1A_B*Cyt_CDKN1B_CCNE_A_Thr187_p;
  R623: Nuc_CCNE_CDKN1A_B + Nuc_CDKN1B_CCNE_A_Thr187_u => S146; kAsCdkn1bC*Nuc_CCNE_CDKN1A_B*Nuc_CDKN1B_CCNE_A_Thr187_u;
  R624: S134 => Cyt_CCNE_CDKN1A_B + Cyt_CDKN1B_CCNE_A_Thr187_u; kDiCdkn1bC*S134;
  R625: Cyt_CCNE_CDKN1A_B + S133 => Cyt_CCNE_CDKN1A_B + S143; kPhCDKN1BByCe*Cyt_CCNE_CDKN1A_B*S133;
  R626: Cyt_CCNE_CDKN1A_B + S134 => Cyt_CCNE_CDKN1A_B + S145; kPhCDKN1BByCe*Cyt_CCNE_CDKN1A_B*S134;
  R627: Nuc_CCNE_CDKN1A_B + Nuc_CDKN1B_CCNE_A_Thr187_u => Nuc_CCNE_CDKN1A_B + Nuc_CDKN1B_CCNE_A_Thr187_p; kPhCDKN1BByCe*Nuc_CCNE_CDKN1A_B*Nuc_CDKN1B_CCNE_A_Thr187_u;
  R628: Cyt_CCNA_CDKN1A_B + S133 => Cyt_CCNA_CDKN1A_B + S143; kPhCDKN1BByCa*Cyt_CCNA_CDKN1A_B*S133;
  R629: Cyt_CCNA_CDKN1A_B + S134 => Cyt_CCNA_CDKN1A_B + S145; kPhCDKN1BByCa*Cyt_CCNA_CDKN1A_B*S134;
  R630: Nuc_CCNA_CDKN1A_B + Nuc_CDKN1B_CCNE_A_Thr187_u => Nuc_CCNA_CDKN1A_B + Nuc_CDKN1B_CCNE_A_Thr187_p; kPhCDKN1BByCa*Nuc_CCNA_CDKN1A_B*Nuc_CDKN1B_CCNE_A_Thr187_u;
  R631: S6 + S133 => S6 + S143; kPhCDKN1BByCb*S6*S133;
  R632: S6 + S134 => S6 + S145; kPhCDKN1BByCb*S6*S134;
  R633: S67 + Nuc_CDKN1B_CCNE_A_Thr187_u => S67 + Nuc_CDKN1B_CCNE_A_Thr187_p; kPhCDKN1BByCb*S67*Nuc_CDKN1B_CCNE_A_Thr187_u;
  R634: Cyt_CDKN1B_CCNE_A_Thr187_p => Cyt_CDKN1B_CCNE_A_Thr187_u; kDpCDKN1B*Cyt_CDKN1B_CCNE_A_Thr187_p;
  R635: Num_NUP_pSites_u + Nuc_CDKN1A_CCNE_A_B_Ser130_u => Num_NUP_pSites_u + Cyt_CDKN1A_CCNE_A_B_Ser130_u; kExImCDKN1A_CCNE_A_B_Ser130u__1*Num_NUP_pSites_u*Nuc_CDKN1A_CCNE_A_B_Ser130_u;
  R636: Num_NUP_pSites_u + Nuc_CDKN1B_CCNE_A_Thr187_u => Num_NUP_pSites_u + Cyt_CDKN1B_CCNE_A_Thr187_u; kExImCDKN1B_CCNE_A_Thr187u__1*Num_NUP_pSites_u*Nuc_CDKN1B_CCNE_A_Thr187_u;
  R637: Num_NUP_pSites_u + S128 => Num_NUP_pSites_u + S138; kImImCCNA_CDKN1A_B1__CDKN1A_CCNE_A_B1_Ser130u__1*Num_NUP_pSites_u*S128;
  R638: Num_NUP_pSites_u + S129 => Num_NUP_pSites_u + S139; kImImCCNE_CDKN1A_B1__CDKN1A_CCNE_A_B1_Ser130u__1*Num_NUP_pSites_u*S129;
  R639: Num_NUP_pSites_u + S130 => Num_NUP_pSites_u + S140; kImImCCNB_CDK1_Thr14_Tyr15u_CDKN1A1__CDKN1A_CCNE_A_B1_Ser130u__1*Num_NUP_pSites_u*S130;
  R640: Num_NUP_pSites_u + S131 => Num_NUP_pSites_u + S141; kImImCCNB_CDK1_Thr14_Tyr15p_CDKN1A1__CDKN1A_CCNE_A_B1_Ser130u__1*Num_NUP_pSites_u*S131;
  R641: Num_NUP_pSites_u + Cyt_CDKN1A_CCNE_A_B_Ser130_p => Num_NUP_pSites_u + Nuc_CDKN1A_CCNE_A_B_Ser130_p; kImImCDKN1A_CCNE_A_B_Ser130p__1*Num_NUP_pSites_u*Cyt_CDKN1A_CCNE_A_B_Ser130_p;
  R642: Num_NUP_pSites_u + S133 => Num_NUP_pSites_u + S144; kImImCCNA_CDKN1A_B1__CDKN1B_CCNE_A1_Thr187u__1*Num_NUP_pSites_u*S133;
  R643: Num_NUP_pSites_u + S134 => Num_NUP_pSites_u + S146; kImImCCNE_CDKN1A_B1__CDKN1B_CCNE_A1_Thr187u__1*Num_NUP_pSites_u*S134;
  R644: Num_NUP_pSites_u + Cyt_CDKN1B_CCNE_A_Thr187_p => Num_NUP_pSites_u + Nuc_CDKN1B_CCNE_A_Thr187_p; kImImCDKN1B_CCNE_A_Thr187p__1*Num_NUP_pSites_u*Cyt_CDKN1B_CCNE_A_Thr187_p;
  R645: S139 => Nuc_CDKN1A_CCNE_A_B_Ser130_u; kDeCe*S139;
  R646: S145 => Cyt_CDKN1B_CCNE_A_Thr187_p; kDeCe*S145;
  R647: S146 => Nuc_CDKN1B_CCNE_A_Thr187_u; kDeCe*S146;
  R648: Cyt_CCNE_CDKN1A_B + S145 => Cyt_CCNE_CDKN1A_B + Cyt_CDKN1B_CCNE_A_Thr187_p; kPhCeE*Cyt_CCNE_CDKN1A_B*S145;
  R649: Nuc_CCNE_CDKN1A_B + S139 => Nuc_CCNE_CDKN1A_B + Nuc_CDKN1A_CCNE_A_B_Ser130_u; kPhCeE*Nuc_CCNE_CDKN1A_B*S139;
  R650: Nuc_CCNE_CDKN1A_B + S146 => Nuc_CCNE_CDKN1A_B + Nuc_CDKN1B_CCNE_A_Thr187_u; kPhCeE*Nuc_CCNE_CDKN1A_B*S146;
  R651: S138 => Nuc_CDKN1A_CCNE_A_B_Ser130_u; kDeCa1*S138;
  R652: S143 => Cyt_CDKN1B_CCNE_A_Thr187_p; kDeCa1*S143;
  R653: S144 => Nuc_CDKN1B_CCNE_A_Thr187_u; kDeCa1*S144;
  R654: Nuc_CCNA_CDKN1A_B + S139 => Nuc_CCNA_CDKN1A_B + Nuc_CDKN1A_CCNE_A_B_Ser130_u; kPhCeA*Nuc_CCNA_CDKN1A_B*S139;
  R655: Cyt_CCNA_CDKN1A_B + S145 => Cyt_CCNA_CDKN1A_B + Cyt_CDKN1B_CCNE_A_Thr187_p; kPhCeA*Cyt_CCNA_CDKN1A_B*S145;
  R656: Nuc_CCNA_CDKN1A_B + S146 => Nuc_CCNA_CDKN1A_B + Nuc_CDKN1B_CCNE_A_Thr187_u; kPhCeA*Nuc_CCNA_CDKN1A_B*S146;
  R657: S77 + S138 => S77 + Nuc_CDKN1A_CCNE_A_B_Ser130_u; kDeCa2*S77*S138;
  R658: S83 + S138 => S83 + Nuc_CDKN1A_CCNE_A_B_Ser130_u; kDeCa2*S83*S138;
  R659: S16 + S143 => S16 + Cyt_CDKN1B_CCNE_A_Thr187_p; kDeCa2*S16*S143;
  R660: S22 + S143 => S22 + Cyt_CDKN1B_CCNE_A_Thr187_p; kDeCa2*S22*S143;
  R661: S77 + S144 => S77 + Nuc_CDKN1B_CCNE_A_Thr187_u; kDeCa2*S77*S144;
  R662: S83 + S144 => S83 + Nuc_CDKN1B_CCNE_A_Thr187_u; kDeCa2*S83*S144;
  R663: S75 + S138 => S75 + Nuc_CDKN1A_CCNE_A_B_Ser130_u; kDeCa3*S75*S138;
  R664: S14 + S143 => S14 + Cyt_CDKN1B_CCNE_A_Thr187_p; kDeCa3*S14*S143;
  R665: S75 + S144 => S75 + Nuc_CDKN1B_CCNE_A_Thr187_u; kDeCa3*S75*S144;
  R666: S140 => Nuc_CDKN1A_CCNE_A_B_Ser130_u; kDeCb1*S140;
  R667: S141 => Nuc_CDKN1A_CCNE_A_B_Ser130_u; kDeCb1*S141;
  R668: S77 + S140 => S77 + Nuc_CDKN1A_CCNE_A_B_Ser130_u; kDeCb2*S77*S140;
  R669: S83 + S140 => S83 + Nuc_CDKN1A_CCNE_A_B_Ser130_u; kDeCb2*S83*S140;
  R670: S77 + S141 => S77 + Nuc_CDKN1A_CCNE_A_B_Ser130_u; kDeCb2*S77*S141;
  R671: S83 + S141 => S83 + Nuc_CDKN1A_CCNE_A_B_Ser130_u; kDeCb2*S83*S141;
  R672: S75 + S140 => S75 + Nuc_CDKN1A_CCNE_A_B_Ser130_u; kDeCb3*S75*S140;
  R673: S75 + S141 => S75 + Nuc_CDKN1A_CCNE_A_B_Ser130_u; kDeCb3*S75*S141;
  R674: Nuc_WEE1_Ser123_u + S140 => Nuc_WEE1_Ser123_u + S141; kWee2*Nuc_WEE1_Ser123_u*S140;
  R675: Nuc_WEE1_Ser123_p + S140 => Nuc_WEE1_Ser123_p + S141; kWee1*Nuc_WEE1_Ser123_p*S140;
  R676: Nuc_CDC25_pSites_p + S141 => Nuc_CDC25_pSites_p + S140; kCdc25_2*Nuc_CDC25_pSites_p*S141;
  R677: Nuc_CDC25_pSites_u + S141 => Nuc_CDC25_pSites_u + S140; kCdc25_1*Nuc_CDC25_pSites_u*S141;
  R678: S138 => Nuc_CCNA_CDKN1A_B; kDeCDKN1A_1*S138;
  R679: S139 => Nuc_CCNE_CDKN1A_B; kDeCDKN1A_1*S139;
  R680: S140 => S67; kDeCDKN1A_1*S140;
  R681: S141 => S92; kDeCDKN1A_1*S141;
  R682: Nuc_CDKN1A_CCNE_A_B_Ser130_p => ; kDeCDKN1A_1*Nuc_CDKN1A_CCNE_A_B_Ser130_p;
  R683: Nuc_SKP2 + Nuc_CDKN1A_CCNE_A_B_Ser130_p => Nuc_SKP2; kDeCDKN1A_2*Nuc_SKP2*Nuc_CDKN1A_CCNE_A_B_Ser130_p;
  R684: Nuc_SKP2 + S138 => Nuc_CCNA_CDKN1A_B + Nuc_SKP2; kDeCDKN1A_2*Nuc_SKP2*S138;
  R685: Nuc_SKP2 + S139 => Nuc_CCNE_CDKN1A_B + Nuc_SKP2; kDeCDKN1A_2*Nuc_SKP2*S139;
  R686: Nuc_SKP2 + S140 => S67 + Nuc_SKP2; kDeCDKN1A_2*Nuc_SKP2*S140;
  R687: Nuc_SKP2 + S141 => S92 + Nuc_SKP2; kDeCDKN1A_2*Nuc_SKP2*S141;
  R688: S138 => Nuc_CCNA_CDKN1A_B + Nuc_CDKN1A_CCNE_A_B_Ser130_u; kDiCdkn1aC*S138;
  R689: S139 => Nuc_CCNE_CDKN1A_B + Nuc_CDKN1A_CCNE_A_B_Ser130_u; kDiCdkn1aC*S139;
  R690: S140 => S67 + Nuc_CDKN1A_CCNE_A_B_Ser130_u; kDiCdkn1aC*S140;
  R691: S141 => S92 + Nuc_CDKN1A_CCNE_A_B_Ser130_u; kDiCdkn1aC*S141;
  R692: Nuc_CCNE_CDKN1A_B + S138 => Nuc_CCNE_CDKN1A_B + Nuc_CCNA_CDKN1A_B + Nuc_CDKN1A_CCNE_A_B_Ser130_p; kPhCDKN1AByCe*Nuc_CCNE_CDKN1A_B*S138;
  R693: Nuc_CCNE_CDKN1A_B + S139 => Nuc_CCNE_CDKN1A_B + Nuc_CCNE_CDKN1A_B + Nuc_CDKN1A_CCNE_A_B_Ser130_p; kPhCDKN1AByCe*Nuc_CCNE_CDKN1A_B*S139;
  R694: Nuc_CCNE_CDKN1A_B + S140 => Nuc_CCNE_CDKN1A_B + S67 + Nuc_CDKN1A_CCNE_A_B_Ser130_p; kPhCDKN1AByCe*Nuc_CCNE_CDKN1A_B*S140;
  R695: Nuc_CCNE_CDKN1A_B + S141 => Nuc_CCNE_CDKN1A_B + S92 + Nuc_CDKN1A_CCNE_A_B_Ser130_p; kPhCDKN1AByCe*Nuc_CCNE_CDKN1A_B*S141;
  R696: Nuc_CCNA_CDKN1A_B + S138 => Nuc_CCNA_CDKN1A_B + Nuc_CCNA_CDKN1A_B + Nuc_CDKN1A_CCNE_A_B_Ser130_p; kPhCDKN1AByCa*Nuc_CCNA_CDKN1A_B*S138;
  R697: Nuc_CCNA_CDKN1A_B + S139 => Nuc_CCNE_CDKN1A_B + Nuc_CCNA_CDKN1A_B + Nuc_CDKN1A_CCNE_A_B_Ser130_p; kPhCDKN1AByCa*Nuc_CCNA_CDKN1A_B*S139;
  R698: Nuc_CCNA_CDKN1A_B + S140 => Nuc_CCNA_CDKN1A_B + S67 + Nuc_CDKN1A_CCNE_A_B_Ser130_p; kPhCDKN1AByCa*Nuc_CCNA_CDKN1A_B*S140;
  R699: Nuc_CCNA_CDKN1A_B + S141 => Nuc_CCNA_CDKN1A_B + S92 + Nuc_CDKN1A_CCNE_A_B_Ser130_p; kPhCDKN1AByCa*Nuc_CCNA_CDKN1A_B*S141;
  R700: S67 + S138 => Nuc_CCNA_CDKN1A_B + S67 + Nuc_CDKN1A_CCNE_A_B_Ser130_p; kPhCDKN1AByCb*S67*S138;
  R701: S67 + S139 => Nuc_CCNE_CDKN1A_B + S67 + Nuc_CDKN1A_CCNE_A_B_Ser130_p; kPhCDKN1AByCb*S67*S139;
  R702: S67 + S140 => S67 + S67 + Nuc_CDKN1A_CCNE_A_B_Ser130_p; kPhCDKN1AByCb*S67*S140;
  R703: S67 + S141 => S67 + S92 + Nuc_CDKN1A_CCNE_A_B_Ser130_p; kPhCDKN1AByCb*S67*S141;
  R704: Nuc_CDKN1A_CCNE_A_B_Ser130_p => Nuc_CDKN1A_CCNE_A_B_Ser130_u; kDpCDKN1A*Nuc_CDKN1A_CCNE_A_B_Ser130_p;
  R705: S143 => Cyt_CCNA_CDKN1A_B; kDeCDKN1B_1*S143;
  R706: S144 => Nuc_CCNA_CDKN1A_B; kDeCDKN1B_1*S144;
  R707: S145 => Cyt_CCNE_CDKN1A_B; kDeCDKN1B_1*S145;
  R708: S146 => Nuc_CCNE_CDKN1A_B; kDeCDKN1B_1*S146;
  R709: Nuc_CDKN1B_CCNE_A_Thr187_p => ; kDeCDKN1B_1*Nuc_CDKN1B_CCNE_A_Thr187_p;
  R710: Cyt_SKP2 + S143 => Cyt_CCNA_CDKN1A_B + Cyt_SKP2; kDeCDKN1B_2*Cyt_SKP2*S143;
  R711: Cyt_SKP2 + S145 => Cyt_CCNE_CDKN1A_B + Cyt_SKP2; kDeCDKN1B_2*Cyt_SKP2*S145;
  R712: Nuc_SKP2 + Nuc_CDKN1B_CCNE_A_Thr187_p => Nuc_SKP2; kDeCDKN1B_2*Nuc_SKP2*Nuc_CDKN1B_CCNE_A_Thr187_p;
  R713: Nuc_SKP2 + S144 => Nuc_CCNA_CDKN1A_B + Nuc_SKP2; _rateLaw3*Nuc_SKP2*S144;
  R714: Nuc_SKP2 + S146 => Nuc_CCNE_CDKN1A_B + Nuc_SKP2; _rateLaw3*Nuc_SKP2*S146;
  R715: Nuc_CCNA_CDKN1A_B + Nuc_CDKN1B_CCNE_A_Thr187_p => S148; kAsCdkn1bC*Nuc_CCNA_CDKN1A_B*Nuc_CDKN1B_CCNE_A_Thr187_p;
  R716: S143 => Cyt_CCNA_CDKN1A_B + Cyt_CDKN1B_CCNE_A_Thr187_p; kDiCdkn1bC*S143;
  R717: S144 => Nuc_CCNA_CDKN1A_B + Nuc_CDKN1B_CCNE_A_Thr187_u; kDiCdkn1bC*S144;
  R718: Nuc_CCNE_CDKN1A_B + Nuc_CDKN1B_CCNE_A_Thr187_p => S149; kAsCdkn1bC*Nuc_CCNE_CDKN1A_B*Nuc_CDKN1B_CCNE_A_Thr187_p;
  R719: S145 => Cyt_CCNE_CDKN1A_B + Cyt_CDKN1B_CCNE_A_Thr187_p; kDiCdkn1bC*S145;
  R720: S146 => Nuc_CCNE_CDKN1A_B + Nuc_CDKN1B_CCNE_A_Thr187_u; kDiCdkn1bC*S146;
  R721: Nuc_CCNE_CDKN1A_B + S144 => Nuc_CCNE_CDKN1A_B + S148; kPhCDKN1BByCe*Nuc_CCNE_CDKN1A_B*S144;
  R722: Nuc_CCNE_CDKN1A_B + S146 => Nuc_CCNE_CDKN1A_B + S149; kPhCDKN1BByCe*Nuc_CCNE_CDKN1A_B*S146;
  R723: Nuc_CCNA_CDKN1A_B + S144 => Nuc_CCNA_CDKN1A_B + S148; kPhCDKN1BByCa*Nuc_CCNA_CDKN1A_B*S144;
  R724: Nuc_CCNA_CDKN1A_B + S146 => Nuc_CCNA_CDKN1A_B + S149; kPhCDKN1BByCa*Nuc_CCNA_CDKN1A_B*S146;
  R725: S67 + S144 => S67 + S148; kPhCDKN1BByCb*S67*S144;
  R726: S67 + S146 => S67 + S149; kPhCDKN1BByCb*S67*S146;
  R727: S143 => S133; kDpCDKN1B*S143;
  R728: S145 => S134; kDpCDKN1B*S145;
  R729: Nuc_CDKN1B_CCNE_A_Thr187_p => Nuc_CDKN1B_CCNE_A_Thr187_u; kDpCDKN1B*Nuc_CDKN1B_CCNE_A_Thr187_p;
  R730: Num_NUP_pSites_u + S138 => Num_NUP_pSites_u + S128; kExImCCNA_CDKN1A_B1__CDKN1A_CCNE_A_B1_Ser130u__1*Num_NUP_pSites_u*S138;
  R731: Num_NUP_pSites_u + S139 => Num_NUP_pSites_u + S129; kExImCCNE_CDKN1A_B1__CDKN1A_CCNE_A_B1_Ser130u__1*Num_NUP_pSites_u*S139;
  R732: Num_NUP_pSites_u + S140 => Num_NUP_pSites_u + S130; kExImCCNB_CDK1_Thr14_Tyr15u_CDKN1A1__CDKN1A_CCNE_A_B1_Ser130u__1*Num_NUP_pSites_u*S140;
  R733: Num_NUP_pSites_u + S141 => Num_NUP_pSites_u + S131; kExImCCNB_CDK1_Thr14_Tyr15p_CDKN1A1__CDKN1A_CCNE_A_B1_Ser130u__1*Num_NUP_pSites_u*S141;
  R734: Num_NUP_pSites_u + Nuc_CDKN1A_CCNE_A_B_Ser130_p => Num_NUP_pSites_u + Cyt_CDKN1A_CCNE_A_B_Ser130_p; kExImCDKN1A_CCNE_A_B_Ser130p__1*Num_NUP_pSites_u*Nuc_CDKN1A_CCNE_A_B_Ser130_p;
  R735: Num_NUP_pSites_u + S144 => Num_NUP_pSites_u + S133; kExImCCNA_CDKN1A_B1__CDKN1B_CCNE_A1_Thr187u__1*Num_NUP_pSites_u*S144;
  R736: Num_NUP_pSites_u + S146 => Num_NUP_pSites_u + S134; kExImCCNE_CDKN1A_B1__CDKN1B_CCNE_A1_Thr187u__1*Num_NUP_pSites_u*S146;
  R737: Num_NUP_pSites_u + Nuc_CDKN1B_CCNE_A_Thr187_p => Num_NUP_pSites_u + Cyt_CDKN1B_CCNE_A_Thr187_p; kExImCDKN1B_CCNE_A_Thr187p__1*Num_NUP_pSites_u*Nuc_CDKN1B_CCNE_A_Thr187_p;
  R738: Num_NUP_pSites_u + S143 => Num_NUP_pSites_u + S148; kImImCCNA_CDKN1A_B1__CDKN1B_CCNE_A1_Thr187p__1*Num_NUP_pSites_u*S143;
  R739: Num_NUP_pSites_u + S145 => Num_NUP_pSites_u + S149; kImImCCNE_CDKN1A_B1__CDKN1B_CCNE_A1_Thr187p__1*Num_NUP_pSites_u*S145;
  R740: S149 => Nuc_CDKN1B_CCNE_A_Thr187_p; kDeCe*S149;
  R741: Nuc_CCNE_CDKN1A_B + S149 => Nuc_CCNE_CDKN1A_B + Nuc_CDKN1B_CCNE_A_Thr187_p; kPhCeE*Nuc_CCNE_CDKN1A_B*S149;
  R742: S148 => Nuc_CDKN1B_CCNE_A_Thr187_p; kDeCa1*S148;
  R743: Nuc_CCNA_CDKN1A_B + S149 => Nuc_CCNA_CDKN1A_B + Nuc_CDKN1B_CCNE_A_Thr187_p; kPhCeA*Nuc_CCNA_CDKN1A_B*S149;
  R744: S77 + S148 => S77 + Nuc_CDKN1B_CCNE_A_Thr187_p; kDeCa2*S77*S148;
  R745: S83 + S148 => S83 + Nuc_CDKN1B_CCNE_A_Thr187_p; kDeCa2*S83*S148;
  R746: S75 + S148 => S75 + Nuc_CDKN1B_CCNE_A_Thr187_p; kDeCa3*S75*S148;
  R747: S148 => Nuc_CCNA_CDKN1A_B; kDeCDKN1B_1*S148;
  R748: S149 => Nuc_CCNE_CDKN1A_B; kDeCDKN1B_1*S149;
  R749: Nuc_SKP2 + S148 => Nuc_CCNA_CDKN1A_B + Nuc_SKP2; kDeCDKN1B_2*Nuc_SKP2*S148;
  R750: Nuc_SKP2 + S149 => Nuc_CCNE_CDKN1A_B + Nuc_SKP2; kDeCDKN1B_2*Nuc_SKP2*S149;
  R751: S148 => Nuc_CCNA_CDKN1A_B + Nuc_CDKN1B_CCNE_A_Thr187_p; kDiCdkn1bC*S148;
  R752: S149 => Nuc_CCNE_CDKN1A_B + Nuc_CDKN1B_CCNE_A_Thr187_p; kDiCdkn1bC*S149;
  R753: S148 => S144; kDpCDKN1B*S148;
  R754: S149 => S146; kDpCDKN1B*S149;
  R755: Num_NUP_pSites_u + S148 => Num_NUP_pSites_u + S143; kExImCCNA_CDKN1A_B1__CDKN1B_CCNE_A1_Thr187p__1*Num_NUP_pSites_u*S148;
  R756: Num_NUP_pSites_u + S149 => Num_NUP_pSites_u + S145; kExImCCNE_CDKN1A_B1__CDKN1B_CCNE_A1_Thr187p__1*Num_NUP_pSites_u*S149;
end
