// SBML level 2 version 3

model cell_cycle_v4.0.0()

  // Compartments:
  compartment Plm = 2e-14;  // 2-D
  compartment Cyt in Plm = 1e-12;
  compartment Num in Cyt = 9e-15;  // 2-D
  compartment Nuc in Num = 1e-12;

  // Species:
  species Cyt_CCND in Cyt = 6.022e11; Cyt_CCND is "@Cyt::CCND()";
  species Cyt_CCNE_CDKN1A_B in Cyt = 1.3986043e11; Cyt_CCNE_CDKN1A_B is "@Cyt::CCNE(CDKN1A_B)";
  species Cyt_E2F_DBD_RB1_Ser332_u in Cyt = 1.1128068e10; Cyt_E2F_DBD_RB1_Ser332_u is "@Cyt::E2F(DBD,RB1,Ser332~u)";
  species Cyt_E2F_DBD_RB1_Ser332_p in Cyt = 22932894; Cyt_E2F_DBD_RB1_Ser332_p is "@Cyt::E2F(DBD,RB1,Ser332~p)";
  species Cyt_CCNA_CDKN1A_B in Cyt = 4.2325597e9; Cyt_CCNA_CDKN1A_B is "@Cyt::CCNA(CDKN1A_B)";
  species S6 in Cyt = 1.133559e9; S6 is "@Cyt::CCNB(CDK1_Thr14_Tyr15~u,CDKN1A)";
  species S7 in Cyt = 4.3034014e10; S7 is "@Cyt::E2F(DBD,RB1!1,Ser332~u).RB1(E2F!1,Ser807_Ser811~u)";
  species S8 in Cyt = 90654340; S8 is "@Cyt::E2F(DBD,RB1!1,Ser332~p).RB1(E2F!1,Ser807_Ser811~u)";
  species Cyt_RB1_E2F_Ser807_Ser811_u in Cyt = 5.2778426e10; Cyt_RB1_E2F_Ser807_Ser811_u is "@Cyt::RB1(E2F,Ser807_Ser811~u)";
  species Cyt_RB1_E2F_Ser807_Ser811_p in Cyt = 5.0629691e11; Cyt_RB1_E2F_Ser807_Ser811_p is "@Cyt::RB1(E2F,Ser807_Ser811~p)";
  species Cyt_PPP2R2B_ENSA_ARPP19 in Cyt = 4.6484797e10; Cyt_PPP2R2B_ENSA_ARPP19 is "@Cyt::PPP2R2B(ENSA_ARPP19)";
  species S12 in Cyt = 2.4260911e12; S12 is "@Cyt::APC(FBXO5,FZR1_CDC20,Ser355~u)";
  species Cyt_CDC20_APC in Cyt = 1.3847757e11; Cyt_CDC20_APC is "@Cyt::CDC20(APC)";
  species S14 in Cyt = 4.2087805e10; S14 is "@Cyt::APC(FBXO5,FZR1_CDC20!1,Ser355~p).CDC20(APC!1)";
  species S15 in Cyt = 3.7993439e10; S15 is "@Cyt::APC(FBXO5,FZR1_CDC20,Ser355~p)";
  species S16 in Cyt = 4.2969631e11; S16 is "@Cyt::APC(FBXO5,FZR1_CDC20!1,Ser355~u).FZR1(APC!1,FBXO5,nTerm~u)";
  species Cyt_FZR1_APC_FBXO5_nTerm_u in Cyt = 3.4406152e8; Cyt_FZR1_APC_FBXO5_nTerm_u is "@Cyt::FZR1(APC,FBXO5,nTerm~u)";
  species Cyt_FZR1_APC_FBXO5_nTerm_p in Cyt = 9.7028319e10; Cyt_FZR1_APC_FBXO5_nTerm_p is "@Cyt::FZR1(APC,FBXO5,nTerm~p)";
  species S19 in Cyt = 6.5604459e10; S19 is "@Cyt::APC(FBXO5!1,FZR1_CDC20!2,Ser355~u).FBXO5(APC!1,FZR1!3,Ser182~u).FZR1(APC!2,FBXO5!3,nTerm~u)";
  species Cyt_FBXO5_APC_FZR1_Ser182_u in Cyt = 4.3226888e8; Cyt_FBXO5_APC_FZR1_Ser182_u is "@Cyt::FBXO5(APC,FZR1,Ser182~u)";
  species S21 in Cyt = 1.3323959e9; S21 is "@Cyt::APC(FBXO5!1,FZR1_CDC20!2,Ser355~p).FBXO5(APC!1,FZR1!3,Ser182~u).FZR1(APC!2,FBXO5!3,nTerm~u)";
  species S22 in Cyt = 8.1944566e9; S22 is "@Cyt::APC(FBXO5,FZR1_CDC20!1,Ser355~p).FZR1(APC!1,FBXO5,nTerm~u)";
  species Cyt_FBXO5_APC_FZR1_Ser182_p in Cyt = 11324333; Cyt_FBXO5_APC_FZR1_Ser182_p is "@Cyt::FBXO5(APC,FZR1,Ser182~p)";
  species Cyt_FOXM1_DBD_Thr600_u in Cyt = 3.3510826e9; Cyt_FOXM1_DBD_Thr600_u is "@Cyt::FOXM1(DBD,Thr600~u)";
  species Cyt_FOXM1_DBD_Thr600_p in Cyt = 2.2950816e8; Cyt_FOXM1_DBD_Thr600_p is "@Cyt::FOXM1(DBD,Thr600~p)";
  species Cyt_WEE1_Ser123_u in Cyt = 5.9042195e11; Cyt_WEE1_Ser123_u is "@Cyt::WEE1(Ser123~u)";
  species S27 in Cyt = 4.5242773e9; S27 is "@Cyt::CCNB(CDK1_Thr14_Tyr15~p,CDKN1A)";
  species Cyt_WEE1_Ser123_p in Cyt = 1.1778049e10; Cyt_WEE1_Ser123_p is "@Cyt::WEE1(Ser123~p)";
  species Cyt_CDC25_pSites_p in Cyt = 1.1103404e10; Cyt_CDC25_pSites_p is "@Cyt::CDC25(pSites~p)";
  species Cyt_CDC25_pSites_u in Cyt = 5.910966e11; Cyt_CDC25_pSites_u is "@Cyt::CDC25(pSites~u)";
  species Cyt_MASTL_Thr198_u in Cyt = 6.0070998e11; Cyt_MASTL_Thr198_u is "@Cyt::MASTL(Thr198~u)";
  species Cyt_MASTL_Thr198_p in Cyt = 1.4900204e9; Cyt_MASTL_Thr198_p is "@Cyt::MASTL(Thr198~p)";
  species S33 in Cyt = 4.9793694e11; S33 is "@Cyt::ENSA_ARPP19(PPP2R2B,Ser62_Ser67~u)";
  species S34 in Cyt = 1.9785953e8; S34 is "@Cyt::ENSA_ARPP19(PPP2R2B,Ser62_Ser67~p)";
  species S35 in Cyt = 1.040652e11; S35 is "@Cyt::ENSA_ARPP19(PPP2R2B!1,Ser62_Ser67~p).PPP2R2B(ENSA_ARPP19!1)";
  species Cyt_iWEE in Cyt = 0; Cyt_iWEE is "@Cyt::iWEE()";
  species Cyt_SKP2 in Cyt = 6.022e11; Cyt_SKP2 is "@Cyt::SKP2()";
  species Cyt_TP53_DBD_Ser15_p in Cyt = 0; Cyt_TP53_DBD_Ser15_p is "@Cyt::TP53(DBD,Ser15~p)";
  species Cyt_FOXO_DBD in Cyt = 6.022e11; Cyt_FOXO_DBD is "@Cyt::FOXO(DBD)";
  species Num_NUP_pSites_u in Num = 2980.89; Num_NUP_pSites_u is "@Num::NUP(pSites~u)";
  species Nuc_CCND in Nuc = 6.022e11; Nuc_CCND is "@Nuc::CCND()";
  species Nuc_CCNE_CDKN1A_B in Nuc = 1.3986043e11; Nuc_CCNE_CDKN1A_B is "@Nuc::CCNE(CDKN1A_B)";
  species Nuc_E2F_DBD_RB1_Ser332_u in Nuc = 1.1128068e10; Nuc_E2F_DBD_RB1_Ser332_u is "@Nuc::E2F(DBD,RB1,Ser332~u)";
  species Nuc_E2F_DBD_RB1_Ser332_p in Nuc = 22932894; Nuc_E2F_DBD_RB1_Ser332_p is "@Nuc::E2F(DBD,RB1,Ser332~p)";
  species Nuc_CCNA_CDKN1A_B in Nuc = 4.2325597e9; Nuc_CCNA_CDKN1A_B is "@Nuc::CCNA(CDKN1A_B)";
  species S46 in Nuc = 1.133559e9; S46 is "@Nuc::CCNB(CDK1_Thr14_Tyr15~u,CDKN1A)";
  species S47 in Nuc = 4.3034014e10; S47 is "@Nuc::E2F(DBD,RB1!1,Ser332~u).RB1(E2F!1,Ser807_Ser811~u)";
  species S48 in Nuc = 90654340; S48 is "@Nuc::E2F(DBD,RB1!1,Ser332~p).RB1(E2F!1,Ser807_Ser811~u)";
  species Nuc_RB1_E2F_Ser807_Ser811_u in Nuc = 5.2778426e10; Nuc_RB1_E2F_Ser807_Ser811_u is "@Nuc::RB1(E2F,Ser807_Ser811~u)";
  species Nuc_RB1_E2F_Ser807_Ser811_p in Nuc = 5.0629691e11; Nuc_RB1_E2F_Ser807_Ser811_p is "@Nuc::RB1(E2F,Ser807_Ser811~p)";
  species Nuc_PPP2R2B_ENSA_ARPP19 in Nuc = 4.6484797e10; Nuc_PPP2R2B_ENSA_ARPP19 is "@Nuc::PPP2R2B(ENSA_ARPP19)";
  species S52 in Nuc = 2.4260911e12; S52 is "@Nuc::APC(FBXO5,FZR1_CDC20,Ser355~u)";
  species Nuc_CDC20_APC in Nuc = 1.3847757e11; Nuc_CDC20_APC is "@Nuc::CDC20(APC)";
  species S54 in Nuc = 4.2087805e10; S54 is "@Nuc::APC(FBXO5,FZR1_CDC20!1,Ser355~p).CDC20(APC!1)";
  species S55 in Nuc = 3.7993439e10; S55 is "@Nuc::APC(FBXO5,FZR1_CDC20,Ser355~p)";
  species S56 in Nuc = 4.2969631e11; S56 is "@Nuc::APC(FBXO5,FZR1_CDC20!1,Ser355~u).FZR1(APC!1,FBXO5,nTerm~u)";
  species Nuc_FZR1_APC_FBXO5_nTerm_u in Nuc = 3.4406152e8; Nuc_FZR1_APC_FBXO5_nTerm_u is "@Nuc::FZR1(APC,FBXO5,nTerm~u)";
  species Nuc_FZR1_APC_FBXO5_nTerm_p in Nuc = 9.7028319e10; Nuc_FZR1_APC_FBXO5_nTerm_p is "@Nuc::FZR1(APC,FBXO5,nTerm~p)";
  species S59 in Nuc = 6.5604459e10; S59 is "@Nuc::APC(FBXO5!1,FZR1_CDC20!2,Ser355~u).FBXO5(APC!1,FZR1!3,Ser182~u).FZR1(APC!2,FBXO5!3,nTerm~u)";
  species Nuc_FBXO5_APC_FZR1_Ser182_u in Nuc = 4.3226888e8; Nuc_FBXO5_APC_FZR1_Ser182_u is "@Nuc::FBXO5(APC,FZR1,Ser182~u)";
  species S61 in Nuc = 1.3323959e9; S61 is "@Nuc::APC(FBXO5!1,FZR1_CDC20!2,Ser355~p).FBXO5(APC!1,FZR1!3,Ser182~u).FZR1(APC!2,FBXO5!3,nTerm~u)";
  species S62 in Nuc = 8.1944566e9; S62 is "@Nuc::APC(FBXO5,FZR1_CDC20!1,Ser355~p).FZR1(APC!1,FBXO5,nTerm~u)";
  species Nuc_FBXO5_APC_FZR1_Ser182_p in Nuc = 11324333; Nuc_FBXO5_APC_FZR1_Ser182_p is "@Nuc::FBXO5(APC,FZR1,Ser182~p)";
  species Nuc_FOXM1_DBD_Thr600_u in Nuc = 3.3510826e9; Nuc_FOXM1_DBD_Thr600_u is "@Nuc::FOXM1(DBD,Thr600~u)";
  species Nuc_FOXM1_DBD_Thr600_p in Nuc = 2.2950816e8; Nuc_FOXM1_DBD_Thr600_p is "@Nuc::FOXM1(DBD,Thr600~p)";
  species S66 in Nuc = 114614.27; S66 is "@Nuc::CCNB_promoter(FOXM1!1).FOXM1(DBD!1,Thr600~p)";
  species Nuc_CCNB_promoter_FOXM1 in Nuc = 60105386; Nuc_CCNB_promoter_FOXM1 is "@Nuc::CCNB_promoter(FOXM1)";
  species Nuc_CDC20_promoter_FOXM1 in Nuc = 60174121; Nuc_CDC20_promoter_FOXM1 is "@Nuc::CDC20_promoter(FOXM1)";
  species S69 in Nuc = 45878.816; S69 is "@Nuc::CDC20_promoter(FOXM1!1).FOXM1(DBD!1,Thr600~p)";
  species Nuc_WEE1_Ser123_u in Nuc = 5.9042195e11; Nuc_WEE1_Ser123_u is "@Nuc::WEE1(Ser123~u)";
  species S71 in Nuc = 4.5242773e9; S71 is "@Nuc::CCNB(CDK1_Thr14_Tyr15~p,CDKN1A)";
  species Nuc_WEE1_Ser123_p in Nuc = 1.1778049e10; Nuc_WEE1_Ser123_p is "@Nuc::WEE1(Ser123~p)";
  species Nuc_CDC25_pSites_p in Nuc = 1.1103404e10; Nuc_CDC25_pSites_p is "@Nuc::CDC25(pSites~p)";
  species Nuc_CDC25_pSites_u in Nuc = 5.910966e11; Nuc_CDC25_pSites_u is "@Nuc::CDC25(pSites~u)";
  species Nuc_MASTL_Thr198_u in Nuc = 6.0070998e11; Nuc_MASTL_Thr198_u is "@Nuc::MASTL(Thr198~u)";
  species Nuc_MASTL_Thr198_p in Nuc = 1.4900204e9; Nuc_MASTL_Thr198_p is "@Nuc::MASTL(Thr198~p)";
  species S77 in Nuc = 4.9793694e11; S77 is "@Nuc::ENSA_ARPP19(PPP2R2B,Ser62_Ser67~u)";
  species S78 in Nuc = 1.9785953e8; S78 is "@Nuc::ENSA_ARPP19(PPP2R2B,Ser62_Ser67~p)";
  species S79 in Nuc = 1.040652e11; S79 is "@Nuc::ENSA_ARPP19(PPP2R2B!1,Ser62_Ser67~p).PPP2R2B(ENSA_ARPP19!1)";
  species Nuc_CCNE_promoter_E2F in Nuc = 50873268; Nuc_CCNE_promoter_E2F is "@Nuc::CCNE_promoter(E2F)";
  species Nuc_CCNA_promoter_E2F in Nuc = 50873268; Nuc_CCNA_promoter_E2F is "@Nuc::CCNA_promoter(E2F)";
  species Nuc_E2F_promoter_E2F in Nuc = 50873268; Nuc_E2F_promoter_E2F is "@Nuc::E2F_promoter(E2F)";
  species Nuc_FBXO5_promoter_E2F in Nuc = 50873268; Nuc_FBXO5_promoter_E2F is "@Nuc::FBXO5_promoter(E2F)";
  species Nuc_FOXM1_promoter_E2F in Nuc = 50873268; Nuc_FOXM1_promoter_E2F is "@Nuc::FOXM1_promoter(E2F)";
  species S85 in Nuc = 9346731.7; S85 is "@Nuc::CCNE_promoter(E2F!1).E2F(DBD!1,RB1,Ser332~u)";
  species S86 in Nuc = 9346731.7; S86 is "@Nuc::CCNA_promoter(E2F!1).E2F(DBD!1,RB1,Ser332~u)";
  species S87 in Nuc = 9346731.7; S87 is "@Nuc::E2F(DBD!1,RB1,Ser332~u).E2F_promoter(E2F!1)";
  species S88 in Nuc = 9346731.7; S88 is "@Nuc::E2F(DBD!1,RB1,Ser332~u).FBXO5_promoter(E2F!1)";
  species S89 in Nuc = 9346731.7; S89 is "@Nuc::E2F(DBD!1,RB1,Ser332~u).FOXM1_promoter(E2F!1)";
  species S90 in Nuc = 0; S90 is "@Nuc::CCNE_promoter(E2F!1).E2F(DBD!1,RB1,Ser332~p)";
  species S91 in Nuc = 0; S91 is "@Nuc::CCNA_promoter(E2F!1).E2F(DBD!1,RB1,Ser332~p)";
  species S92 in Nuc = 0; S92 is "@Nuc::E2F(DBD!1,RB1,Ser332~p).E2F_promoter(E2F!1)";
  species S93 in Nuc = 0; S93 is "@Nuc::E2F(DBD!1,RB1,Ser332~p).FBXO5_promoter(E2F!1)";
  species S94 in Nuc = 0; S94 is "@Nuc::E2F(DBD!1,RB1,Ser332~p).FOXM1_promoter(E2F!1)";
  species Nuc_iWEE in Nuc = 0; Nuc_iWEE is "@Nuc::iWEE()";
  species Nuc_SKP2 in Nuc = 6.022e11; Nuc_SKP2 is "@Nuc::SKP2()";
  species Nuc_TP53_DBD_Ser15_p in Nuc = 0; Nuc_TP53_DBD_Ser15_p is "@Nuc::TP53(DBD,Ser15~p)";
  species Nuc_CDKN1A_promoter_TP53 in Nuc = 60220000; Nuc_CDKN1A_promoter_TP53 is "@Nuc::CDKN1A_promoter(TP53)";
  species Nuc_FOXO_DBD in Nuc = 6.022e11; Nuc_FOXO_DBD is "@Nuc::FOXO(DBD)";
  species Nuc_CDKN1B_promoter_FOXO in Nuc = 60220000; Nuc_CDKN1B_promoter_FOXO is "@Nuc::CDKN1B_promoter(FOXO)";
  species S101 in Nuc = 0; S101 is "@Nuc::CDKN1A_promoter(TP53!1).TP53(DBD!1,Ser15~p)";
  species Cyt_CDKN1A_CCNE_A_B_Ser130_u in Cyt = 0; Cyt_CDKN1A_CCNE_A_B_Ser130_u is "@Cyt::CDKN1A(CCNE_A_B,Ser130~u)";
  species S103 in Nuc = 0; S103 is "@Nuc::CDKN1B_promoter(FOXO!1).FOXO(DBD!1)";
  species Cyt_CDKN1B_CCNE_A_Thr187_u in Cyt = 0; Cyt_CDKN1B_CCNE_A_Thr187_u is "@Cyt::CDKN1B(CCNE_A,Thr187~u)";
  species S105 in Cyt = 0; S105 is "@Cyt::CCNA(CDKN1A_B!1).CDKN1A(CCNE_A_B!1,Ser130~u)";
  species S106 in Cyt = 0; S106 is "@Cyt::CCNE(CDKN1A_B!1).CDKN1A(CCNE_A_B!1,Ser130~u)";
  species S107 in Cyt = 0; S107 is "@Cyt::CCNB(CDK1_Thr14_Tyr15~u,CDKN1A!1).CDKN1A(CCNE_A_B!1,Ser130~u)";
  species S108 in Cyt = 0; S108 is "@Cyt::CCNB(CDK1_Thr14_Tyr15~p,CDKN1A!1).CDKN1A(CCNE_A_B!1,Ser130~u)";
  species Cyt_CDKN1A_CCNE_A_B_Ser130_p in Cyt = 0; Cyt_CDKN1A_CCNE_A_B_Ser130_p is "@Cyt::CDKN1A(CCNE_A_B,Ser130~p)";
  species S110 in Cyt = 0; S110 is "@Cyt::CCNA(CDKN1A_B!1).CDKN1B(CCNE_A!1,Thr187~u)";
  species S111 in Cyt = 0; S111 is "@Cyt::CCNE(CDKN1A_B!1).CDKN1B(CCNE_A!1,Thr187~u)";
  species Cyt_CDKN1B_CCNE_A_Thr187_p in Cyt = 0; Cyt_CDKN1B_CCNE_A_Thr187_p is "@Cyt::CDKN1B(CCNE_A,Thr187~p)";
  species Nuc_CDKN1A_CCNE_A_B_Ser130_u in Nuc = 0; Nuc_CDKN1A_CCNE_A_B_Ser130_u is "@Nuc::CDKN1A(CCNE_A_B,Ser130~u)";
  species Nuc_CDKN1B_CCNE_A_Thr187_u in Nuc = 0; Nuc_CDKN1B_CCNE_A_Thr187_u is "@Nuc::CDKN1B(CCNE_A,Thr187~u)";
  species S115 in Nuc = 0; S115 is "@Nuc::CCNA(CDKN1A_B!1).CDKN1A(CCNE_A_B!1,Ser130~u)";
  species S116 in Nuc = 0; S116 is "@Nuc::CCNE(CDKN1A_B!1).CDKN1A(CCNE_A_B!1,Ser130~u)";
  species S117 in Nuc = 0; S117 is "@Nuc::CCNB(CDK1_Thr14_Tyr15~u,CDKN1A!1).CDKN1A(CCNE_A_B!1,Ser130~u)";
  species S118 in Nuc = 0; S118 is "@Nuc::CCNB(CDK1_Thr14_Tyr15~p,CDKN1A!1).CDKN1A(CCNE_A_B!1,Ser130~u)";
  species Nuc_CDKN1A_CCNE_A_B_Ser130_p in Nuc = 0; Nuc_CDKN1A_CCNE_A_B_Ser130_p is "@Nuc::CDKN1A(CCNE_A_B,Ser130~p)";
  species S120 in Cyt = 0; S120 is "@Cyt::CCNA(CDKN1A_B!1).CDKN1B(CCNE_A!1,Thr187~p)";
  species S121 in Nuc = 0; S121 is "@Nuc::CCNA(CDKN1A_B!1).CDKN1B(CCNE_A!1,Thr187~u)";
  species S122 in Cyt = 0; S122 is "@Cyt::CCNE(CDKN1A_B!1).CDKN1B(CCNE_A!1,Thr187~p)";
  species S123 in Nuc = 0; S123 is "@Nuc::CCNE(CDKN1A_B!1).CDKN1B(CCNE_A!1,Thr187~u)";
  species Nuc_CDKN1B_CCNE_A_Thr187_p in Nuc = 0; Nuc_CDKN1B_CCNE_A_Thr187_p is "@Nuc::CDKN1B(CCNE_A,Thr187~p)";
  species S125 in Nuc = 0; S125 is "@Nuc::CCNA(CDKN1A_B!1).CDKN1B(CCNE_A!1,Thr187~p)";
  species S126 in Nuc = 0; S126 is "@Nuc::CCNE(CDKN1A_B!1).CDKN1B(CCNE_A!1,Thr187~p)";

  // Parameters:
  kPhRbD = 9.206253e-27;
  kPhRbE = 1.1507816e-26;
  kDpRb = 0.0013860014;
  kPhRb = 3.4523449e-26;
  kSyCe1 = 1.6693001e19;
  kSyCe2 = 8.3160083;
  kDeCe = 0.00013860014;
  kDiE2fRb = 0.00034650035;
  kAsE2fRb = 5.7539081e-25;
  kSyE2f1 = 8.3465003e18;
  kSyE2f2 = 1.3860014;
  kDeE2f1 = 6.9300069e-5;
  kDeE2f2 = 2.3015632e-27;
  kPhE2f = 2.3015632e-27;
  kDpE2f2 = 1.1507816e-25;
  kSyEmi1 = 4.1732502e19;
  kSyEmi2 = 6.9300069;
  kDeEmi1 = 0.00034650035;
  kDeEmi2 = 0.00034650035;
  kDeEmi3 = 0.0034650035;
  kPhEmiA = 5.7539081e-29;
  kPhEmiB = 2.8769541e-28;
  kDpEmi = 3.4650035e-6;
  kSyCa1 = 8.3465003e18;
  kSyCa2 = 1.039501;
  kDeCa1 = 6.9300069e-6;
  kDeCa2 = 4.6031265e-27;
  kDeCa3 = 1.1507816e-27;
  kDpCdh = 0.0034650035;
  kPhCdhA = 2.8769541e-26;
  kPhCdhE = 1.1507816e-27;
  kPhCdhB = 2.8769541e-25;
  kDiACE = 0.00034650035;
  kAsACE = 5.7539081e-25;
  kDiACdh = 0.00034650035;
  kAsACdh = 5.7539081e-25;
  kPhCeA = 1.1507816e-26;
  kPhCeE = 1.1507816e-28;
  kPhFoxE = 1.1507816e-27;
  kPhFoxA = 1.1507816e-27;
  kPhFoxB = 5.7539081e-27;
  kDpFox = 1e-5;
  kSyCb1 = 8.3465003e18;
  kSyCb2 = 1.039501;
  kDeCb1 = 6.9300069e-6;
  kDeCb2 = 1.438477e-27;
  kDeCb3 = 1.438477e-27;
  kPhEnsa = 1.1507816e-27;
  kDpEnsa = 0.00034650035;
  kPhGw = 1.1507816e-26;
  kDpGw1 = 0.0017325017;
  kDpGw2 = 1.1507816e-25;
  kWee1 = 1.1507816e-28;
  kWee2 = 1.1507816e-26;
  kPhWeeA = 1.1507816e-27;
  kPhWeeB = 1.1507816e-26;
  kDpWee = 1.1507816e-25;
  kCdc25_1 = 1.1507816e-27;
  kCdc25_2 = 1.1507816e-26;
  kDpCdc25 = 1.1507816e-25;
  kDipEB55 = 4.7124047e-5;
  kAspEB55 = 6.5594552e-25;
  kSyCdc_1 = 8.3465003e18;
  kSyCdc_2 = 1.3860014;
  kDeCdc_1 = 2.7720028e-5;
  kDeCdc_2 = 4.6031265e-28;
  kDipACdc = 0.00086625087;
  kAspACdc = 1.1507816e-26;
  kPhApcA = 1.1507816e-28;
  kDpApc_1 = 0;
  kDpApc_2 = 5.7539081e-26;
  kSyFox1 = 8.3465003e18;
  kSyFox2 = 1.039501;
  kDeFox1 = 6.9300069e-6;
  kDeFox2 = 5.7539081e-27;
  kAsEPx = 5.7539081e-25;
  kDiEPx = 0.034650035;
  kAsFPcb = 5.7539081e-25;
  kDiFPcb = 0.069300069;
  kAsFPcdc = 5.7539081e-25;
  kDiFPcdc = 0.17325017;
  kPhC25B = 1.1507816e-26;
  kPhCAEE = 9.2062529e-28;
  kPhCAEA = 2.3015632e-26;
  kPhCAEB = 2.3015632e-25;
  ikSyCb = 1;
  jiWee = 6.022e22;
  kDpE2f1 = 0;
  kPhC25A = 0;
  kSySkp2 = 1.2044e20;
  kDeSkp2_1 = 0.0001;
  kDeSkp2_2 = 3.3211558e-27;
  kAsTP53PCDKN1A = 4.9817336e-25;
  kDiTP53PCDKN1A = 0.15;
  kSyCDKN1A_1 = 1.2044e19;
  kSyCDKN1A_2 = 8;
  kDeCDKN1A_1 = 2e-5;
  kDeCDKN1A_2 = 4.1514447e-28;
  kAsCdkn1aC = 1.1624045e-26;
  kDiCdkn1aC = 0.0003;
  kPhCDKN1AByCe = 8.3028894e-27;
  kPhCDKN1AByCa = 8.3028894e-28;
  kPhCDKN1AByCb = 8.3028894e-27;
  kDpCDKN1A = 0.002;
  kAsFOXOPCDKN1B = 4.9817336e-25;
  kDiFOXOPCDKN1B = 0.15;
  kSyCDKN1B_1 = 1.2044e19;
  kSyCDKN1B_2 = 1;
  kDeCDKN1B_1 = 2e-5;
  kDeCDKN1B_2 = 4.1514447e-27;
  kAsCdkn1bC = 1.1624045e-26;
  kDiCdkn1bC = 0.0003;
  kPhCDKN1BByCe = 8.3028894e-27;
  kPhCDKN1BByCa = 8.3028894e-26;
  kPhCDKN1BByCb = 8.3028894e-28;
  kDpCDKN1B = 0.002;
  kPhNup = 4.9817336e-12;
  kDpNup_1 = 2;
  kImImCCND_1 = 1.6605779e-15;
  kExImCCND_1 = 1.6605779e-15;
  kImImCCNE_CDKN1A_B__1 = 1.6605779e-15;
  kExImCCNE_CDKN1A_B__1 = 1.6605779e-15;
  kImImE2F_DBD_RB1_Ser332u__1 = 1.6605779e-15;
  kExImE2F_DBD_RB1_Ser332u__1 = 1.6605779e-15;
  kImImE2F_DBD_RB1_Ser332p__1 = 1.6605779e-15;
  kExImE2F_DBD_RB1_Ser332p__1 = 1.6605779e-15;
  kImImCCNA_CDKN1A_B__1 = 1.6605779e-15;
  kExImCCNA_CDKN1A_B__1 = 1.6605779e-15;
  kImImCCNB_CDK1_Thr14_Tyr15u_CDKN1A__1 = 1.6605779e-15;
  kExImCCNB_CDK1_Thr14_Tyr15u_CDKN1A__1 = 1.6605779e-15;
  kImImE2F_DBD_RB11_Ser332u__RB1_E2F1_Ser807_Ser811u__1 = 1.6605779e-15;
  kExImE2F_DBD_RB11_Ser332u__RB1_E2F1_Ser807_Ser811u__1 = 1.6605779e-15;
  kImImE2F_DBD_RB11_Ser332p__RB1_E2F1_Ser807_Ser811u__1 = 1.6605779e-15;
  kExImE2F_DBD_RB11_Ser332p__RB1_E2F1_Ser807_Ser811u__1 = 1.6605779e-15;
  kImImRB1_E2F_Ser807_Ser811u__1 = 1.6605779e-15;
  kExImRB1_E2F_Ser807_Ser811u__1 = 1.6605779e-15;
  kImImRB1_E2F_Ser807_Ser811p__1 = 1.6605779e-15;
  kExImRB1_E2F_Ser807_Ser811p__1 = 1.6605779e-15;
  kImImPPP2R2B_ENSA_ARPP19__1 = 1.6605779e-15;
  kExImPPP2R2B_ENSA_ARPP19__1 = 1.6605779e-15;
  kImImAPC_FBXO5_FZR1_CDC20_Ser355u__1 = 1.6605779e-15;
  kExImAPC_FBXO5_FZR1_CDC20_Ser355u__1 = 1.6605779e-15;
  kImImCDC20_APC__1 = 1.6605779e-15;
  kExImCDC20_APC__1 = 1.6605779e-15;
  kImImAPC_FBXO5_FZR1_CDC201_Ser355p__CDC20_APC1__1 = 1.6605779e-15;
  kExImAPC_FBXO5_FZR1_CDC201_Ser355p__CDC20_APC1__1 = 1.6605779e-15;
  kImImAPC_FBXO5_FZR1_CDC20_Ser355p__1 = 1.6605779e-15;
  kExImAPC_FBXO5_FZR1_CDC20_Ser355p__1 = 1.6605779e-15;
  kImImAPC_FBXO5_FZR1_CDC201_Ser355u__FZR1_APC1_FBXO5_nTermu__1 = 1.6605779e-15;
  kExImAPC_FBXO5_FZR1_CDC201_Ser355u__FZR1_APC1_FBXO5_nTermu__1 = 1.6605779e-15;
  kImImFZR1_APC_FBXO5_nTermu__1 = 1.6605779e-15;
  kExImFZR1_APC_FBXO5_nTermu__1 = 1.6605779e-15;
  kImImFZR1_APC_FBXO5_nTermp__1 = 1.6605779e-15;
  kExImFZR1_APC_FBXO5_nTermp__1 = 1.6605779e-15;
  kImImAPC_FBXO51_FZR1_CDC202_Ser355u__FBXO5_APC1_FZR13_Ser182u__FZR1_APC2_FBXO53_nTermu__1 = 1.6605779e-15;
  kExImAPC_FBXO51_FZR1_CDC202_Ser355u__FBXO5_APC1_FZR13_Ser182u__FZR1_APC2_FBXO53_nTermu__1 = 1.6605779e-15;
  kImImFBXO5_APC_FZR1_Ser182u__1 = 1.6605779e-15;
  kExImFBXO5_APC_FZR1_Ser182u__1 = 1.6605779e-15;
  kImImAPC_FBXO51_FZR1_CDC202_Ser355p__FBXO5_APC1_FZR13_Ser182u__FZR1_APC2_FBXO53_nTermu__1 = 1.6605779e-15;
  kExImAPC_FBXO51_FZR1_CDC202_Ser355p__FBXO5_APC1_FZR13_Ser182u__FZR1_APC2_FBXO53_nTermu__1 = 1.6605779e-15;
  kImImAPC_FBXO5_FZR1_CDC201_Ser355p__FZR1_APC1_FBXO5_nTermu__1 = 1.6605779e-15;
  kExImAPC_FBXO5_FZR1_CDC201_Ser355p__FZR1_APC1_FBXO5_nTermu__1 = 1.6605779e-15;
  kImImFBXO5_APC_FZR1_Ser182p__1 = 1.6605779e-15;
  kExImFBXO5_APC_FZR1_Ser182p__1 = 1.6605779e-15;
  kImImFOXM1_DBD_Thr600u__1 = 1.6605779e-15;
  kExImFOXM1_DBD_Thr600u__1 = 1.6605779e-15;
  kImImFOXM1_DBD_Thr600p__1 = 1.6605779e-15;
  kExImFOXM1_DBD_Thr600p__1 = 1.6605779e-15;
  kImImWEE1_Ser123u__1 = 1.6605779e-15;
  kExImWEE1_Ser123u__1 = 1.6605779e-15;
  kImImCCNB_CDK1_Thr14_Tyr15p_CDKN1A__1 = 1.6605779e-15;
  kExImCCNB_CDK1_Thr14_Tyr15p_CDKN1A__1 = 1.6605779e-15;
  kImImWEE1_Ser123p__1 = 1.6605779e-15;
  kExImWEE1_Ser123p__1 = 1.6605779e-15;
  kImImCDC25_pSitesp__1 = 1.6605779e-15;
  kExImCDC25_pSitesp__1 = 1.6605779e-15;
  kImImCDC25_pSitesu__1 = 1.6605779e-15;
  kExImCDC25_pSitesu__1 = 1.6605779e-15;
  kImImMASTL_Thr198u__1 = 1.6605779e-15;
  kExImMASTL_Thr198u__1 = 1.6605779e-15;
  kImImMASTL_Thr198p__1 = 1.6605779e-15;
  kExImMASTL_Thr198p__1 = 1.6605779e-15;
  kImImENSA_ARPP19_PPP2R2B_Ser62_Ser67u__1 = 1.6605779e-15;
  kExImENSA_ARPP19_PPP2R2B_Ser62_Ser67u__1 = 1.6605779e-15;
  kImImENSA_ARPP19_PPP2R2B_Ser62_Ser67p__1 = 1.6605779e-15;
  kExImENSA_ARPP19_PPP2R2B_Ser62_Ser67p__1 = 1.6605779e-15;
  kImImENSA_ARPP19_PPP2R2B1_Ser62_Ser67p__PPP2R2B_ENSA_ARPP191__1 = 1.6605779e-15;
  kExImENSA_ARPP19_PPP2R2B1_Ser62_Ser67p__PPP2R2B_ENSA_ARPP191__1 = 1.6605779e-15;
  kImImiWEE_1 = 1.6605779e-15;
  kExImiWEE_1 = 1.6605779e-15;
  kImImSKP2_1 = 1.6605779e-15;
  kExImSKP2_1 = 1.6605779e-15;
  kImImTP53_DBD_Ser15p__1 = 1.6605779e-15;
  kExImTP53_DBD_Ser15p__1 = 1.6605779e-15;
  kImImFOXO_DBD__1 = 1.6605779e-15;
  kExImFOXO_DBD__1 = 1.6605779e-15;
  kImImCDKN1A_CCNE_A_B_Ser130u__1 = 1.6605779e-15;
  kExImCDKN1A_CCNE_A_B_Ser130u__1 = 1.6605779e-15;
  kImImCDKN1B_CCNE_A_Thr187u__1 = 1.6605779e-15;
  kExImCDKN1B_CCNE_A_Thr187u__1 = 1.6605779e-15;
  kImImCCNA_CDKN1A_B1__CDKN1A_CCNE_A_B1_Ser130u__1 = 1.6605779e-15;
  kExImCCNA_CDKN1A_B1__CDKN1A_CCNE_A_B1_Ser130u__1 = 1.6605779e-15;
  kImImCCNE_CDKN1A_B1__CDKN1A_CCNE_A_B1_Ser130u__1 = 1.6605779e-15;
  kExImCCNE_CDKN1A_B1__CDKN1A_CCNE_A_B1_Ser130u__1 = 1.6605779e-15;
  kImImCCNB_CDK1_Thr14_Tyr15u_CDKN1A1__CDKN1A_CCNE_A_B1_Ser130u__1 = 1.6605779e-15;
  kExImCCNB_CDK1_Thr14_Tyr15u_CDKN1A1__CDKN1A_CCNE_A_B1_Ser130u__1 = 1.6605779e-15;
  kImImCCNB_CDK1_Thr14_Tyr15p_CDKN1A1__CDKN1A_CCNE_A_B1_Ser130u__1 = 1.6605779e-15;
  kExImCCNB_CDK1_Thr14_Tyr15p_CDKN1A1__CDKN1A_CCNE_A_B1_Ser130u__1 = 1.6605779e-15;
  kImImCDKN1A_CCNE_A_B_Ser130p__1 = 1.6605779e-15;
  kExImCDKN1A_CCNE_A_B_Ser130p__1 = 1.6605779e-15;
  kImImCCNA_CDKN1A_B1__CDKN1B_CCNE_A1_Thr187u__1 = 1.6605779e-15;
  kExImCCNA_CDKN1A_B1__CDKN1B_CCNE_A1_Thr187u__1 = 1.6605779e-15;
  kImImCCNE_CDKN1A_B1__CDKN1B_CCNE_A1_Thr187u__1 = 1.6605779e-15;
  kExImCCNE_CDKN1A_B1__CDKN1B_CCNE_A1_Thr187u__1 = 1.6605779e-15;
  kImImCDKN1B_CCNE_A_Thr187p__1 = 1.6605779e-15;
  kExImCDKN1B_CCNE_A_Thr187p__1 = 1.6605779e-15;
  kImImCCNA_CDKN1A_B1__CDKN1B_CCNE_A1_Thr187p__1 = 1.6605779e-15;
  kExImCCNA_CDKN1A_B1__CDKN1B_CCNE_A1_Thr187p__1 = 1.6605779e-15;
  kImImCCNE_CDKN1A_B1__CDKN1B_CCNE_A1_Thr187p__1 = 1.6605779e-15;
  kExImCCNE_CDKN1A_B1__CDKN1B_CCNE_A1_Thr187p__1 = 1.6605779e-15;
  kIm_2 = 1.6605779e-14;
  kEx_2 = 1.6605779e-14;
  _InitialConc1 = 6.022e11;
  _InitialConc2 = 1.3986043e11;
  _InitialConc3 = 1.1128068e10;
  _InitialConc4 = 22932894;
  _InitialConc5 = 4.2325597e9;
  _InitialConc6 = 1.133559e9;
  _InitialConc7 = 4.3034014e10;
  _InitialConc8 = 90654340;
  _InitialConc9 = 5.2778426e10;
  _InitialConc10 = 5.0629691e11;
  _InitialConc11 = 4.6484797e10;
  _InitialConc12 = 2.4260911e12;
  _InitialConc13 = 1.3847757e11;
  _InitialConc14 = 4.2087805e10;
  _InitialConc15 = 3.7993439e10;
  _InitialConc16 = 4.2969631e11;
  _InitialConc17 = 3.4406152e8;
  _InitialConc18 = 9.7028319e10;
  _InitialConc19 = 6.5604459e10;
  _InitialConc20 = 4.3226888e8;
  _InitialConc21 = 1.3323959e9;
  _InitialConc22 = 8.1944566e9;
  _InitialConc23 = 11324333;
  _InitialConc24 = 3.3510826e9;
  _InitialConc25 = 2.2950816e8;
  _InitialConc26 = 5.9042195e11;
  _InitialConc27 = 4.5242773e9;
  _InitialConc28 = 1.1778049e10;
  _InitialConc29 = 1.1103404e10;
  _InitialConc30 = 5.910966e11;
  _InitialConc31 = 6.0070998e11;
  _InitialConc32 = 1.4900204e9;
  _InitialConc33 = 4.9793694e11;
  _InitialConc34 = 1.9785953e8;
  _InitialConc35 = 1.040652e11;
  _InitialConc36 = 0;
  _InitialConc37 = 6.022e11;
  _InitialConc38 = 0;
  _InitialConc39 = 6.022e11;
  _InitialConc40 = 2980.89;
  _InitialConc41 = 6.022e11;
  _InitialConc42 = 1.3986043e11;
  _InitialConc43 = 1.1128068e10;
  _InitialConc44 = 22932894;
  _InitialConc45 = 4.2325597e9;
  _InitialConc46 = 1.133559e9;
  _InitialConc47 = 4.3034014e10;
  _InitialConc48 = 90654340;
  _InitialConc49 = 5.2778426e10;
  _InitialConc50 = 5.0629691e11;
  _InitialConc51 = 4.6484797e10;
  _InitialConc52 = 2.4260911e12;
  _InitialConc53 = 1.3847757e11;
  _InitialConc54 = 4.2087805e10;
  _InitialConc55 = 3.7993439e10;
  _InitialConc56 = 4.2969631e11;
  _InitialConc57 = 3.4406152e8;
  _InitialConc58 = 9.7028319e10;
  _InitialConc59 = 6.5604459e10;
  _InitialConc60 = 4.3226888e8;
  _InitialConc61 = 1.3323959e9;
  _InitialConc62 = 8.1944566e9;
  _InitialConc63 = 11324333;
  _InitialConc64 = 3.3510826e9;
  _InitialConc65 = 2.2950816e8;
  _InitialConc66 = 114614.27;
  _InitialConc67 = 60105386;
  _InitialConc68 = 60174121;
  _InitialConc69 = 45878.816;
  _InitialConc70 = 5.9042195e11;
  _InitialConc71 = 4.5242773e9;
  _InitialConc72 = 1.1778049e10;
  _InitialConc73 = 1.1103404e10;
  _InitialConc74 = 5.910966e11;
  _InitialConc75 = 6.0070998e11;
  _InitialConc76 = 1.4900204e9;
  _InitialConc77 = 4.9793694e11;
  _InitialConc78 = 1.9785953e8;
  _InitialConc79 = 1.040652e11;
  _InitialConc80 = 50873268;
  _InitialConc81 = 50873268;
  _InitialConc82 = 50873268;
  _InitialConc83 = 50873268;
  _InitialConc84 = 50873268;
  _InitialConc85 = 9346731.7;
  _InitialConc86 = 9346731.7;
  _InitialConc87 = 9346731.7;
  _InitialConc88 = 9346731.7;
  _InitialConc89 = 9346731.7;
  _InitialConc90 = 0;
  _InitialConc91 = 0;
  _InitialConc92 = 0;
  _InitialConc93 = 0;
  _InitialConc94 = 0;
  _InitialConc95 = 0;
  _InitialConc96 = 6.022e11;
  _InitialConc97 = 0;
  _InitialConc98 = 60220000;
  _InitialConc99 = 6.022e11;
  _InitialConc100 = 60220000;
  _rateLaw3 = 0;
  _rateLaw1 = kSyCb1*ikSyCb;
  _rateLaw2 = kSyCb2*ikSyCb;

  // Assignment rules:
  tCCNE := Cyt_CCNE_CDKN1A_B + Nuc_CCNE_CDKN1A_B + S106 + S111 + S116 + S122 + S123 + S126;
  tCCNA := Cyt_CCNA_CDKN1A_B + Nuc_CCNA_CDKN1A_B + S105 + S110 + S115 + S120 + S121 + S125;
  tCCNB := S6 + S27 + S46 + S71 + S107 + S108 + S117 + S118;
  tCDKN1A := Cyt_CDKN1A_CCNE_A_B_Ser130_u + S105 + S106 + S107 + S108 + Cyt_CDKN1A_CCNE_A_B_Ser130_p + Nuc_CDKN1A_CCNE_A_B_Ser130_u + S115 + S116 + S117 + S118 + Nuc_CDKN1A_CCNE_A_B_Ser130_p;
  tCDKN1B := Cyt_CDKN1B_CCNE_A_Thr187_u + S110 + S111 + Cyt_CDKN1B_CCNE_A_Thr187_p + Nuc_CDKN1B_CCNE_A_Thr187_u + S120 + S121 + S122 + S123 + Nuc_CDKN1B_CCNE_A_Thr187_p + S125 + S126;
  tSKP2 := Cyt_SKP2 + Nuc_SKP2;
  ApcCdh := S16 + S22 + S56 + S62;
  aCCNB := S6 + S46;

  // Reactions:
  R1: => Cyt_E2F_DBD_RB1_Ser332_u; kSyE2f1;
  R2: Nuc_FOXM1_DBD_Thr600_p + Nuc_CCNB_promoter_FOXM1 => S66; kAsFPcb*Nuc_FOXM1_DBD_Thr600_p*Nuc_CCNB_promoter_FOXM1;
  R3: S66 => Nuc_FOXM1_DBD_Thr600_p + Nuc_CCNB_promoter_FOXM1; kDiFPcb*S66;
  R4: S87 => Cyt_E2F_DBD_RB1_Ser332_u + S87; kSyE2f2*S87;
  R5: S92 => Cyt_E2F_DBD_RB1_Ser332_u + S92; kSyE2f2*S92;
  R6: Cyt_E2F_DBD_RB1_Ser332_u => ; kDeE2f1*Cyt_E2F_DBD_RB1_Ser332_u;
  R7: Cyt_E2F_DBD_RB1_Ser332_p => ; kDeE2f1*Cyt_E2F_DBD_RB1_Ser332_p;
  R8: S7 => Cyt_RB1_E2F_Ser807_Ser811_u; kDeE2f1*S7;
  R9: S8 => Cyt_RB1_E2F_Ser807_Ser811_u; kDeE2f1*S8;
  R10: Nuc_E2F_DBD_RB1_Ser332_u => ; kDeE2f1*Nuc_E2F_DBD_RB1_Ser332_u;
  R11: Nuc_E2F_DBD_RB1_Ser332_p => ; kDeE2f1*Nuc_E2F_DBD_RB1_Ser332_p;
  R12: S47 => Nuc_RB1_E2F_Ser807_Ser811_u; kDeE2f1*S47;
  R13: S48 => Nuc_RB1_E2F_Ser807_Ser811_u; kDeE2f1*S48;
  R14: S85 => Nuc_CCNE_promoter_E2F; kDeE2f1*S85;
  R15: S86 => Nuc_CCNA_promoter_E2F; kDeE2f1*S86;
  R16: S87 => Nuc_E2F_promoter_E2F; kDeE2f1*S87;
  R17: S88 => Nuc_FBXO5_promoter_E2F; kDeE2f1*S88;
  R18: S89 => Nuc_FOXM1_promoter_E2F; kDeE2f1*S89;
  R19: S90 => Nuc_CCNE_promoter_E2F; kDeE2f1*S90;
  R20: S91 => Nuc_CCNA_promoter_E2F; kDeE2f1*S91;
  R21: S92 => Nuc_E2F_promoter_E2F; kDeE2f1*S92;
  R22: S93 => Nuc_FBXO5_promoter_E2F; kDeE2f1*S93;
  R23: S94 => Nuc_FOXM1_promoter_E2F; kDeE2f1*S94;
  R24: Cyt_CCND + S7 => Cyt_CCND + Cyt_E2F_DBD_RB1_Ser332_u + Cyt_RB1_E2F_Ser807_Ser811_p; kPhRbD*Cyt_CCND*S7;
  R25: Cyt_CCND + S8 => Cyt_CCND + Cyt_E2F_DBD_RB1_Ser332_p + Cyt_RB1_E2F_Ser807_Ser811_p; kPhRbD*Cyt_CCND*S8;
  R26: Nuc_CCND + S47 => Nuc_CCND + Nuc_E2F_DBD_RB1_Ser332_u + Nuc_RB1_E2F_Ser807_Ser811_p; kPhRbD*Nuc_CCND*S47;
  R27: Nuc_CCND + S48 => Nuc_CCND + Nuc_E2F_DBD_RB1_Ser332_p + Nuc_RB1_E2F_Ser807_Ser811_p; kPhRbD*Nuc_CCND*S48;
  R28: Cyt_CCNE_CDKN1A_B + S7 => Cyt_CCNE_CDKN1A_B + Cyt_E2F_DBD_RB1_Ser332_u + Cyt_RB1_E2F_Ser807_Ser811_p; kPhRbE*Cyt_CCNE_CDKN1A_B*S7;
  R29: Cyt_CCNE_CDKN1A_B + S8 => Cyt_CCNE_CDKN1A_B + Cyt_E2F_DBD_RB1_Ser332_p + Cyt_RB1_E2F_Ser807_Ser811_p; kPhRbE*Cyt_CCNE_CDKN1A_B*S8;
  R30: Nuc_CCNE_CDKN1A_B + S47 => Nuc_CCNE_CDKN1A_B + Nuc_E2F_DBD_RB1_Ser332_u + Nuc_RB1_E2F_Ser807_Ser811_p; kPhRbE*Nuc_CCNE_CDKN1A_B*S47;
  R31: Nuc_CCNE_CDKN1A_B + S48 => Nuc_CCNE_CDKN1A_B + Nuc_E2F_DBD_RB1_Ser332_p + Nuc_RB1_E2F_Ser807_Ser811_p; kPhRbE*Nuc_CCNE_CDKN1A_B*S48;
  R32: Cyt_CCNA_CDKN1A_B + S7 => Cyt_E2F_DBD_RB1_Ser332_u + Cyt_CCNA_CDKN1A_B + Cyt_RB1_E2F_Ser807_Ser811_p; kPhRb*Cyt_CCNA_CDKN1A_B*S7;
  R33: Cyt_CCNA_CDKN1A_B + S8 => Cyt_E2F_DBD_RB1_Ser332_p + Cyt_CCNA_CDKN1A_B + Cyt_RB1_E2F_Ser807_Ser811_p; kPhRb*Cyt_CCNA_CDKN1A_B*S8;
  R34: Nuc_CCNA_CDKN1A_B + S47 => Nuc_E2F_DBD_RB1_Ser332_u + Nuc_CCNA_CDKN1A_B + Nuc_RB1_E2F_Ser807_Ser811_p; kPhRb*Nuc_CCNA_CDKN1A_B*S47;
  R35: Nuc_CCNA_CDKN1A_B + S48 => Nuc_E2F_DBD_RB1_Ser332_p + Nuc_CCNA_CDKN1A_B + Nuc_RB1_E2F_Ser807_Ser811_p; kPhRb*Nuc_CCNA_CDKN1A_B*S48;
  R36: S6 + S7 => Cyt_E2F_DBD_RB1_Ser332_u + S6 + Cyt_RB1_E2F_Ser807_Ser811_p; kPhRb*S6*S7;
  R37: S6 + S8 => Cyt_E2F_DBD_RB1_Ser332_p + S6 + Cyt_RB1_E2F_Ser807_Ser811_p; kPhRb*S6*S8;
  R38: S46 + S47 => Nuc_E2F_DBD_RB1_Ser332_u + S46 + Nuc_RB1_E2F_Ser807_Ser811_p; kPhRb*S46*S47;
  R39: S46 + S48 => Nuc_E2F_DBD_RB1_Ser332_p + S46 + Nuc_RB1_E2F_Ser807_Ser811_p; kPhRb*S46*S48;
  R40: Cyt_E2F_DBD_RB1_Ser332_u + Cyt_CCNA_CDKN1A_B => Cyt_E2F_DBD_RB1_Ser332_p + Cyt_CCNA_CDKN1A_B; kPhE2f*Cyt_E2F_DBD_RB1_Ser332_u*Cyt_CCNA_CDKN1A_B;
  R41: Cyt_CCNA_CDKN1A_B + S7 => Cyt_CCNA_CDKN1A_B + S8; kPhE2f*Cyt_CCNA_CDKN1A_B*S7;
  R42: Nuc_E2F_DBD_RB1_Ser332_u + Nuc_CCNA_CDKN1A_B => Nuc_E2F_DBD_RB1_Ser332_p + Nuc_CCNA_CDKN1A_B; kPhE2f*Nuc_E2F_DBD_RB1_Ser332_u*Nuc_CCNA_CDKN1A_B;
  R43: Nuc_CCNA_CDKN1A_B + S47 => Nuc_CCNA_CDKN1A_B + S48; kPhE2f*Nuc_CCNA_CDKN1A_B*S47;
  R44: Nuc_CCNA_CDKN1A_B + S85 => Nuc_CCNA_CDKN1A_B + S90; kPhE2f*Nuc_CCNA_CDKN1A_B*S85;
  R45: Nuc_CCNA_CDKN1A_B + S86 => Nuc_CCNA_CDKN1A_B + S91; kPhE2f*Nuc_CCNA_CDKN1A_B*S86;
  R46: Nuc_CCNA_CDKN1A_B + S87 => Nuc_CCNA_CDKN1A_B + S92; kPhE2f*Nuc_CCNA_CDKN1A_B*S87;
  R47: Nuc_CCNA_CDKN1A_B + S88 => Nuc_CCNA_CDKN1A_B + S93; kPhE2f*Nuc_CCNA_CDKN1A_B*S88;
  R48: Nuc_CCNA_CDKN1A_B + S89 => Nuc_CCNA_CDKN1A_B + S94; kPhE2f*Nuc_CCNA_CDKN1A_B*S89;
  R49: Cyt_E2F_DBD_RB1_Ser332_u + S6 => Cyt_E2F_DBD_RB1_Ser332_p + S6; kPhE2f*Cyt_E2F_DBD_RB1_Ser332_u*S6;
  R50: S6 + S7 => S6 + S8; kPhE2f*S6*S7;
  R51: Nuc_E2F_DBD_RB1_Ser332_u + S46 => Nuc_E2F_DBD_RB1_Ser332_p + S46; kPhE2f*Nuc_E2F_DBD_RB1_Ser332_u*S46;
  R52: S46 + S47 => S46 + S48; kPhE2f*S46*S47;
  R53: S46 + S85 => S46 + S90; kPhE2f*S46*S85;
  R54: S46 + S86 => S46 + S91; kPhE2f*S46*S86;
  R55: S46 + S87 => S46 + S92; kPhE2f*S46*S87;
  R56: S46 + S88 => S46 + S93; kPhE2f*S46*S88;
  R57: S46 + S89 => S46 + S94; kPhE2f*S46*S89;
  R58: Cyt_E2F_DBD_RB1_Ser332_p => Cyt_E2F_DBD_RB1_Ser332_u; kDpE2f1*Cyt_E2F_DBD_RB1_Ser332_p;
  R59: S8 => S7; kDpE2f1*S8;
  R60: Nuc_E2F_DBD_RB1_Ser332_p => Nuc_E2F_DBD_RB1_Ser332_u; kDpE2f1*Nuc_E2F_DBD_RB1_Ser332_p;
  R61: S48 => S47; kDpE2f1*S48;
  R62: S90 => S85; kDpE2f1*S90;
  R63: S91 => S86; kDpE2f1*S91;
  R64: S92 => S87; kDpE2f1*S92;
  R65: S93 => S88; kDpE2f1*S93;
  R66: S94 => S89; kDpE2f1*S94;
  R67: Cyt_E2F_DBD_RB1_Ser332_p + Cyt_PPP2R2B_ENSA_ARPP19 => Cyt_E2F_DBD_RB1_Ser332_u + Cyt_PPP2R2B_ENSA_ARPP19; kDpE2f2*Cyt_E2F_DBD_RB1_Ser332_p*Cyt_PPP2R2B_ENSA_ARPP19;
  R68: S8 + Cyt_PPP2R2B_ENSA_ARPP19 => S7 + Cyt_PPP2R2B_ENSA_ARPP19; kDpE2f2*S8*Cyt_PPP2R2B_ENSA_ARPP19;
  R69: Nuc_E2F_DBD_RB1_Ser332_p + Nuc_PPP2R2B_ENSA_ARPP19 => Nuc_E2F_DBD_RB1_Ser332_u + Nuc_PPP2R2B_ENSA_ARPP19; kDpE2f2*Nuc_E2F_DBD_RB1_Ser332_p*Nuc_PPP2R2B_ENSA_ARPP19;
  R70: S48 + Nuc_PPP2R2B_ENSA_ARPP19 => S47 + Nuc_PPP2R2B_ENSA_ARPP19; kDpE2f2*S48*Nuc_PPP2R2B_ENSA_ARPP19;
  R71: Nuc_PPP2R2B_ENSA_ARPP19 + S90 => Nuc_PPP2R2B_ENSA_ARPP19 + S85; kDpE2f2*Nuc_PPP2R2B_ENSA_ARPP19*S90;
  R72: Nuc_PPP2R2B_ENSA_ARPP19 + S91 => Nuc_PPP2R2B_ENSA_ARPP19 + S86; kDpE2f2*Nuc_PPP2R2B_ENSA_ARPP19*S91;
  R73: Nuc_PPP2R2B_ENSA_ARPP19 + S92 => Nuc_PPP2R2B_ENSA_ARPP19 + S87; kDpE2f2*Nuc_PPP2R2B_ENSA_ARPP19*S92;
  R74: Nuc_PPP2R2B_ENSA_ARPP19 + S93 => Nuc_PPP2R2B_ENSA_ARPP19 + S88; kDpE2f2*Nuc_PPP2R2B_ENSA_ARPP19*S93;
  R75: Nuc_PPP2R2B_ENSA_ARPP19 + S94 => Nuc_PPP2R2B_ENSA_ARPP19 + S89; kDpE2f2*Nuc_PPP2R2B_ENSA_ARPP19*S94;
  R76: Cyt_E2F_DBD_RB1_Ser332_p + Cyt_SKP2 => Cyt_SKP2; kDeE2f2*Cyt_E2F_DBD_RB1_Ser332_p*Cyt_SKP2;
  R77: S8 + Cyt_SKP2 => Cyt_RB1_E2F_Ser807_Ser811_u + Cyt_SKP2; kDeE2f2*S8*Cyt_SKP2;
  R78: Nuc_E2F_DBD_RB1_Ser332_p + Nuc_SKP2 => Nuc_SKP2; kDeE2f2*Nuc_E2F_DBD_RB1_Ser332_p*Nuc_SKP2;
  R79: S48 + Nuc_SKP2 => Nuc_RB1_E2F_Ser807_Ser811_u + Nuc_SKP2; kDeE2f2*S48*Nuc_SKP2;
  R80: S90 + Nuc_SKP2 => Nuc_CCNE_promoter_E2F + Nuc_SKP2; kDeE2f2*S90*Nuc_SKP2;
  R81: S91 + Nuc_SKP2 => Nuc_CCNA_promoter_E2F + Nuc_SKP2; kDeE2f2*S91*Nuc_SKP2;
  R82: S92 + Nuc_SKP2 => Nuc_E2F_promoter_E2F + Nuc_SKP2; kDeE2f2*S92*Nuc_SKP2;
  R83: S93 + Nuc_SKP2 => Nuc_FBXO5_promoter_E2F + Nuc_SKP2; kDeE2f2*S93*Nuc_SKP2;
  R84: S94 + Nuc_SKP2 => Nuc_FOXM1_promoter_E2F + Nuc_SKP2; kDeE2f2*S94*Nuc_SKP2;
  R85: Cyt_CCND + Cyt_RB1_E2F_Ser807_Ser811_u => Cyt_CCND + Cyt_RB1_E2F_Ser807_Ser811_p; kPhRbD*Cyt_CCND*Cyt_RB1_E2F_Ser807_Ser811_u;
  R86: Nuc_CCND + Nuc_RB1_E2F_Ser807_Ser811_u => Nuc_CCND + Nuc_RB1_E2F_Ser807_Ser811_p; kPhRbD*Nuc_CCND*Nuc_RB1_E2F_Ser807_Ser811_u;
  R87: Cyt_CCNE_CDKN1A_B + Cyt_RB1_E2F_Ser807_Ser811_u => Cyt_CCNE_CDKN1A_B + Cyt_RB1_E2F_Ser807_Ser811_p; kPhRbE*Cyt_CCNE_CDKN1A_B*Cyt_RB1_E2F_Ser807_Ser811_u;
  R88: Nuc_CCNE_CDKN1A_B + Nuc_RB1_E2F_Ser807_Ser811_u => Nuc_CCNE_CDKN1A_B + Nuc_RB1_E2F_Ser807_Ser811_p; kPhRbE*Nuc_CCNE_CDKN1A_B*Nuc_RB1_E2F_Ser807_Ser811_u;
  R89: Cyt_CCNA_CDKN1A_B + Cyt_RB1_E2F_Ser807_Ser811_u => Cyt_CCNA_CDKN1A_B + Cyt_RB1_E2F_Ser807_Ser811_p; kPhRb*Cyt_CCNA_CDKN1A_B*Cyt_RB1_E2F_Ser807_Ser811_u;
  R90: Nuc_CCNA_CDKN1A_B + Nuc_RB1_E2F_Ser807_Ser811_u => Nuc_CCNA_CDKN1A_B + Nuc_RB1_E2F_Ser807_Ser811_p; kPhRb*Nuc_CCNA_CDKN1A_B*Nuc_RB1_E2F_Ser807_Ser811_u;
  R91: S6 + Cyt_RB1_E2F_Ser807_Ser811_u => S6 + Cyt_RB1_E2F_Ser807_Ser811_p; kPhRb*S6*Cyt_RB1_E2F_Ser807_Ser811_u;
  R92: S46 + Nuc_RB1_E2F_Ser807_Ser811_u => S46 + Nuc_RB1_E2F_Ser807_Ser811_p; kPhRb*S46*Nuc_RB1_E2F_Ser807_Ser811_u;
  R93: => Cyt_CCNE_CDKN1A_B; kSyCe1;
  R94: S86 => Cyt_CCNA_CDKN1A_B + S86; kSyCa2*S86;
  R95: S91 => Cyt_CCNA_CDKN1A_B + S91; kSyCa2*S91;
  R96: Cyt_CCNE_CDKN1A_B => ; kDeCe*Cyt_CCNE_CDKN1A_B;
  R97: Nuc_CCNE_CDKN1A_B => ; kDeCe*Nuc_CCNE_CDKN1A_B;
  R98: Cyt_CCNE_CDKN1A_B + Cyt_CCNE_CDKN1A_B => Cyt_CCNE_CDKN1A_B; kPhCeE*Cyt_CCNE_CDKN1A_B*Cyt_CCNE_CDKN1A_B;
  R99: Nuc_CCNE_CDKN1A_B + Nuc_CCNE_CDKN1A_B => Nuc_CCNE_CDKN1A_B; kPhCeE*Nuc_CCNE_CDKN1A_B*Nuc_CCNE_CDKN1A_B;
  R100: Cyt_RB1_E2F_Ser807_Ser811_p => Cyt_RB1_E2F_Ser807_Ser811_u; kDpRb*Cyt_RB1_E2F_Ser807_Ser811_p;
  R101: Nuc_RB1_E2F_Ser807_Ser811_p => Nuc_RB1_E2F_Ser807_Ser811_u; kDpRb*Nuc_RB1_E2F_Ser807_Ser811_p;
  R102: S14 => S12 + Cyt_CDC20_APC; kDpApc_1*S14;
  R103: S54 => S52 + Nuc_CDC20_APC; kDpApc_1*S54;
  R104: Cyt_PPP2R2B_ENSA_ARPP19 + S14 => Cyt_PPP2R2B_ENSA_ARPP19 + S12 + Cyt_CDC20_APC; kDpApc_2*Cyt_PPP2R2B_ENSA_ARPP19*S14;
  R105: Nuc_PPP2R2B_ENSA_ARPP19 + S54 => Nuc_PPP2R2B_ENSA_ARPP19 + S52 + Nuc_CDC20_APC; kDpApc_2*Nuc_PPP2R2B_ENSA_ARPP19*S54;
  R106: Cyt_CCNA_CDKN1A_B + S12 => Cyt_CCNA_CDKN1A_B + S15; kPhApcA*Cyt_CCNA_CDKN1A_B*S12;
  R107: Cyt_CCNA_CDKN1A_B + S16 => Cyt_CCNA_CDKN1A_B + S22; kPhApcA*Cyt_CCNA_CDKN1A_B*S16;
  R108: Cyt_CCNA_CDKN1A_B + S19 => Cyt_CCNA_CDKN1A_B + S21; kPhApcA*Cyt_CCNA_CDKN1A_B*S19;
  R109: Nuc_CCNA_CDKN1A_B + S52 => Nuc_CCNA_CDKN1A_B + S55; kPhApcA*Nuc_CCNA_CDKN1A_B*S52;
  R110: Nuc_CCNA_CDKN1A_B + S56 => Nuc_CCNA_CDKN1A_B + S62; kPhApcA*Nuc_CCNA_CDKN1A_B*S56;
  R111: Nuc_CCNA_CDKN1A_B + S59 => Nuc_CCNA_CDKN1A_B + S61; kPhApcA*Nuc_CCNA_CDKN1A_B*S59;
  R112: S6 + S12 => S6 + S15; kPhApcA*S6*S12;
  R113: S6 + S16 => S6 + S22; kPhApcA*S6*S16;
  R114: S6 + S19 => S6 + S21; kPhApcA*S6*S19;
  R115: S46 + S52 => S46 + S55; kPhApcA*S46*S52;
  R116: S46 + S56 => S46 + S62; kPhApcA*S46*S56;
  R117: S46 + S59 => S46 + S61; kPhApcA*S46*S59;
  R118: S15 => S12; kDpApc_1*S15;
  R119: S21 => S19; kDpApc_1*S21;
  R120: S22 => S16; kDpApc_1*S22;
  R121: S55 => S52; kDpApc_1*S55;
  R122: S61 => S59; kDpApc_1*S61;
  R123: S62 => S56; kDpApc_1*S62;
  R124: Cyt_PPP2R2B_ENSA_ARPP19 + S15 => Cyt_PPP2R2B_ENSA_ARPP19 + S12; kDpApc_2*Cyt_PPP2R2B_ENSA_ARPP19*S15;
  R125: Cyt_PPP2R2B_ENSA_ARPP19 + S21 => Cyt_PPP2R2B_ENSA_ARPP19 + S19; kDpApc_2*Cyt_PPP2R2B_ENSA_ARPP19*S21;
  R126: Cyt_PPP2R2B_ENSA_ARPP19 + S22 => Cyt_PPP2R2B_ENSA_ARPP19 + S16; kDpApc_2*Cyt_PPP2R2B_ENSA_ARPP19*S22;
  R127: Nuc_PPP2R2B_ENSA_ARPP19 + S55 => Nuc_PPP2R2B_ENSA_ARPP19 + S52; kDpApc_2*Nuc_PPP2R2B_ENSA_ARPP19*S55;
  R128: Nuc_PPP2R2B_ENSA_ARPP19 + S61 => Nuc_PPP2R2B_ENSA_ARPP19 + S59; kDpApc_2*Nuc_PPP2R2B_ENSA_ARPP19*S61;
  R129: Nuc_PPP2R2B_ENSA_ARPP19 + S62 => Nuc_PPP2R2B_ENSA_ARPP19 + S56; kDpApc_2*Nuc_PPP2R2B_ENSA_ARPP19*S62;
  R130: Cyt_CCNA_CDKN1A_B + S16 => Cyt_CCNA_CDKN1A_B + S12 + Cyt_FZR1_APC_FBXO5_nTerm_p; kPhCdhA*Cyt_CCNA_CDKN1A_B*S16;
  R131: Cyt_CCNA_CDKN1A_B + S22 => Cyt_CCNA_CDKN1A_B + S15 + Cyt_FZR1_APC_FBXO5_nTerm_p; kPhCdhA*Cyt_CCNA_CDKN1A_B*S22;
  R132: Nuc_CCNA_CDKN1A_B + S56 => Nuc_CCNA_CDKN1A_B + S52 + Nuc_FZR1_APC_FBXO5_nTerm_p; kPhCdhA*Nuc_CCNA_CDKN1A_B*S56;
  R133: Nuc_CCNA_CDKN1A_B + S62 => Nuc_CCNA_CDKN1A_B + S55 + Nuc_FZR1_APC_FBXO5_nTerm_p; kPhCdhA*Nuc_CCNA_CDKN1A_B*S62;
  R134: Cyt_CCNE_CDKN1A_B + S19 => Cyt_CCNE_CDKN1A_B + S12 + Cyt_FZR1_APC_FBXO5_nTerm_p + Cyt_FBXO5_APC_FZR1_Ser182_u; kPhCAEE*Cyt_CCNE_CDKN1A_B*S19;
  R135: Cyt_CCNE_CDKN1A_B + S21 => Cyt_CCNE_CDKN1A_B + S15 + Cyt_FZR1_APC_FBXO5_nTerm_p + Cyt_FBXO5_APC_FZR1_Ser182_u; kPhCAEE*Cyt_CCNE_CDKN1A_B*S21;
  R136: Nuc_CCNE_CDKN1A_B + S59 => Nuc_CCNE_CDKN1A_B + S52 + Nuc_FZR1_APC_FBXO5_nTerm_p + Nuc_FBXO5_APC_FZR1_Ser182_u; kPhCAEE*Nuc_CCNE_CDKN1A_B*S59;
  R137: Nuc_CCNE_CDKN1A_B + S61 => Nuc_CCNE_CDKN1A_B + S55 + Nuc_FZR1_APC_FBXO5_nTerm_p + Nuc_FBXO5_APC_FZR1_Ser182_u; kPhCAEE*Nuc_CCNE_CDKN1A_B*S61;
  R138: Cyt_CCNA_CDKN1A_B + S19 => Cyt_CCNA_CDKN1A_B + S12 + Cyt_FZR1_APC_FBXO5_nTerm_p + Cyt_FBXO5_APC_FZR1_Ser182_u; kPhCAEA*Cyt_CCNA_CDKN1A_B*S19;
  R139: Cyt_CCNA_CDKN1A_B + S21 => Cyt_CCNA_CDKN1A_B + S15 + Cyt_FZR1_APC_FBXO5_nTerm_p + Cyt_FBXO5_APC_FZR1_Ser182_u; kPhCAEA*Cyt_CCNA_CDKN1A_B*S21;
  R140: Nuc_CCNA_CDKN1A_B + S59 => Nuc_CCNA_CDKN1A_B + S52 + Nuc_FZR1_APC_FBXO5_nTerm_p + Nuc_FBXO5_APC_FZR1_Ser182_u; kPhCAEA*Nuc_CCNA_CDKN1A_B*S59;
  R141: Nuc_CCNA_CDKN1A_B + S61 => Nuc_CCNA_CDKN1A_B + S55 + Nuc_FZR1_APC_FBXO5_nTerm_p + Nuc_FBXO5_APC_FZR1_Ser182_u; kPhCAEA*Nuc_CCNA_CDKN1A_B*S61;
  R142: S6 + S19 => S6 + S12 + Cyt_FZR1_APC_FBXO5_nTerm_p + Cyt_FBXO5_APC_FZR1_Ser182_u; kPhCAEB*S6*S19;
  R143: S6 + S21 => S6 + S15 + Cyt_FZR1_APC_FBXO5_nTerm_p + Cyt_FBXO5_APC_FZR1_Ser182_u; kPhCAEB*S6*S21;
  R144: S46 + S59 => S46 + S52 + Nuc_FZR1_APC_FBXO5_nTerm_p + Nuc_FBXO5_APC_FZR1_Ser182_u; kPhCAEB*S46*S59;
  R145: S46 + S61 => S46 + S55 + Nuc_FZR1_APC_FBXO5_nTerm_p + Nuc_FBXO5_APC_FZR1_Ser182_u; kPhCAEB*S46*S61;
  R146: Cyt_CCNE_CDKN1A_B + S16 => Cyt_CCNE_CDKN1A_B + S12 + Cyt_FZR1_APC_FBXO5_nTerm_p; kPhCdhE*Cyt_CCNE_CDKN1A_B*S16;
  R147: Cyt_CCNE_CDKN1A_B + S22 => Cyt_CCNE_CDKN1A_B + S15 + Cyt_FZR1_APC_FBXO5_nTerm_p; kPhCdhE*Cyt_CCNE_CDKN1A_B*S22;
  R148: Nuc_CCNE_CDKN1A_B + S56 => Nuc_CCNE_CDKN1A_B + S52 + Nuc_FZR1_APC_FBXO5_nTerm_p; kPhCdhE*Nuc_CCNE_CDKN1A_B*S56;
  R149: Nuc_CCNE_CDKN1A_B + S62 => Nuc_CCNE_CDKN1A_B + S55 + Nuc_FZR1_APC_FBXO5_nTerm_p; kPhCdhE*Nuc_CCNE_CDKN1A_B*S62;
  R150: S19 => S16; kDeEmi1*S19;
  R151: Cyt_FBXO5_APC_FZR1_Ser182_u => ; kDeEmi1*Cyt_FBXO5_APC_FZR1_Ser182_u;
  R152: S21 => S22; kDeEmi1*S21;
  R153: Cyt_FBXO5_APC_FZR1_Ser182_p => ; kDeEmi1*Cyt_FBXO5_APC_FZR1_Ser182_p;
  R154: S59 => S56; kDeEmi1*S59;
  R155: Nuc_FBXO5_APC_FZR1_Ser182_u => ; kDeEmi1*Nuc_FBXO5_APC_FZR1_Ser182_u;
  R156: S61 => S62; kDeEmi1*S61;
  R157: Nuc_FBXO5_APC_FZR1_Ser182_p => ; kDeEmi1*Nuc_FBXO5_APC_FZR1_Ser182_p;
  R158: S19 => S16; kDeEmi2*S19;
  R159: S21 => S22; kDeEmi2*S21;
  R160: S59 => S56; kDeEmi2*S59;
  R161: S61 => S62; kDeEmi2*S61;
  R162: Cyt_CCNA_CDKN1A_B + S19 => Cyt_CCNA_CDKN1A_B + S16 + Cyt_FBXO5_APC_FZR1_Ser182_p; kPhEmiA*Cyt_CCNA_CDKN1A_B*S19;
  R163: Cyt_CCNA_CDKN1A_B + S21 => Cyt_CCNA_CDKN1A_B + S22 + Cyt_FBXO5_APC_FZR1_Ser182_p; kPhEmiA*Cyt_CCNA_CDKN1A_B*S21;
  R164: Nuc_CCNA_CDKN1A_B + S59 => Nuc_CCNA_CDKN1A_B + S56 + Nuc_FBXO5_APC_FZR1_Ser182_p; kPhEmiA*Nuc_CCNA_CDKN1A_B*S59;
  R165: Nuc_CCNA_CDKN1A_B + S61 => Nuc_CCNA_CDKN1A_B + S62 + Nuc_FBXO5_APC_FZR1_Ser182_p; kPhEmiA*Nuc_CCNA_CDKN1A_B*S61;
  R166: S6 + S19 => S6 + S16 + Cyt_FBXO5_APC_FZR1_Ser182_p; kPhEmiB*S6*S19;
  R167: S6 + S21 => S6 + S22 + Cyt_FBXO5_APC_FZR1_Ser182_p; kPhEmiB*S6*S21;
  R168: S46 + S59 => S46 + S56 + Nuc_FBXO5_APC_FZR1_Ser182_p; kPhEmiB*S46*S59;
  R169: S46 + S61 => S46 + S62 + Nuc_FBXO5_APC_FZR1_Ser182_p; kPhEmiB*S46*S61;
  R170: Cyt_CCNA_CDKN1A_B + Cyt_FBXO5_APC_FZR1_Ser182_u => Cyt_CCNA_CDKN1A_B + Cyt_FBXO5_APC_FZR1_Ser182_p; kPhEmiA*Cyt_CCNA_CDKN1A_B*Cyt_FBXO5_APC_FZR1_Ser182_u;
  R171: Nuc_CCNA_CDKN1A_B + Nuc_FBXO5_APC_FZR1_Ser182_u => Nuc_CCNA_CDKN1A_B + Nuc_FBXO5_APC_FZR1_Ser182_p; kPhEmiA*Nuc_CCNA_CDKN1A_B*Nuc_FBXO5_APC_FZR1_Ser182_u;
  R172: S6 + Cyt_FBXO5_APC_FZR1_Ser182_u => S6 + Cyt_FBXO5_APC_FZR1_Ser182_p; kPhEmiB*S6*Cyt_FBXO5_APC_FZR1_Ser182_u;
  R173: S46 + Nuc_FBXO5_APC_FZR1_Ser182_u => S46 + Nuc_FBXO5_APC_FZR1_Ser182_p; kPhEmiB*S46*Nuc_FBXO5_APC_FZR1_Ser182_u;
  R174: Cyt_FBXO5_APC_FZR1_Ser182_p => Cyt_FBXO5_APC_FZR1_Ser182_u; kDpEmi*Cyt_FBXO5_APC_FZR1_Ser182_p;
  R175: Nuc_FBXO5_APC_FZR1_Ser182_p => Nuc_FBXO5_APC_FZR1_Ser182_u; kDpEmi*Nuc_FBXO5_APC_FZR1_Ser182_p;
  R176: Cyt_FBXO5_APC_FZR1_Ser182_p => ; kDeEmi3*Cyt_FBXO5_APC_FZR1_Ser182_p;
  R177: Nuc_FBXO5_APC_FZR1_Ser182_p => ; kDeEmi3*Nuc_FBXO5_APC_FZR1_Ser182_p;
  R178: => Cyt_FOXM1_DBD_Thr600_u; kSyFox1;
  R179: S88 => Cyt_FBXO5_APC_FZR1_Ser182_u + S88; kSyEmi2*S88;
  R180: S93 => Cyt_FBXO5_APC_FZR1_Ser182_u + S93; kSyEmi2*S93;
  R181: Cyt_CCNE_CDKN1A_B + Cyt_FZR1_APC_FBXO5_nTerm_u => Cyt_CCNE_CDKN1A_B + Cyt_FZR1_APC_FBXO5_nTerm_p; kPhCdhE*Cyt_CCNE_CDKN1A_B*Cyt_FZR1_APC_FBXO5_nTerm_u;
  R182: Nuc_CCNE_CDKN1A_B + Nuc_FZR1_APC_FBXO5_nTerm_u => Nuc_CCNE_CDKN1A_B + Nuc_FZR1_APC_FBXO5_nTerm_p; kPhCdhE*Nuc_CCNE_CDKN1A_B*Nuc_FZR1_APC_FBXO5_nTerm_u;
  R183: Cyt_CCNA_CDKN1A_B + Cyt_FZR1_APC_FBXO5_nTerm_u => Cyt_CCNA_CDKN1A_B + Cyt_FZR1_APC_FBXO5_nTerm_p; kPhCdhA*Cyt_CCNA_CDKN1A_B*Cyt_FZR1_APC_FBXO5_nTerm_u;
  R184: Nuc_CCNA_CDKN1A_B + Nuc_FZR1_APC_FBXO5_nTerm_u => Nuc_CCNA_CDKN1A_B + Nuc_FZR1_APC_FBXO5_nTerm_p; kPhCdhA*Nuc_CCNA_CDKN1A_B*Nuc_FZR1_APC_FBXO5_nTerm_u;
  R185: S6 + Cyt_FZR1_APC_FBXO5_nTerm_u => S6 + Cyt_FZR1_APC_FBXO5_nTerm_p; kPhCdhB*S6*Cyt_FZR1_APC_FBXO5_nTerm_u;
  R186: S46 + Nuc_FZR1_APC_FBXO5_nTerm_u => S46 + Nuc_FZR1_APC_FBXO5_nTerm_p; kPhCdhB*S46*Nuc_FZR1_APC_FBXO5_nTerm_u;
  R187: Cyt_FZR1_APC_FBXO5_nTerm_p => Cyt_FZR1_APC_FBXO5_nTerm_u; kDpCdh*Cyt_FZR1_APC_FBXO5_nTerm_p;
  R188: Nuc_FZR1_APC_FBXO5_nTerm_p => Nuc_FZR1_APC_FBXO5_nTerm_u; kDpCdh*Nuc_FZR1_APC_FBXO5_nTerm_p;
  R189: => Cyt_CCNA_CDKN1A_B; kSyCa1;
  R190: Cyt_CCNA_CDKN1A_B => ; kDeCa1*Cyt_CCNA_CDKN1A_B;
  R191: Nuc_CCNA_CDKN1A_B => ; kDeCa1*Nuc_CCNA_CDKN1A_B;
  R192: Cyt_CCNE_CDKN1A_B + Cyt_CCNA_CDKN1A_B => Cyt_CCNA_CDKN1A_B; kPhCeA*Cyt_CCNE_CDKN1A_B*Cyt_CCNA_CDKN1A_B;
  R193: Nuc_CCNE_CDKN1A_B + Nuc_CCNA_CDKN1A_B => Nuc_CCNA_CDKN1A_B; kPhCeA*Nuc_CCNE_CDKN1A_B*Nuc_CCNA_CDKN1A_B;
  R194: Cyt_CCNA_CDKN1A_B + S16 => S16; kDeCa2*Cyt_CCNA_CDKN1A_B*S16;
  R195: Cyt_CCNA_CDKN1A_B + S22 => S22; kDeCa2*Cyt_CCNA_CDKN1A_B*S22;
  R196: Nuc_CCNA_CDKN1A_B + S56 => S56; kDeCa2*Nuc_CCNA_CDKN1A_B*S56;
  R197: Nuc_CCNA_CDKN1A_B + S62 => S62; kDeCa2*Nuc_CCNA_CDKN1A_B*S62;
  R198: Cyt_CCNA_CDKN1A_B + S14 => S14; kDeCa3*Cyt_CCNA_CDKN1A_B*S14;
  R199: Nuc_CCNA_CDKN1A_B + S54 => S54; kDeCa3*Nuc_CCNA_CDKN1A_B*S54;
  R200: S89 => Cyt_FOXM1_DBD_Thr600_u + S89; kSyFox2*S89;
  R201: S94 => Cyt_FOXM1_DBD_Thr600_u + S94; kSyFox2*S94;
  R202: Cyt_FOXM1_DBD_Thr600_u => ; kDeFox1*Cyt_FOXM1_DBD_Thr600_u;
  R203: Cyt_FOXM1_DBD_Thr600_p => ; kDeFox1*Cyt_FOXM1_DBD_Thr600_p;
  R204: Nuc_FOXM1_DBD_Thr600_u => ; kDeFox1*Nuc_FOXM1_DBD_Thr600_u;
  R205: Nuc_FOXM1_DBD_Thr600_p => ; kDeFox1*Nuc_FOXM1_DBD_Thr600_p;
  R206: S66 => Nuc_CCNB_promoter_FOXM1; kDeFox1*S66;
  R207: S69 => Nuc_CDC20_promoter_FOXM1; kDeFox1*S69;
  R208: S16 + Cyt_FOXM1_DBD_Thr600_u => S16; kDeFox2*S16*Cyt_FOXM1_DBD_Thr600_u;
  R209: S22 + Cyt_FOXM1_DBD_Thr600_u => S22; kDeFox2*S22*Cyt_FOXM1_DBD_Thr600_u;
  R210: S16 + Cyt_FOXM1_DBD_Thr600_p => S16; kDeFox2*S16*Cyt_FOXM1_DBD_Thr600_p;
  R211: S22 + Cyt_FOXM1_DBD_Thr600_p => S22; kDeFox2*S22*Cyt_FOXM1_DBD_Thr600_p;
  R212: S56 + Nuc_FOXM1_DBD_Thr600_u => S56; kDeFox2*S56*Nuc_FOXM1_DBD_Thr600_u;
  R213: S62 + Nuc_FOXM1_DBD_Thr600_u => S62; kDeFox2*S62*Nuc_FOXM1_DBD_Thr600_u;
  R214: S56 + Nuc_FOXM1_DBD_Thr600_p => S56; kDeFox2*S56*Nuc_FOXM1_DBD_Thr600_p;
  R215: S62 + Nuc_FOXM1_DBD_Thr600_p => S62; kDeFox2*S62*Nuc_FOXM1_DBD_Thr600_p;
  R216: S56 + S66 => S56 + Nuc_CCNB_promoter_FOXM1; kDeFox2*S56*S66;
  R217: S62 + S66 => S62 + Nuc_CCNB_promoter_FOXM1; kDeFox2*S62*S66;
  R218: S56 + S69 => S56 + Nuc_CDC20_promoter_FOXM1; kDeFox2*S56*S69;
  R219: S62 + S69 => S62 + Nuc_CDC20_promoter_FOXM1; kDeFox2*S62*S69;
  R220: Cyt_CCNE_CDKN1A_B + Cyt_FOXM1_DBD_Thr600_u => Cyt_CCNE_CDKN1A_B + Cyt_FOXM1_DBD_Thr600_p; kPhFoxE*Cyt_CCNE_CDKN1A_B*Cyt_FOXM1_DBD_Thr600_u;
  R221: Nuc_CCNE_CDKN1A_B + Nuc_FOXM1_DBD_Thr600_u => Nuc_CCNE_CDKN1A_B + Nuc_FOXM1_DBD_Thr600_p; kPhFoxE*Nuc_CCNE_CDKN1A_B*Nuc_FOXM1_DBD_Thr600_u;
  R222: Cyt_CCNA_CDKN1A_B + Cyt_FOXM1_DBD_Thr600_u => Cyt_CCNA_CDKN1A_B + Cyt_FOXM1_DBD_Thr600_p; kPhFoxA*Cyt_CCNA_CDKN1A_B*Cyt_FOXM1_DBD_Thr600_u;
  R223: Nuc_CCNA_CDKN1A_B + Nuc_FOXM1_DBD_Thr600_u => Nuc_CCNA_CDKN1A_B + Nuc_FOXM1_DBD_Thr600_p; kPhFoxA*Nuc_CCNA_CDKN1A_B*Nuc_FOXM1_DBD_Thr600_u;
  R224: S6 + Cyt_FOXM1_DBD_Thr600_u => S6 + Cyt_FOXM1_DBD_Thr600_p; kPhFoxB*S6*Cyt_FOXM1_DBD_Thr600_u;
  R225: S46 + Nuc_FOXM1_DBD_Thr600_u => S46 + Nuc_FOXM1_DBD_Thr600_p; kPhFoxB*S46*Nuc_FOXM1_DBD_Thr600_u;
  R226: Cyt_FOXM1_DBD_Thr600_p => Cyt_FOXM1_DBD_Thr600_u; kDpFox*Cyt_FOXM1_DBD_Thr600_p;
  R227: Nuc_FOXM1_DBD_Thr600_p => Nuc_FOXM1_DBD_Thr600_u; kDpFox*Nuc_FOXM1_DBD_Thr600_p;
  R228: S69 => Nuc_FOXM1_DBD_Thr600_u + Nuc_CDC20_promoter_FOXM1; kDpFox*S69;
  R229: S66 => Nuc_FOXM1_DBD_Thr600_u + Nuc_CCNB_promoter_FOXM1; kDpFox*S66;
  R230: => S6; _rateLaw1;
  R231: S66 => S6 + S66; _rateLaw2*S66;
  R232: S6 => ; kDeCb1*S6;
  R233: S27 => ; kDeCb1*S27;
  R234: S46 => ; kDeCb1*S46;
  R235: S71 => ; kDeCb1*S71;
  R236: S6 + S16 => S16; kDeCb2*S6*S16;
  R237: S6 + S22 => S22; kDeCb2*S6*S22;
  R238: S16 + S27 => S16; kDeCb2*S16*S27;
  R239: S22 + S27 => S22; kDeCb2*S22*S27;
  R240: S46 + S56 => S56; kDeCb2*S46*S56;
  R241: S46 + S62 => S62; kDeCb2*S46*S62;
  R242: S56 + S71 => S56; kDeCb2*S56*S71;
  R243: S62 + S71 => S62; kDeCb2*S62*S71;
  R244: S6 + S14 => S14; kDeCb3*S6*S14;
  R245: S14 + S27 => S14; kDeCb3*S14*S27;
  R246: S46 + S54 => S54; kDeCb3*S46*S54;
  R247: S54 + S71 => S54; kDeCb3*S54*S71;
  R248: Cyt_CDC20_APC => ; kDeCdc_1*Cyt_CDC20_APC;
  R249: S14 => S15; kDeCdc_1*S14;
  R250: Nuc_CDC20_APC => ; kDeCdc_1*Nuc_CDC20_APC;
  R251: S54 => S55; kDeCdc_1*S54;
  R252: Cyt_CDC20_APC + S16 => S16; kDeCdc_2*Cyt_CDC20_APC*S16;
  R253: Cyt_CDC20_APC + S22 => S22; kDeCdc_2*Cyt_CDC20_APC*S22;
  R254: S14 + S16 => S15 + S16; kDeCdc_2*S14*S16;
  R255: S14 + S22 => S15 + S22; kDeCdc_2*S14*S22;
  R256: Nuc_CDC20_APC + S56 => S56; kDeCdc_2*Nuc_CDC20_APC*S56;
  R257: Nuc_CDC20_APC + S62 => S62; kDeCdc_2*Nuc_CDC20_APC*S62;
  R258: S54 + S56 => S55 + S56; kDeCdc_2*S54*S56;
  R259: S54 + S62 => S55 + S62; kDeCdc_2*S54*S62;
  R260: => Cyt_CDC20_APC; kSyCdc_1;
  R261: S69 => Cyt_CDC20_APC + S69; kSyCdc_2*S69;
  R262: Nuc_FOXM1_DBD_Thr600_p + Nuc_CDC20_promoter_FOXM1 => S69; kAsFPcdc*Nuc_FOXM1_DBD_Thr600_p*Nuc_CDC20_promoter_FOXM1;
  R263: S69 => Nuc_FOXM1_DBD_Thr600_p + Nuc_CDC20_promoter_FOXM1; kDiFPcdc*S69;
  R264: S6 + Cyt_WEE1_Ser123_u => Cyt_WEE1_Ser123_u + S27; kWee2*S6*Cyt_WEE1_Ser123_u;
  R265: S46 + Nuc_WEE1_Ser123_u => Nuc_WEE1_Ser123_u + S71; kWee2*S46*Nuc_WEE1_Ser123_u;
  R266: S6 + Cyt_WEE1_Ser123_p => S27 + Cyt_WEE1_Ser123_p; kWee1*S6*Cyt_WEE1_Ser123_p;
  R267: S46 + Nuc_WEE1_Ser123_p => S71 + Nuc_WEE1_Ser123_p; kWee1*S46*Nuc_WEE1_Ser123_p;
  R268: S27 + Cyt_CDC25_pSites_p => S6 + Cyt_CDC25_pSites_p; kCdc25_2*S27*Cyt_CDC25_pSites_p;
  R269: S71 + Nuc_CDC25_pSites_p => S46 + Nuc_CDC25_pSites_p; kCdc25_2*S71*Nuc_CDC25_pSites_p;
  R270: S27 + Cyt_CDC25_pSites_u => S6 + Cyt_CDC25_pSites_u; kCdc25_1*S27*Cyt_CDC25_pSites_u;
  R271: S71 + Nuc_CDC25_pSites_u => S46 + Nuc_CDC25_pSites_u; kCdc25_1*S71*Nuc_CDC25_pSites_u;
  R272: S6 + Cyt_CDC25_pSites_u => S6 + Cyt_CDC25_pSites_p; kPhC25B*S6*Cyt_CDC25_pSites_u;
  R273: S46 + Nuc_CDC25_pSites_u => S46 + Nuc_CDC25_pSites_p; kPhC25B*S46*Nuc_CDC25_pSites_u;
  R274: Cyt_CCNA_CDKN1A_B + Cyt_CDC25_pSites_u => Cyt_CCNA_CDKN1A_B + Cyt_CDC25_pSites_p; kPhC25A*Cyt_CCNA_CDKN1A_B*Cyt_CDC25_pSites_u;
  R275: Nuc_CCNA_CDKN1A_B + Nuc_CDC25_pSites_u => Nuc_CCNA_CDKN1A_B + Nuc_CDC25_pSites_p; kPhC25A*Nuc_CCNA_CDKN1A_B*Nuc_CDC25_pSites_u;
  R276: Cyt_PPP2R2B_ENSA_ARPP19 + Cyt_CDC25_pSites_p => Cyt_PPP2R2B_ENSA_ARPP19 + Cyt_CDC25_pSites_u; kDpCdc25*Cyt_PPP2R2B_ENSA_ARPP19*Cyt_CDC25_pSites_p;
  R277: Nuc_PPP2R2B_ENSA_ARPP19 + Nuc_CDC25_pSites_p => Nuc_PPP2R2B_ENSA_ARPP19 + Nuc_CDC25_pSites_u; kDpCdc25*Nuc_PPP2R2B_ENSA_ARPP19*Nuc_CDC25_pSites_p;
  R278: Cyt_PPP2R2B_ENSA_ARPP19 + Cyt_WEE1_Ser123_p => Cyt_PPP2R2B_ENSA_ARPP19 + Cyt_WEE1_Ser123_u; kDpWee*Cyt_PPP2R2B_ENSA_ARPP19*Cyt_WEE1_Ser123_p;
  R279: Nuc_PPP2R2B_ENSA_ARPP19 + Nuc_WEE1_Ser123_p => Nuc_PPP2R2B_ENSA_ARPP19 + Nuc_WEE1_Ser123_u; kDpWee*Nuc_PPP2R2B_ENSA_ARPP19*Nuc_WEE1_Ser123_p;
  R280: Cyt_CCNA_CDKN1A_B + Cyt_WEE1_Ser123_u => Cyt_CCNA_CDKN1A_B + Cyt_WEE1_Ser123_p; kPhWeeA*Cyt_CCNA_CDKN1A_B*Cyt_WEE1_Ser123_u;
  R281: Nuc_CCNA_CDKN1A_B + Nuc_WEE1_Ser123_u => Nuc_CCNA_CDKN1A_B + Nuc_WEE1_Ser123_p; kPhWeeA*Nuc_CCNA_CDKN1A_B*Nuc_WEE1_Ser123_u;
  R282: S6 + Cyt_WEE1_Ser123_u => S6 + Cyt_WEE1_Ser123_p; kPhWeeB*S6*Cyt_WEE1_Ser123_u;
  R283: S46 + Nuc_WEE1_Ser123_u => S46 + Nuc_WEE1_Ser123_p; kPhWeeB*S46*Nuc_WEE1_Ser123_u;
  R284: S6 + Cyt_MASTL_Thr198_u => S6 + Cyt_MASTL_Thr198_p; kPhGw*S6*Cyt_MASTL_Thr198_u;
  R285: S46 + Nuc_MASTL_Thr198_u => S46 + Nuc_MASTL_Thr198_p; kPhGw*S46*Nuc_MASTL_Thr198_u;
  R286: Cyt_MASTL_Thr198_p => Cyt_MASTL_Thr198_u; kDpGw1*Cyt_MASTL_Thr198_p;
  R287: Nuc_MASTL_Thr198_p => Nuc_MASTL_Thr198_u; kDpGw1*Nuc_MASTL_Thr198_p;
  R288: Cyt_PPP2R2B_ENSA_ARPP19 + Cyt_MASTL_Thr198_p => Cyt_PPP2R2B_ENSA_ARPP19 + Cyt_MASTL_Thr198_u; kDpGw2*Cyt_PPP2R2B_ENSA_ARPP19*Cyt_MASTL_Thr198_p;
  R289: Nuc_PPP2R2B_ENSA_ARPP19 + Nuc_MASTL_Thr198_p => Nuc_PPP2R2B_ENSA_ARPP19 + Nuc_MASTL_Thr198_u; kDpGw2*Nuc_PPP2R2B_ENSA_ARPP19*Nuc_MASTL_Thr198_p;
  R290: Cyt_MASTL_Thr198_p + S33 => Cyt_MASTL_Thr198_p + S34; kPhEnsa*Cyt_MASTL_Thr198_p*S33;
  R291: Nuc_MASTL_Thr198_p + S77 => Nuc_MASTL_Thr198_p + S78; kPhEnsa*Nuc_MASTL_Thr198_p*S77;
  R292: S35 => Cyt_PPP2R2B_ENSA_ARPP19 + S33; kDpEnsa*S35;
  R293: S79 => Nuc_PPP2R2B_ENSA_ARPP19 + S77; kDpEnsa*S79;
  R294: => Cyt_FBXO5_APC_FZR1_Ser182_u; kSyEmi1;
  R295: S85 => Cyt_CCNE_CDKN1A_B + S85; kSyCe2*S85;
  R296: S90 => Cyt_CCNE_CDKN1A_B + S90; kSyCe2*S90;
  R297: S6 + S16 => S6 + S12 + Cyt_FZR1_APC_FBXO5_nTerm_p; kPhCdhB*S6*S16;
  R298: S6 + S22 => S6 + S15 + Cyt_FZR1_APC_FBXO5_nTerm_p; kPhCdhB*S6*S22;
  R299: S46 + S56 => S46 + S52 + Nuc_FZR1_APC_FBXO5_nTerm_p; kPhCdhB*S46*S56;
  R300: S46 + S62 => S46 + S55 + Nuc_FZR1_APC_FBXO5_nTerm_p; kPhCdhB*S46*S62;
  R301: Cyt_E2F_DBD_RB1_Ser332_u + Cyt_RB1_E2F_Ser807_Ser811_u => S7; kAsE2fRb*Cyt_E2F_DBD_RB1_Ser332_u*Cyt_RB1_E2F_Ser807_Ser811_u;
  R302: Cyt_E2F_DBD_RB1_Ser332_p + Cyt_RB1_E2F_Ser807_Ser811_u => S8; kAsE2fRb*Cyt_E2F_DBD_RB1_Ser332_p*Cyt_RB1_E2F_Ser807_Ser811_u;
  R303: Nuc_E2F_DBD_RB1_Ser332_u + Nuc_RB1_E2F_Ser807_Ser811_u => S47; kAsE2fRb*Nuc_E2F_DBD_RB1_Ser332_u*Nuc_RB1_E2F_Ser807_Ser811_u;
  R304: Nuc_E2F_DBD_RB1_Ser332_p + Nuc_RB1_E2F_Ser807_Ser811_u => S48; kAsE2fRb*Nuc_E2F_DBD_RB1_Ser332_p*Nuc_RB1_E2F_Ser807_Ser811_u;
  R305: S7 => Cyt_E2F_DBD_RB1_Ser332_u + Cyt_RB1_E2F_Ser807_Ser811_u; kDiE2fRb*S7;
  R306: S8 => Cyt_E2F_DBD_RB1_Ser332_p + Cyt_RB1_E2F_Ser807_Ser811_u; kDiE2fRb*S8;
  R307: S47 => Nuc_E2F_DBD_RB1_Ser332_u + Nuc_RB1_E2F_Ser807_Ser811_u; kDiE2fRb*S47;
  R308: S48 => Nuc_E2F_DBD_RB1_Ser332_p + Nuc_RB1_E2F_Ser807_Ser811_u; kDiE2fRb*S48;
  R309: S12 + Cyt_FZR1_APC_FBXO5_nTerm_u => S16; kAsACdh*S12*Cyt_FZR1_APC_FBXO5_nTerm_u;
  R310: S15 + Cyt_FZR1_APC_FBXO5_nTerm_u => S22; kAsACdh*S15*Cyt_FZR1_APC_FBXO5_nTerm_u;
  R311: S52 + Nuc_FZR1_APC_FBXO5_nTerm_u => S56; kAsACdh*S52*Nuc_FZR1_APC_FBXO5_nTerm_u;
  R312: S55 + Nuc_FZR1_APC_FBXO5_nTerm_u => S62; kAsACdh*S55*Nuc_FZR1_APC_FBXO5_nTerm_u;
  R313: S16 => S12 + Cyt_FZR1_APC_FBXO5_nTerm_u; kDiACdh*S16;
  R314: S22 => S15 + Cyt_FZR1_APC_FBXO5_nTerm_u; kDiACdh*S22;
  R315: S56 => S52 + Nuc_FZR1_APC_FBXO5_nTerm_u; kDiACdh*S56;
  R316: S62 => S55 + Nuc_FZR1_APC_FBXO5_nTerm_u; kDiACdh*S62;
  R317: S16 + Cyt_FBXO5_APC_FZR1_Ser182_u => S19; kAsACE*S16*Cyt_FBXO5_APC_FZR1_Ser182_u;
  R318: Cyt_FBXO5_APC_FZR1_Ser182_u + S22 => S21; kAsACE*Cyt_FBXO5_APC_FZR1_Ser182_u*S22;
  R319: S56 + Nuc_FBXO5_APC_FZR1_Ser182_u => S59; kAsACE*S56*Nuc_FBXO5_APC_FZR1_Ser182_u;
  R320: Nuc_FBXO5_APC_FZR1_Ser182_u + S62 => S61; kAsACE*Nuc_FBXO5_APC_FZR1_Ser182_u*S62;
  R321: S19 => S16 + Cyt_FBXO5_APC_FZR1_Ser182_u; kDiACE*S19;
  R322: S21 => Cyt_FBXO5_APC_FZR1_Ser182_u + S22; kDiACE*S21;
  R323: S59 => S56 + Nuc_FBXO5_APC_FZR1_Ser182_u; kDiACE*S59;
  R324: S61 => Nuc_FBXO5_APC_FZR1_Ser182_u + S62; kDiACE*S61;
  R325: Cyt_CDC20_APC + S15 => S14; kAspACdc*Cyt_CDC20_APC*S15;
  R326: Nuc_CDC20_APC + S55 => S54; kAspACdc*Nuc_CDC20_APC*S55;
  R327: S14 => Cyt_CDC20_APC + S15; kDipACdc*S14;
  R328: S54 => Nuc_CDC20_APC + S55; kDipACdc*S54;
  R329: Cyt_PPP2R2B_ENSA_ARPP19 + S34 => S35; kAspEB55*Cyt_PPP2R2B_ENSA_ARPP19*S34;
  R330: Nuc_PPP2R2B_ENSA_ARPP19 + S78 => S79; kAspEB55*Nuc_PPP2R2B_ENSA_ARPP19*S78;
  R331: S35 => Cyt_PPP2R2B_ENSA_ARPP19 + S34; kDipEB55*S35;
  R332: S79 => Nuc_PPP2R2B_ENSA_ARPP19 + S78; kDipEB55*S79;
  R333: Nuc_E2F_DBD_RB1_Ser332_u + Nuc_CCNE_promoter_E2F => S85; kAsEPx*Nuc_E2F_DBD_RB1_Ser332_u*Nuc_CCNE_promoter_E2F;
  R334: Nuc_E2F_DBD_RB1_Ser332_p + Nuc_CCNE_promoter_E2F => S90; kAsEPx*Nuc_E2F_DBD_RB1_Ser332_p*Nuc_CCNE_promoter_E2F;
  R335: S85 => Nuc_E2F_DBD_RB1_Ser332_u + Nuc_CCNE_promoter_E2F; kDiEPx*S85;
  R336: S90 => Nuc_E2F_DBD_RB1_Ser332_p + Nuc_CCNE_promoter_E2F; kDiEPx*S90;
  R337: Nuc_E2F_DBD_RB1_Ser332_u + Nuc_CCNA_promoter_E2F => S86; kAsEPx*Nuc_E2F_DBD_RB1_Ser332_u*Nuc_CCNA_promoter_E2F;
  R338: Nuc_E2F_DBD_RB1_Ser332_p + Nuc_CCNA_promoter_E2F => S91; kAsEPx*Nuc_E2F_DBD_RB1_Ser332_p*Nuc_CCNA_promoter_E2F;
  R339: S86 => Nuc_E2F_DBD_RB1_Ser332_u + Nuc_CCNA_promoter_E2F; kDiEPx*S86;
  R340: S91 => Nuc_E2F_DBD_RB1_Ser332_p + Nuc_CCNA_promoter_E2F; kDiEPx*S91;
  R341: Nuc_E2F_DBD_RB1_Ser332_u + Nuc_E2F_promoter_E2F => S87; kAsEPx*Nuc_E2F_DBD_RB1_Ser332_u*Nuc_E2F_promoter_E2F;
  R342: Nuc_E2F_DBD_RB1_Ser332_p + Nuc_E2F_promoter_E2F => S92; kAsEPx*Nuc_E2F_DBD_RB1_Ser332_p*Nuc_E2F_promoter_E2F;
  R343: S87 => Nuc_E2F_DBD_RB1_Ser332_u + Nuc_E2F_promoter_E2F; kDiEPx*S87;
  R344: S92 => Nuc_E2F_DBD_RB1_Ser332_p + Nuc_E2F_promoter_E2F; kDiEPx*S92;
  R345: Nuc_E2F_DBD_RB1_Ser332_u + Nuc_FBXO5_promoter_E2F => S88; kAsEPx*Nuc_E2F_DBD_RB1_Ser332_u*Nuc_FBXO5_promoter_E2F;
  R346: Nuc_E2F_DBD_RB1_Ser332_p + Nuc_FBXO5_promoter_E2F => S93; kAsEPx*Nuc_E2F_DBD_RB1_Ser332_p*Nuc_FBXO5_promoter_E2F;
  R347: S88 => Nuc_E2F_DBD_RB1_Ser332_u + Nuc_FBXO5_promoter_E2F; kDiEPx*S88;
  R348: S93 => Nuc_E2F_DBD_RB1_Ser332_p + Nuc_FBXO5_promoter_E2F; kDiEPx*S93;
  R349: Nuc_E2F_DBD_RB1_Ser332_u + Nuc_FOXM1_promoter_E2F => S89; kAsEPx*Nuc_E2F_DBD_RB1_Ser332_u*Nuc_FOXM1_promoter_E2F;
  R350: Nuc_E2F_DBD_RB1_Ser332_p + Nuc_FOXM1_promoter_E2F => S94; kAsEPx*Nuc_E2F_DBD_RB1_Ser332_p*Nuc_FOXM1_promoter_E2F;
  R351: S89 => Nuc_E2F_DBD_RB1_Ser332_u + Nuc_FOXM1_promoter_E2F; kDiEPx*S89;
  R352: S94 => Nuc_E2F_DBD_RB1_Ser332_p + Nuc_FOXM1_promoter_E2F; kDiEPx*S94;
  R353: => Cyt_SKP2; kSySkp2;
  R354: Cyt_SKP2 => ; kDeSkp2_1*Cyt_SKP2;
  R355: Nuc_SKP2 => ; kDeSkp2_1*Nuc_SKP2;
  R356: S16 + Cyt_SKP2 => S16; kDeSkp2_2*S16*Cyt_SKP2;
  R357: S22 + Cyt_SKP2 => S22; kDeSkp2_2*S22*Cyt_SKP2;
  R358: S56 + Nuc_SKP2 => S56; kDeSkp2_2*S56*Nuc_SKP2;
  R359: S62 + Nuc_SKP2 => S62; kDeSkp2_2*S62*Nuc_SKP2;
  R360: Nuc_TP53_DBD_Ser15_p + Nuc_CDKN1A_promoter_TP53 => S101; kAsTP53PCDKN1A*Nuc_TP53_DBD_Ser15_p*Nuc_CDKN1A_promoter_TP53;
  R361: => Cyt_CDKN1A_CCNE_A_B_Ser130_u; kSyCDKN1A_1;
  R362: Nuc_FOXO_DBD + Nuc_CDKN1B_promoter_FOXO => S103; kAsFOXOPCDKN1B*Nuc_FOXO_DBD*Nuc_CDKN1B_promoter_FOXO;
  R363: => Cyt_CDKN1B_CCNE_A_Thr187_u; kSyCDKN1B_1;
  R364: Cyt_CCND + Num_NUP_pSites_u => Num_NUP_pSites_u + Nuc_CCND; kImImCCND_1*Cyt_CCND*Num_NUP_pSites_u;
  R365: Num_NUP_pSites_u + Nuc_CCND => Cyt_CCND + Num_NUP_pSites_u; kExImCCND_1*Num_NUP_pSites_u*Nuc_CCND;
  R366: Cyt_CCNE_CDKN1A_B + Num_NUP_pSites_u => Num_NUP_pSites_u + Nuc_CCNE_CDKN1A_B; kImImCCNE_CDKN1A_B__1*Cyt_CCNE_CDKN1A_B*Num_NUP_pSites_u;
  R367: Num_NUP_pSites_u + Nuc_CCNE_CDKN1A_B => Cyt_CCNE_CDKN1A_B + Num_NUP_pSites_u; kExImCCNE_CDKN1A_B__1*Num_NUP_pSites_u*Nuc_CCNE_CDKN1A_B;
  R368: Cyt_E2F_DBD_RB1_Ser332_u + Num_NUP_pSites_u => Num_NUP_pSites_u + Nuc_E2F_DBD_RB1_Ser332_u; kImImE2F_DBD_RB1_Ser332u__1*Cyt_E2F_DBD_RB1_Ser332_u*Num_NUP_pSites_u;
  R369: Num_NUP_pSites_u + Nuc_E2F_DBD_RB1_Ser332_u => Cyt_E2F_DBD_RB1_Ser332_u + Num_NUP_pSites_u; kExImE2F_DBD_RB1_Ser332u__1*Num_NUP_pSites_u*Nuc_E2F_DBD_RB1_Ser332_u;
  R370: Cyt_E2F_DBD_RB1_Ser332_p + Num_NUP_pSites_u => Num_NUP_pSites_u + Nuc_E2F_DBD_RB1_Ser332_p; kImImE2F_DBD_RB1_Ser332p__1*Cyt_E2F_DBD_RB1_Ser332_p*Num_NUP_pSites_u;
  R371: Num_NUP_pSites_u + Nuc_E2F_DBD_RB1_Ser332_p => Cyt_E2F_DBD_RB1_Ser332_p + Num_NUP_pSites_u; kExImE2F_DBD_RB1_Ser332p__1*Num_NUP_pSites_u*Nuc_E2F_DBD_RB1_Ser332_p;
  R372: Cyt_CCNA_CDKN1A_B + Num_NUP_pSites_u => Num_NUP_pSites_u + Nuc_CCNA_CDKN1A_B; kImImCCNA_CDKN1A_B__1*Cyt_CCNA_CDKN1A_B*Num_NUP_pSites_u;
  R373: Num_NUP_pSites_u + Nuc_CCNA_CDKN1A_B => Cyt_CCNA_CDKN1A_B + Num_NUP_pSites_u; kExImCCNA_CDKN1A_B__1*Num_NUP_pSites_u*Nuc_CCNA_CDKN1A_B;
  R374: S6 + Num_NUP_pSites_u => Num_NUP_pSites_u + S46; kImImCCNB_CDK1_Thr14_Tyr15u_CDKN1A__1*S6*Num_NUP_pSites_u;
  R375: Num_NUP_pSites_u + S46 => S6 + Num_NUP_pSites_u; kExImCCNB_CDK1_Thr14_Tyr15u_CDKN1A__1*Num_NUP_pSites_u*S46;
  R376: S7 + Num_NUP_pSites_u => Num_NUP_pSites_u + S47; kImImE2F_DBD_RB11_Ser332u__RB1_E2F1_Ser807_Ser811u__1*S7*Num_NUP_pSites_u;
  R377: Num_NUP_pSites_u + S47 => S7 + Num_NUP_pSites_u; kExImE2F_DBD_RB11_Ser332u__RB1_E2F1_Ser807_Ser811u__1*Num_NUP_pSites_u*S47;
  R378: S8 + Num_NUP_pSites_u => Num_NUP_pSites_u + S48; kImImE2F_DBD_RB11_Ser332p__RB1_E2F1_Ser807_Ser811u__1*S8*Num_NUP_pSites_u;
  R379: Num_NUP_pSites_u + S48 => S8 + Num_NUP_pSites_u; kExImE2F_DBD_RB11_Ser332p__RB1_E2F1_Ser807_Ser811u__1*Num_NUP_pSites_u*S48;
  R380: Cyt_RB1_E2F_Ser807_Ser811_u + Num_NUP_pSites_u => Num_NUP_pSites_u + Nuc_RB1_E2F_Ser807_Ser811_u; kImImRB1_E2F_Ser807_Ser811u__1*Cyt_RB1_E2F_Ser807_Ser811_u*Num_NUP_pSites_u;
  R381: Num_NUP_pSites_u + Nuc_RB1_E2F_Ser807_Ser811_u => Cyt_RB1_E2F_Ser807_Ser811_u + Num_NUP_pSites_u; kExImRB1_E2F_Ser807_Ser811u__1*Num_NUP_pSites_u*Nuc_RB1_E2F_Ser807_Ser811_u;
  R382: Cyt_RB1_E2F_Ser807_Ser811_p + Num_NUP_pSites_u => Num_NUP_pSites_u + Nuc_RB1_E2F_Ser807_Ser811_p; kImImRB1_E2F_Ser807_Ser811p__1*Cyt_RB1_E2F_Ser807_Ser811_p*Num_NUP_pSites_u;
  R383: Num_NUP_pSites_u + Nuc_RB1_E2F_Ser807_Ser811_p => Cyt_RB1_E2F_Ser807_Ser811_p + Num_NUP_pSites_u; kExImRB1_E2F_Ser807_Ser811p__1*Num_NUP_pSites_u*Nuc_RB1_E2F_Ser807_Ser811_p;
  R384: Cyt_PPP2R2B_ENSA_ARPP19 + Num_NUP_pSites_u => Num_NUP_pSites_u + Nuc_PPP2R2B_ENSA_ARPP19; kImImPPP2R2B_ENSA_ARPP19__1*Cyt_PPP2R2B_ENSA_ARPP19*Num_NUP_pSites_u;
  R385: Num_NUP_pSites_u + Nuc_PPP2R2B_ENSA_ARPP19 => Cyt_PPP2R2B_ENSA_ARPP19 + Num_NUP_pSites_u; kExImPPP2R2B_ENSA_ARPP19__1*Num_NUP_pSites_u*Nuc_PPP2R2B_ENSA_ARPP19;
  R386: S12 + Num_NUP_pSites_u => Num_NUP_pSites_u + S52; kImImAPC_FBXO5_FZR1_CDC20_Ser355u__1*S12*Num_NUP_pSites_u;
  R387: Num_NUP_pSites_u + S52 => S12 + Num_NUP_pSites_u; kExImAPC_FBXO5_FZR1_CDC20_Ser355u__1*Num_NUP_pSites_u*S52;
  R388: Cyt_CDC20_APC + Num_NUP_pSites_u => Num_NUP_pSites_u + Nuc_CDC20_APC; kImImCDC20_APC__1*Cyt_CDC20_APC*Num_NUP_pSites_u;
  R389: Num_NUP_pSites_u + Nuc_CDC20_APC => Cyt_CDC20_APC + Num_NUP_pSites_u; kExImCDC20_APC__1*Num_NUP_pSites_u*Nuc_CDC20_APC;
  R390: S14 + Num_NUP_pSites_u => Num_NUP_pSites_u + S54; kImImAPC_FBXO5_FZR1_CDC201_Ser355p__CDC20_APC1__1*S14*Num_NUP_pSites_u;
  R391: Num_NUP_pSites_u + S54 => S14 + Num_NUP_pSites_u; kExImAPC_FBXO5_FZR1_CDC201_Ser355p__CDC20_APC1__1*Num_NUP_pSites_u*S54;
  R392: S15 + Num_NUP_pSites_u => Num_NUP_pSites_u + S55; kImImAPC_FBXO5_FZR1_CDC20_Ser355p__1*S15*Num_NUP_pSites_u;
  R393: Num_NUP_pSites_u + S55 => S15 + Num_NUP_pSites_u; kExImAPC_FBXO5_FZR1_CDC20_Ser355p__1*Num_NUP_pSites_u*S55;
  R394: S16 + Num_NUP_pSites_u => Num_NUP_pSites_u + S56; kImImAPC_FBXO5_FZR1_CDC201_Ser355u__FZR1_APC1_FBXO5_nTermu__1*S16*Num_NUP_pSites_u;
  R395: Num_NUP_pSites_u + S56 => S16 + Num_NUP_pSites_u; kExImAPC_FBXO5_FZR1_CDC201_Ser355u__FZR1_APC1_FBXO5_nTermu__1*Num_NUP_pSites_u*S56;
  R396: Cyt_FZR1_APC_FBXO5_nTerm_u + Num_NUP_pSites_u => Num_NUP_pSites_u + Nuc_FZR1_APC_FBXO5_nTerm_u; kImImFZR1_APC_FBXO5_nTermu__1*Cyt_FZR1_APC_FBXO5_nTerm_u*Num_NUP_pSites_u;
  R397: Num_NUP_pSites_u + Nuc_FZR1_APC_FBXO5_nTerm_u => Cyt_FZR1_APC_FBXO5_nTerm_u + Num_NUP_pSites_u; kExImFZR1_APC_FBXO5_nTermu__1*Num_NUP_pSites_u*Nuc_FZR1_APC_FBXO5_nTerm_u;
  R398: Cyt_FZR1_APC_FBXO5_nTerm_p + Num_NUP_pSites_u => Num_NUP_pSites_u + Nuc_FZR1_APC_FBXO5_nTerm_p; kImImFZR1_APC_FBXO5_nTermp__1*Cyt_FZR1_APC_FBXO5_nTerm_p*Num_NUP_pSites_u;
  R399: Num_NUP_pSites_u + Nuc_FZR1_APC_FBXO5_nTerm_p => Cyt_FZR1_APC_FBXO5_nTerm_p + Num_NUP_pSites_u; kExImFZR1_APC_FBXO5_nTermp__1*Num_NUP_pSites_u*Nuc_FZR1_APC_FBXO5_nTerm_p;
  R400: S19 + Num_NUP_pSites_u => Num_NUP_pSites_u + S59; kImImAPC_FBXO51_FZR1_CDC202_Ser355u__FBXO5_APC1_FZR13_Ser182u__FZR1_APC2_FBXO53_nTermu__1*S19*Num_NUP_pSites_u;
  R401: Num_NUP_pSites_u + S59 => S19 + Num_NUP_pSites_u; kExImAPC_FBXO51_FZR1_CDC202_Ser355u__FBXO5_APC1_FZR13_Ser182u__FZR1_APC2_FBXO53_nTermu__1*Num_NUP_pSites_u*S59;
  R402: Cyt_FBXO5_APC_FZR1_Ser182_u + Num_NUP_pSites_u => Num_NUP_pSites_u + Nuc_FBXO5_APC_FZR1_Ser182_u; kImImFBXO5_APC_FZR1_Ser182u__1*Cyt_FBXO5_APC_FZR1_Ser182_u*Num_NUP_pSites_u;
  R403: Num_NUP_pSites_u + Nuc_FBXO5_APC_FZR1_Ser182_u => Cyt_FBXO5_APC_FZR1_Ser182_u + Num_NUP_pSites_u; kExImFBXO5_APC_FZR1_Ser182u__1*Num_NUP_pSites_u*Nuc_FBXO5_APC_FZR1_Ser182_u;
  R404: S21 + Num_NUP_pSites_u => Num_NUP_pSites_u + S61; kImImAPC_FBXO51_FZR1_CDC202_Ser355p__FBXO5_APC1_FZR13_Ser182u__FZR1_APC2_FBXO53_nTermu__1*S21*Num_NUP_pSites_u;
  R405: Num_NUP_pSites_u + S61 => S21 + Num_NUP_pSites_u; kExImAPC_FBXO51_FZR1_CDC202_Ser355p__FBXO5_APC1_FZR13_Ser182u__FZR1_APC2_FBXO53_nTermu__1*Num_NUP_pSites_u*S61;
  R406: S22 + Num_NUP_pSites_u => Num_NUP_pSites_u + S62; kImImAPC_FBXO5_FZR1_CDC201_Ser355p__FZR1_APC1_FBXO5_nTermu__1*S22*Num_NUP_pSites_u;
  R407: Num_NUP_pSites_u + S62 => S22 + Num_NUP_pSites_u; kExImAPC_FBXO5_FZR1_CDC201_Ser355p__FZR1_APC1_FBXO5_nTermu__1*Num_NUP_pSites_u*S62;
  R408: Cyt_FBXO5_APC_FZR1_Ser182_p + Num_NUP_pSites_u => Num_NUP_pSites_u + Nuc_FBXO5_APC_FZR1_Ser182_p; kImImFBXO5_APC_FZR1_Ser182p__1*Cyt_FBXO5_APC_FZR1_Ser182_p*Num_NUP_pSites_u;
  R409: Num_NUP_pSites_u + Nuc_FBXO5_APC_FZR1_Ser182_p => Cyt_FBXO5_APC_FZR1_Ser182_p + Num_NUP_pSites_u; kExImFBXO5_APC_FZR1_Ser182p__1*Num_NUP_pSites_u*Nuc_FBXO5_APC_FZR1_Ser182_p;
  R410: Cyt_FOXM1_DBD_Thr600_u + Num_NUP_pSites_u => Num_NUP_pSites_u + Nuc_FOXM1_DBD_Thr600_u; kImImFOXM1_DBD_Thr600u__1*Cyt_FOXM1_DBD_Thr600_u*Num_NUP_pSites_u;
  R411: Num_NUP_pSites_u + Nuc_FOXM1_DBD_Thr600_u => Cyt_FOXM1_DBD_Thr600_u + Num_NUP_pSites_u; kExImFOXM1_DBD_Thr600u__1*Num_NUP_pSites_u*Nuc_FOXM1_DBD_Thr600_u;
  R412: Cyt_FOXM1_DBD_Thr600_p + Num_NUP_pSites_u => Num_NUP_pSites_u + Nuc_FOXM1_DBD_Thr600_p; kImImFOXM1_DBD_Thr600p__1*Cyt_FOXM1_DBD_Thr600_p*Num_NUP_pSites_u;
  R413: Num_NUP_pSites_u + Nuc_FOXM1_DBD_Thr600_p => Cyt_FOXM1_DBD_Thr600_p + Num_NUP_pSites_u; kExImFOXM1_DBD_Thr600p__1*Num_NUP_pSites_u*Nuc_FOXM1_DBD_Thr600_p;
  R414: Cyt_WEE1_Ser123_u + Num_NUP_pSites_u => Num_NUP_pSites_u + Nuc_WEE1_Ser123_u; kImImWEE1_Ser123u__1*Cyt_WEE1_Ser123_u*Num_NUP_pSites_u;
  R415: Num_NUP_pSites_u + Nuc_WEE1_Ser123_u => Cyt_WEE1_Ser123_u + Num_NUP_pSites_u; kExImWEE1_Ser123u__1*Num_NUP_pSites_u*Nuc_WEE1_Ser123_u;
  R416: S27 + Num_NUP_pSites_u => Num_NUP_pSites_u + S71; kImImCCNB_CDK1_Thr14_Tyr15p_CDKN1A__1*S27*Num_NUP_pSites_u;
  R417: Num_NUP_pSites_u + S71 => S27 + Num_NUP_pSites_u; kExImCCNB_CDK1_Thr14_Tyr15p_CDKN1A__1*Num_NUP_pSites_u*S71;
  R418: Cyt_WEE1_Ser123_p + Num_NUP_pSites_u => Num_NUP_pSites_u + Nuc_WEE1_Ser123_p; kImImWEE1_Ser123p__1*Cyt_WEE1_Ser123_p*Num_NUP_pSites_u;
  R419: Num_NUP_pSites_u + Nuc_WEE1_Ser123_p => Cyt_WEE1_Ser123_p + Num_NUP_pSites_u; kExImWEE1_Ser123p__1*Num_NUP_pSites_u*Nuc_WEE1_Ser123_p;
  R420: Cyt_CDC25_pSites_p + Num_NUP_pSites_u => Num_NUP_pSites_u + Nuc_CDC25_pSites_p; kImImCDC25_pSitesp__1*Cyt_CDC25_pSites_p*Num_NUP_pSites_u;
  R421: Num_NUP_pSites_u + Nuc_CDC25_pSites_p => Cyt_CDC25_pSites_p + Num_NUP_pSites_u; kExImCDC25_pSitesp__1*Num_NUP_pSites_u*Nuc_CDC25_pSites_p;
  R422: Cyt_CDC25_pSites_u + Num_NUP_pSites_u => Num_NUP_pSites_u + Nuc_CDC25_pSites_u; kImImCDC25_pSitesu__1*Cyt_CDC25_pSites_u*Num_NUP_pSites_u;
  R423: Num_NUP_pSites_u + Nuc_CDC25_pSites_u => Cyt_CDC25_pSites_u + Num_NUP_pSites_u; kExImCDC25_pSitesu__1*Num_NUP_pSites_u*Nuc_CDC25_pSites_u;
  R424: Cyt_MASTL_Thr198_u + Num_NUP_pSites_u => Num_NUP_pSites_u + Nuc_MASTL_Thr198_u; kImImMASTL_Thr198u__1*Cyt_MASTL_Thr198_u*Num_NUP_pSites_u;
  R425: Num_NUP_pSites_u + Nuc_MASTL_Thr198_u => Cyt_MASTL_Thr198_u + Num_NUP_pSites_u; kExImMASTL_Thr198u__1*Num_NUP_pSites_u*Nuc_MASTL_Thr198_u;
  R426: Cyt_MASTL_Thr198_p + Num_NUP_pSites_u => Num_NUP_pSites_u + Nuc_MASTL_Thr198_p; kImImMASTL_Thr198p__1*Cyt_MASTL_Thr198_p*Num_NUP_pSites_u;
  R427: Num_NUP_pSites_u + Nuc_MASTL_Thr198_p => Cyt_MASTL_Thr198_p + Num_NUP_pSites_u; kExImMASTL_Thr198p__1*Num_NUP_pSites_u*Nuc_MASTL_Thr198_p;
  R428: S33 + Num_NUP_pSites_u => Num_NUP_pSites_u + S77; kImImENSA_ARPP19_PPP2R2B_Ser62_Ser67u__1*S33*Num_NUP_pSites_u;
  R429: Num_NUP_pSites_u + S77 => S33 + Num_NUP_pSites_u; kExImENSA_ARPP19_PPP2R2B_Ser62_Ser67u__1*Num_NUP_pSites_u*S77;
  R430: S34 + Num_NUP_pSites_u => Num_NUP_pSites_u + S78; kImImENSA_ARPP19_PPP2R2B_Ser62_Ser67p__1*S34*Num_NUP_pSites_u;
  R431: Num_NUP_pSites_u + S78 => S34 + Num_NUP_pSites_u; kExImENSA_ARPP19_PPP2R2B_Ser62_Ser67p__1*Num_NUP_pSites_u*S78;
  R432: S35 + Num_NUP_pSites_u => Num_NUP_pSites_u + S79; kImImENSA_ARPP19_PPP2R2B1_Ser62_Ser67p__PPP2R2B_ENSA_ARPP191__1*S35*Num_NUP_pSites_u;
  R433: Num_NUP_pSites_u + S79 => S35 + Num_NUP_pSites_u; kExImENSA_ARPP19_PPP2R2B1_Ser62_Ser67p__PPP2R2B_ENSA_ARPP191__1*Num_NUP_pSites_u*S79;
  R434: Cyt_iWEE + Num_NUP_pSites_u => Num_NUP_pSites_u + Nuc_iWEE; kImImiWEE_1*Cyt_iWEE*Num_NUP_pSites_u;
  R435: Num_NUP_pSites_u + Nuc_iWEE => Cyt_iWEE + Num_NUP_pSites_u; kExImiWEE_1*Num_NUP_pSites_u*Nuc_iWEE;
  R436: Cyt_SKP2 + Num_NUP_pSites_u => Num_NUP_pSites_u + Nuc_SKP2; kImImSKP2_1*Cyt_SKP2*Num_NUP_pSites_u;
  R437: Num_NUP_pSites_u + Nuc_SKP2 => Cyt_SKP2 + Num_NUP_pSites_u; kExImSKP2_1*Num_NUP_pSites_u*Nuc_SKP2;
  R438: Cyt_TP53_DBD_Ser15_p + Num_NUP_pSites_u => Num_NUP_pSites_u + Nuc_TP53_DBD_Ser15_p; kImImTP53_DBD_Ser15p__1*Cyt_TP53_DBD_Ser15_p*Num_NUP_pSites_u;
  R439: Num_NUP_pSites_u + Nuc_TP53_DBD_Ser15_p => Cyt_TP53_DBD_Ser15_p + Num_NUP_pSites_u; kExImTP53_DBD_Ser15p__1*Num_NUP_pSites_u*Nuc_TP53_DBD_Ser15_p;
  R440: Cyt_FOXO_DBD + Num_NUP_pSites_u => Num_NUP_pSites_u + Nuc_FOXO_DBD; kImImFOXO_DBD__1*Cyt_FOXO_DBD*Num_NUP_pSites_u;
  R441: Num_NUP_pSites_u + Nuc_FOXO_DBD => Cyt_FOXO_DBD + Num_NUP_pSites_u; kExImFOXO_DBD__1*Num_NUP_pSites_u*Nuc_FOXO_DBD;
  R442: S101 => Nuc_TP53_DBD_Ser15_p + Nuc_CDKN1A_promoter_TP53; kDiTP53PCDKN1A*S101;
  R443: S101 => S101 + Cyt_CDKN1A_CCNE_A_B_Ser130_u; kSyCDKN1A_2*S101;
  R444: Cyt_CDKN1A_CCNE_A_B_Ser130_u => ; kDeCDKN1A_1*Cyt_CDKN1A_CCNE_A_B_Ser130_u;
  R445: Cyt_SKP2 + Cyt_CDKN1A_CCNE_A_B_Ser130_u => Cyt_SKP2; kDeCDKN1A_2*Cyt_SKP2*Cyt_CDKN1A_CCNE_A_B_Ser130_u;
  R446: Cyt_CCNA_CDKN1A_B + Cyt_CDKN1A_CCNE_A_B_Ser130_u => S105; kAsCdkn1aC*Cyt_CCNA_CDKN1A_B*Cyt_CDKN1A_CCNE_A_B_Ser130_u;
  R447: Cyt_CCNE_CDKN1A_B + Cyt_CDKN1A_CCNE_A_B_Ser130_u => S106; kAsCdkn1aC*Cyt_CCNE_CDKN1A_B*Cyt_CDKN1A_CCNE_A_B_Ser130_u;
  R448: S6 + Cyt_CDKN1A_CCNE_A_B_Ser130_u => S107; kAsCdkn1aC*S6*Cyt_CDKN1A_CCNE_A_B_Ser130_u;
  R449: S27 + Cyt_CDKN1A_CCNE_A_B_Ser130_u => S108; kAsCdkn1aC*S27*Cyt_CDKN1A_CCNE_A_B_Ser130_u;
  R450: Cyt_CCNE_CDKN1A_B + Cyt_CDKN1A_CCNE_A_B_Ser130_u => Cyt_CCNE_CDKN1A_B + Cyt_CDKN1A_CCNE_A_B_Ser130_p; kPhCDKN1AByCe*Cyt_CCNE_CDKN1A_B*Cyt_CDKN1A_CCNE_A_B_Ser130_u;
  R451: Cyt_CCNA_CDKN1A_B + Cyt_CDKN1A_CCNE_A_B_Ser130_u => Cyt_CCNA_CDKN1A_B + Cyt_CDKN1A_CCNE_A_B_Ser130_p; kPhCDKN1AByCa*Cyt_CCNA_CDKN1A_B*Cyt_CDKN1A_CCNE_A_B_Ser130_u;
  R452: S6 + Cyt_CDKN1A_CCNE_A_B_Ser130_u => S6 + Cyt_CDKN1A_CCNE_A_B_Ser130_p; kPhCDKN1AByCb*S6*Cyt_CDKN1A_CCNE_A_B_Ser130_u;
  R453: S103 => Nuc_FOXO_DBD + Nuc_CDKN1B_promoter_FOXO; kDiFOXOPCDKN1B*S103;
  R454: S103 => S103 + Cyt_CDKN1B_CCNE_A_Thr187_u; kSyCDKN1B_2*S103;
  R455: Cyt_CDKN1B_CCNE_A_Thr187_u => ; kDeCDKN1B_1*Cyt_CDKN1B_CCNE_A_Thr187_u;
  R456: Cyt_SKP2 + Cyt_CDKN1B_CCNE_A_Thr187_u => Cyt_SKP2; _rateLaw3*Cyt_SKP2*Cyt_CDKN1B_CCNE_A_Thr187_u;
  R457: Cyt_CCNA_CDKN1A_B + Cyt_CDKN1B_CCNE_A_Thr187_u => S110; kAsCdkn1bC*Cyt_CCNA_CDKN1A_B*Cyt_CDKN1B_CCNE_A_Thr187_u;
  R458: Cyt_CCNE_CDKN1A_B + Cyt_CDKN1B_CCNE_A_Thr187_u => S111; kAsCdkn1bC*Cyt_CCNE_CDKN1A_B*Cyt_CDKN1B_CCNE_A_Thr187_u;
  R459: Cyt_CCNE_CDKN1A_B + Cyt_CDKN1B_CCNE_A_Thr187_u => Cyt_CCNE_CDKN1A_B + Cyt_CDKN1B_CCNE_A_Thr187_p; kPhCDKN1BByCe*Cyt_CCNE_CDKN1A_B*Cyt_CDKN1B_CCNE_A_Thr187_u;
  R460: Cyt_CCNA_CDKN1A_B + Cyt_CDKN1B_CCNE_A_Thr187_u => Cyt_CCNA_CDKN1A_B + Cyt_CDKN1B_CCNE_A_Thr187_p; kPhCDKN1BByCa*Cyt_CCNA_CDKN1A_B*Cyt_CDKN1B_CCNE_A_Thr187_u;
  R461: S6 + Cyt_CDKN1B_CCNE_A_Thr187_u => S6 + Cyt_CDKN1B_CCNE_A_Thr187_p; kPhCDKN1BByCb*S6*Cyt_CDKN1B_CCNE_A_Thr187_u;
  R462: Num_NUP_pSites_u + Cyt_CDKN1A_CCNE_A_B_Ser130_u => Num_NUP_pSites_u + Nuc_CDKN1A_CCNE_A_B_Ser130_u; kImImCDKN1A_CCNE_A_B_Ser130u__1*Num_NUP_pSites_u*Cyt_CDKN1A_CCNE_A_B_Ser130_u;
  R463: Num_NUP_pSites_u + Cyt_CDKN1B_CCNE_A_Thr187_u => Num_NUP_pSites_u + Nuc_CDKN1B_CCNE_A_Thr187_u; kImImCDKN1B_CCNE_A_Thr187u__1*Num_NUP_pSites_u*Cyt_CDKN1B_CCNE_A_Thr187_u;
  R464: S106 => Cyt_CDKN1A_CCNE_A_B_Ser130_u; kDeCe*S106;
  R465: S111 => Cyt_CDKN1B_CCNE_A_Thr187_u; kDeCe*S111;
  R466: Cyt_CCNE_CDKN1A_B + S106 => Cyt_CCNE_CDKN1A_B + Cyt_CDKN1A_CCNE_A_B_Ser130_u; kPhCeE*Cyt_CCNE_CDKN1A_B*S106;
  R467: Cyt_CCNE_CDKN1A_B + S111 => Cyt_CCNE_CDKN1A_B + Cyt_CDKN1B_CCNE_A_Thr187_u; kPhCeE*Cyt_CCNE_CDKN1A_B*S111;
  R468: S105 => Cyt_CDKN1A_CCNE_A_B_Ser130_u; kDeCa1*S105;
  R469: S110 => Cyt_CDKN1B_CCNE_A_Thr187_u; kDeCa1*S110;
  R470: Cyt_CCNA_CDKN1A_B + S106 => Cyt_CCNA_CDKN1A_B + Cyt_CDKN1A_CCNE_A_B_Ser130_u; kPhCeA*Cyt_CCNA_CDKN1A_B*S106;
  R471: Cyt_CCNA_CDKN1A_B + S111 => Cyt_CCNA_CDKN1A_B + Cyt_CDKN1B_CCNE_A_Thr187_u; kPhCeA*Cyt_CCNA_CDKN1A_B*S111;
  R472: S16 + S105 => S16 + Cyt_CDKN1A_CCNE_A_B_Ser130_u; kDeCa2*S16*S105;
  R473: S22 + S105 => S22 + Cyt_CDKN1A_CCNE_A_B_Ser130_u; kDeCa2*S22*S105;
  R474: S16 + S110 => S16 + Cyt_CDKN1B_CCNE_A_Thr187_u; kDeCa2*S16*S110;
  R475: S22 + S110 => S22 + Cyt_CDKN1B_CCNE_A_Thr187_u; kDeCa2*S22*S110;
  R476: S14 + S105 => S14 + Cyt_CDKN1A_CCNE_A_B_Ser130_u; kDeCa3*S14*S105;
  R477: S14 + S110 => S14 + Cyt_CDKN1B_CCNE_A_Thr187_u; kDeCa3*S14*S110;
  R478: S107 => Cyt_CDKN1A_CCNE_A_B_Ser130_u; kDeCb1*S107;
  R479: S108 => Cyt_CDKN1A_CCNE_A_B_Ser130_u; kDeCb1*S108;
  R480: S16 + S107 => S16 + Cyt_CDKN1A_CCNE_A_B_Ser130_u; kDeCb2*S16*S107;
  R481: S22 + S107 => S22 + Cyt_CDKN1A_CCNE_A_B_Ser130_u; kDeCb2*S22*S107;
  R482: S16 + S108 => S16 + Cyt_CDKN1A_CCNE_A_B_Ser130_u; kDeCb2*S16*S108;
  R483: S22 + S108 => S22 + Cyt_CDKN1A_CCNE_A_B_Ser130_u; kDeCb2*S22*S108;
  R484: S14 + S107 => S14 + Cyt_CDKN1A_CCNE_A_B_Ser130_u; kDeCb3*S14*S107;
  R485: S14 + S108 => S14 + Cyt_CDKN1A_CCNE_A_B_Ser130_u; kDeCb3*S14*S108;
  R486: Cyt_WEE1_Ser123_u + S107 => Cyt_WEE1_Ser123_u + S108; kWee2*Cyt_WEE1_Ser123_u*S107;
  R487: Cyt_WEE1_Ser123_p + S107 => Cyt_WEE1_Ser123_p + S108; kWee1*Cyt_WEE1_Ser123_p*S107;
  R488: Cyt_CDC25_pSites_p + S108 => Cyt_CDC25_pSites_p + S107; kCdc25_2*Cyt_CDC25_pSites_p*S108;
  R489: Cyt_CDC25_pSites_u + S108 => Cyt_CDC25_pSites_u + S107; kCdc25_1*Cyt_CDC25_pSites_u*S108;
  R490: S105 => Cyt_CCNA_CDKN1A_B; kDeCDKN1A_1*S105;
  R491: S106 => Cyt_CCNE_CDKN1A_B; kDeCDKN1A_1*S106;
  R492: S107 => S6; kDeCDKN1A_1*S107;
  R493: S108 => S27; kDeCDKN1A_1*S108;
  R494: Cyt_CDKN1A_CCNE_A_B_Ser130_p => ; kDeCDKN1A_1*Cyt_CDKN1A_CCNE_A_B_Ser130_p;
  R495: Nuc_CDKN1A_CCNE_A_B_Ser130_u => ; kDeCDKN1A_1*Nuc_CDKN1A_CCNE_A_B_Ser130_u;
  R496: Cyt_SKP2 + Cyt_CDKN1A_CCNE_A_B_Ser130_p => Cyt_SKP2; kDeCDKN1A_2*Cyt_SKP2*Cyt_CDKN1A_CCNE_A_B_Ser130_p;
  R497: Cyt_SKP2 + S105 => Cyt_CCNA_CDKN1A_B + Cyt_SKP2; kDeCDKN1A_2*Cyt_SKP2*S105;
  R498: Cyt_SKP2 + S106 => Cyt_CCNE_CDKN1A_B + Cyt_SKP2; kDeCDKN1A_2*Cyt_SKP2*S106;
  R499: Cyt_SKP2 + S107 => S6 + Cyt_SKP2; kDeCDKN1A_2*Cyt_SKP2*S107;
  R500: Cyt_SKP2 + S108 => S27 + Cyt_SKP2; kDeCDKN1A_2*Cyt_SKP2*S108;
  R501: Nuc_SKP2 + Nuc_CDKN1A_CCNE_A_B_Ser130_u => Nuc_SKP2; kDeCDKN1A_2*Nuc_SKP2*Nuc_CDKN1A_CCNE_A_B_Ser130_u;
  R502: Nuc_CCNA_CDKN1A_B + Nuc_CDKN1A_CCNE_A_B_Ser130_u => S115; kAsCdkn1aC*Nuc_CCNA_CDKN1A_B*Nuc_CDKN1A_CCNE_A_B_Ser130_u;
  R503: S105 => Cyt_CCNA_CDKN1A_B + Cyt_CDKN1A_CCNE_A_B_Ser130_u; kDiCdkn1aC*S105;
  R504: Nuc_CCNE_CDKN1A_B + Nuc_CDKN1A_CCNE_A_B_Ser130_u => S116; kAsCdkn1aC*Nuc_CCNE_CDKN1A_B*Nuc_CDKN1A_CCNE_A_B_Ser130_u;
  R505: S106 => Cyt_CCNE_CDKN1A_B + Cyt_CDKN1A_CCNE_A_B_Ser130_u; kDiCdkn1aC*S106;
  R506: S46 + Nuc_CDKN1A_CCNE_A_B_Ser130_u => S117; kAsCdkn1aC*S46*Nuc_CDKN1A_CCNE_A_B_Ser130_u;
  R507: S71 + Nuc_CDKN1A_CCNE_A_B_Ser130_u => S118; kAsCdkn1aC*S71*Nuc_CDKN1A_CCNE_A_B_Ser130_u;
  R508: S107 => S6 + Cyt_CDKN1A_CCNE_A_B_Ser130_u; kDiCdkn1aC*S107;
  R509: S108 => S27 + Cyt_CDKN1A_CCNE_A_B_Ser130_u; kDiCdkn1aC*S108;
  R510: Nuc_CCNE_CDKN1A_B + Nuc_CDKN1A_CCNE_A_B_Ser130_u => Nuc_CCNE_CDKN1A_B + Nuc_CDKN1A_CCNE_A_B_Ser130_p; kPhCDKN1AByCe*Nuc_CCNE_CDKN1A_B*Nuc_CDKN1A_CCNE_A_B_Ser130_u;
  R511: Cyt_CCNE_CDKN1A_B + S105 => Cyt_CCNE_CDKN1A_B + Cyt_CCNA_CDKN1A_B + Cyt_CDKN1A_CCNE_A_B_Ser130_p; kPhCDKN1AByCe*Cyt_CCNE_CDKN1A_B*S105;
  R512: Cyt_CCNE_CDKN1A_B + S106 => Cyt_CCNE_CDKN1A_B + Cyt_CCNE_CDKN1A_B + Cyt_CDKN1A_CCNE_A_B_Ser130_p; kPhCDKN1AByCe*Cyt_CCNE_CDKN1A_B*S106;
  R513: Cyt_CCNE_CDKN1A_B + S107 => Cyt_CCNE_CDKN1A_B + S6 + Cyt_CDKN1A_CCNE_A_B_Ser130_p; kPhCDKN1AByCe*Cyt_CCNE_CDKN1A_B*S107;
  R514: Cyt_CCNE_CDKN1A_B + S108 => Cyt_CCNE_CDKN1A_B + S27 + Cyt_CDKN1A_CCNE_A_B_Ser130_p; kPhCDKN1AByCe*Cyt_CCNE_CDKN1A_B*S108;
  R515: Nuc_CCNA_CDKN1A_B + Nuc_CDKN1A_CCNE_A_B_Ser130_u => Nuc_CCNA_CDKN1A_B + Nuc_CDKN1A_CCNE_A_B_Ser130_p; kPhCDKN1AByCa*Nuc_CCNA_CDKN1A_B*Nuc_CDKN1A_CCNE_A_B_Ser130_u;
  R516: Cyt_CCNA_CDKN1A_B + S105 => Cyt_CCNA_CDKN1A_B + Cyt_CCNA_CDKN1A_B + Cyt_CDKN1A_CCNE_A_B_Ser130_p; kPhCDKN1AByCa*Cyt_CCNA_CDKN1A_B*S105;
  R517: Cyt_CCNA_CDKN1A_B + S106 => Cyt_CCNE_CDKN1A_B + Cyt_CCNA_CDKN1A_B + Cyt_CDKN1A_CCNE_A_B_Ser130_p; kPhCDKN1AByCa*Cyt_CCNA_CDKN1A_B*S106;
  R518: Cyt_CCNA_CDKN1A_B + S107 => Cyt_CCNA_CDKN1A_B + S6 + Cyt_CDKN1A_CCNE_A_B_Ser130_p; kPhCDKN1AByCa*Cyt_CCNA_CDKN1A_B*S107;
  R519: Cyt_CCNA_CDKN1A_B + S108 => Cyt_CCNA_CDKN1A_B + S27 + Cyt_CDKN1A_CCNE_A_B_Ser130_p; kPhCDKN1AByCa*Cyt_CCNA_CDKN1A_B*S108;
  R520: S46 + Nuc_CDKN1A_CCNE_A_B_Ser130_u => S46 + Nuc_CDKN1A_CCNE_A_B_Ser130_p; kPhCDKN1AByCb*S46*Nuc_CDKN1A_CCNE_A_B_Ser130_u;
  R521: S6 + S105 => Cyt_CCNA_CDKN1A_B + S6 + Cyt_CDKN1A_CCNE_A_B_Ser130_p; kPhCDKN1AByCb*S6*S105;
  R522: S6 + S106 => Cyt_CCNE_CDKN1A_B + S6 + Cyt_CDKN1A_CCNE_A_B_Ser130_p; kPhCDKN1AByCb*S6*S106;
  R523: S6 + S107 => S6 + S6 + Cyt_CDKN1A_CCNE_A_B_Ser130_p; kPhCDKN1AByCb*S6*S107;
  R524: S6 + S108 => S6 + S27 + Cyt_CDKN1A_CCNE_A_B_Ser130_p; kPhCDKN1AByCb*S6*S108;
  R525: Cyt_CDKN1A_CCNE_A_B_Ser130_p => Cyt_CDKN1A_CCNE_A_B_Ser130_u; kDpCDKN1A*Cyt_CDKN1A_CCNE_A_B_Ser130_p;
  R526: S110 => Cyt_CCNA_CDKN1A_B; kDeCDKN1B_1*S110;
  R527: S111 => Cyt_CCNE_CDKN1A_B; kDeCDKN1B_1*S111;
  R528: Cyt_CDKN1B_CCNE_A_Thr187_p => ; kDeCDKN1B_1*Cyt_CDKN1B_CCNE_A_Thr187_p;
  R529: Nuc_CDKN1B_CCNE_A_Thr187_u => ; kDeCDKN1B_1*Nuc_CDKN1B_CCNE_A_Thr187_u;
  R530: Cyt_SKP2 + Cyt_CDKN1B_CCNE_A_Thr187_p => Cyt_SKP2; kDeCDKN1B_2*Cyt_SKP2*Cyt_CDKN1B_CCNE_A_Thr187_p;
  R531: Cyt_SKP2 + S110 => Cyt_CCNA_CDKN1A_B + Cyt_SKP2; _rateLaw3*Cyt_SKP2*S110;
  R532: Cyt_SKP2 + S111 => Cyt_CCNE_CDKN1A_B + Cyt_SKP2; _rateLaw3*Cyt_SKP2*S111;
  R533: Nuc_SKP2 + Nuc_CDKN1B_CCNE_A_Thr187_u => Nuc_SKP2; _rateLaw3*Nuc_SKP2*Nuc_CDKN1B_CCNE_A_Thr187_u;
  R534: Cyt_CCNA_CDKN1A_B + Cyt_CDKN1B_CCNE_A_Thr187_p => S120; kAsCdkn1bC*Cyt_CCNA_CDKN1A_B*Cyt_CDKN1B_CCNE_A_Thr187_p;
  R535: Nuc_CCNA_CDKN1A_B + Nuc_CDKN1B_CCNE_A_Thr187_u => S121; kAsCdkn1bC*Nuc_CCNA_CDKN1A_B*Nuc_CDKN1B_CCNE_A_Thr187_u;
  R536: S110 => Cyt_CCNA_CDKN1A_B + Cyt_CDKN1B_CCNE_A_Thr187_u; kDiCdkn1bC*S110;
  R537: Cyt_CCNE_CDKN1A_B + Cyt_CDKN1B_CCNE_A_Thr187_p => S122; kAsCdkn1bC*Cyt_CCNE_CDKN1A_B*Cyt_CDKN1B_CCNE_A_Thr187_p;
  R538: Nuc_CCNE_CDKN1A_B + Nuc_CDKN1B_CCNE_A_Thr187_u => S123; kAsCdkn1bC*Nuc_CCNE_CDKN1A_B*Nuc_CDKN1B_CCNE_A_Thr187_u;
  R539: S111 => Cyt_CCNE_CDKN1A_B + Cyt_CDKN1B_CCNE_A_Thr187_u; kDiCdkn1bC*S111;
  R540: Cyt_CCNE_CDKN1A_B + S110 => Cyt_CCNE_CDKN1A_B + S120; kPhCDKN1BByCe*Cyt_CCNE_CDKN1A_B*S110;
  R541: Cyt_CCNE_CDKN1A_B + S111 => Cyt_CCNE_CDKN1A_B + S122; kPhCDKN1BByCe*Cyt_CCNE_CDKN1A_B*S111;
  R542: Nuc_CCNE_CDKN1A_B + Nuc_CDKN1B_CCNE_A_Thr187_u => Nuc_CCNE_CDKN1A_B + Nuc_CDKN1B_CCNE_A_Thr187_p; kPhCDKN1BByCe*Nuc_CCNE_CDKN1A_B*Nuc_CDKN1B_CCNE_A_Thr187_u;
  R543: Cyt_CCNA_CDKN1A_B + S110 => Cyt_CCNA_CDKN1A_B + S120; kPhCDKN1BByCa*Cyt_CCNA_CDKN1A_B*S110;
  R544: Cyt_CCNA_CDKN1A_B + S111 => Cyt_CCNA_CDKN1A_B + S122; kPhCDKN1BByCa*Cyt_CCNA_CDKN1A_B*S111;
  R545: Nuc_CCNA_CDKN1A_B + Nuc_CDKN1B_CCNE_A_Thr187_u => Nuc_CCNA_CDKN1A_B + Nuc_CDKN1B_CCNE_A_Thr187_p; kPhCDKN1BByCa*Nuc_CCNA_CDKN1A_B*Nuc_CDKN1B_CCNE_A_Thr187_u;
  R546: S6 + S110 => S6 + S120; kPhCDKN1BByCb*S6*S110;
  R547: S6 + S111 => S6 + S122; kPhCDKN1BByCb*S6*S111;
  R548: S46 + Nuc_CDKN1B_CCNE_A_Thr187_u => S46 + Nuc_CDKN1B_CCNE_A_Thr187_p; kPhCDKN1BByCb*S46*Nuc_CDKN1B_CCNE_A_Thr187_u;
  R549: Cyt_CDKN1B_CCNE_A_Thr187_p => Cyt_CDKN1B_CCNE_A_Thr187_u; kDpCDKN1B*Cyt_CDKN1B_CCNE_A_Thr187_p;
  R550: Num_NUP_pSites_u + Nuc_CDKN1A_CCNE_A_B_Ser130_u => Num_NUP_pSites_u + Cyt_CDKN1A_CCNE_A_B_Ser130_u; kExImCDKN1A_CCNE_A_B_Ser130u__1*Num_NUP_pSites_u*Nuc_CDKN1A_CCNE_A_B_Ser130_u;
  R551: Num_NUP_pSites_u + Nuc_CDKN1B_CCNE_A_Thr187_u => Num_NUP_pSites_u + Cyt_CDKN1B_CCNE_A_Thr187_u; kExImCDKN1B_CCNE_A_Thr187u__1*Num_NUP_pSites_u*Nuc_CDKN1B_CCNE_A_Thr187_u;
  R552: Num_NUP_pSites_u + S105 => Num_NUP_pSites_u + S115; kImImCCNA_CDKN1A_B1__CDKN1A_CCNE_A_B1_Ser130u__1*Num_NUP_pSites_u*S105;
  R553: Num_NUP_pSites_u + S106 => Num_NUP_pSites_u + S116; kImImCCNE_CDKN1A_B1__CDKN1A_CCNE_A_B1_Ser130u__1*Num_NUP_pSites_u*S106;
  R554: Num_NUP_pSites_u + S107 => Num_NUP_pSites_u + S117; kImImCCNB_CDK1_Thr14_Tyr15u_CDKN1A1__CDKN1A_CCNE_A_B1_Ser130u__1*Num_NUP_pSites_u*S107;
  R555: Num_NUP_pSites_u + S108 => Num_NUP_pSites_u + S118; kImImCCNB_CDK1_Thr14_Tyr15p_CDKN1A1__CDKN1A_CCNE_A_B1_Ser130u__1*Num_NUP_pSites_u*S108;
  R556: Num_NUP_pSites_u + Cyt_CDKN1A_CCNE_A_B_Ser130_p => Num_NUP_pSites_u + Nuc_CDKN1A_CCNE_A_B_Ser130_p; kImImCDKN1A_CCNE_A_B_Ser130p__1*Num_NUP_pSites_u*Cyt_CDKN1A_CCNE_A_B_Ser130_p;
  R557: Num_NUP_pSites_u + S110 => Num_NUP_pSites_u + S121; kImImCCNA_CDKN1A_B1__CDKN1B_CCNE_A1_Thr187u__1*Num_NUP_pSites_u*S110;
  R558: Num_NUP_pSites_u + S111 => Num_NUP_pSites_u + S123; kImImCCNE_CDKN1A_B1__CDKN1B_CCNE_A1_Thr187u__1*Num_NUP_pSites_u*S111;
  R559: Num_NUP_pSites_u + Cyt_CDKN1B_CCNE_A_Thr187_p => Num_NUP_pSites_u + Nuc_CDKN1B_CCNE_A_Thr187_p; kImImCDKN1B_CCNE_A_Thr187p__1*Num_NUP_pSites_u*Cyt_CDKN1B_CCNE_A_Thr187_p;
  R560: S116 => Nuc_CDKN1A_CCNE_A_B_Ser130_u; kDeCe*S116;
  R561: S122 => Cyt_CDKN1B_CCNE_A_Thr187_p; kDeCe*S122;
  R562: S123 => Nuc_CDKN1B_CCNE_A_Thr187_u; kDeCe*S123;
  R563: Cyt_CCNE_CDKN1A_B + S122 => Cyt_CCNE_CDKN1A_B + Cyt_CDKN1B_CCNE_A_Thr187_p; kPhCeE*Cyt_CCNE_CDKN1A_B*S122;
  R564: Nuc_CCNE_CDKN1A_B + S116 => Nuc_CCNE_CDKN1A_B + Nuc_CDKN1A_CCNE_A_B_Ser130_u; kPhCeE*Nuc_CCNE_CDKN1A_B*S116;
  R565: Nuc_CCNE_CDKN1A_B + S123 => Nuc_CCNE_CDKN1A_B + Nuc_CDKN1B_CCNE_A_Thr187_u; kPhCeE*Nuc_CCNE_CDKN1A_B*S123;
  R566: S115 => Nuc_CDKN1A_CCNE_A_B_Ser130_u; kDeCa1*S115;
  R567: S120 => Cyt_CDKN1B_CCNE_A_Thr187_p; kDeCa1*S120;
  R568: S121 => Nuc_CDKN1B_CCNE_A_Thr187_u; kDeCa1*S121;
  R569: Nuc_CCNA_CDKN1A_B + S116 => Nuc_CCNA_CDKN1A_B + Nuc_CDKN1A_CCNE_A_B_Ser130_u; kPhCeA*Nuc_CCNA_CDKN1A_B*S116;
  R570: Cyt_CCNA_CDKN1A_B + S122 => Cyt_CCNA_CDKN1A_B + Cyt_CDKN1B_CCNE_A_Thr187_p; kPhCeA*Cyt_CCNA_CDKN1A_B*S122;
  R571: Nuc_CCNA_CDKN1A_B + S123 => Nuc_CCNA_CDKN1A_B + Nuc_CDKN1B_CCNE_A_Thr187_u; kPhCeA*Nuc_CCNA_CDKN1A_B*S123;
  R572: S56 + S115 => S56 + Nuc_CDKN1A_CCNE_A_B_Ser130_u; kDeCa2*S56*S115;
  R573: S62 + S115 => S62 + Nuc_CDKN1A_CCNE_A_B_Ser130_u; kDeCa2*S62*S115;
  R574: S16 + S120 => S16 + Cyt_CDKN1B_CCNE_A_Thr187_p; kDeCa2*S16*S120;
  R575: S22 + S120 => S22 + Cyt_CDKN1B_CCNE_A_Thr187_p; kDeCa2*S22*S120;
  R576: S56 + S121 => S56 + Nuc_CDKN1B_CCNE_A_Thr187_u; kDeCa2*S56*S121;
  R577: S62 + S121 => S62 + Nuc_CDKN1B_CCNE_A_Thr187_u; kDeCa2*S62*S121;
  R578: S54 + S115 => S54 + Nuc_CDKN1A_CCNE_A_B_Ser130_u; kDeCa3*S54*S115;
  R579: S14 + S120 => S14 + Cyt_CDKN1B_CCNE_A_Thr187_p; kDeCa3*S14*S120;
  R580: S54 + S121 => S54 + Nuc_CDKN1B_CCNE_A_Thr187_u; kDeCa3*S54*S121;
  R581: S117 => Nuc_CDKN1A_CCNE_A_B_Ser130_u; kDeCb1*S117;
  R582: S118 => Nuc_CDKN1A_CCNE_A_B_Ser130_u; kDeCb1*S118;
  R583: S56 + S117 => S56 + Nuc_CDKN1A_CCNE_A_B_Ser130_u; kDeCb2*S56*S117;
  R584: S62 + S117 => S62 + Nuc_CDKN1A_CCNE_A_B_Ser130_u; kDeCb2*S62*S117;
  R585: S56 + S118 => S56 + Nuc_CDKN1A_CCNE_A_B_Ser130_u; kDeCb2*S56*S118;
  R586: S62 + S118 => S62 + Nuc_CDKN1A_CCNE_A_B_Ser130_u; kDeCb2*S62*S118;
  R587: S54 + S117 => S54 + Nuc_CDKN1A_CCNE_A_B_Ser130_u; kDeCb3*S54*S117;
  R588: S54 + S118 => S54 + Nuc_CDKN1A_CCNE_A_B_Ser130_u; kDeCb3*S54*S118;
  R589: Nuc_WEE1_Ser123_u + S117 => Nuc_WEE1_Ser123_u + S118; kWee2*Nuc_WEE1_Ser123_u*S117;
  R590: Nuc_WEE1_Ser123_p + S117 => Nuc_WEE1_Ser123_p + S118; kWee1*Nuc_WEE1_Ser123_p*S117;
  R591: Nuc_CDC25_pSites_p + S118 => Nuc_CDC25_pSites_p + S117; kCdc25_2*Nuc_CDC25_pSites_p*S118;
  R592: Nuc_CDC25_pSites_u + S118 => Nuc_CDC25_pSites_u + S117; kCdc25_1*Nuc_CDC25_pSites_u*S118;
  R593: S115 => Nuc_CCNA_CDKN1A_B; kDeCDKN1A_1*S115;
  R594: S116 => Nuc_CCNE_CDKN1A_B; kDeCDKN1A_1*S116;
  R595: S117 => S46; kDeCDKN1A_1*S117;
  R596: S118 => S71; kDeCDKN1A_1*S118;
  R597: Nuc_CDKN1A_CCNE_A_B_Ser130_p => ; kDeCDKN1A_1*Nuc_CDKN1A_CCNE_A_B_Ser130_p;
  R598: Nuc_SKP2 + Nuc_CDKN1A_CCNE_A_B_Ser130_p => Nuc_SKP2; kDeCDKN1A_2*Nuc_SKP2*Nuc_CDKN1A_CCNE_A_B_Ser130_p;
  R599: Nuc_SKP2 + S115 => Nuc_CCNA_CDKN1A_B + Nuc_SKP2; kDeCDKN1A_2*Nuc_SKP2*S115;
  R600: Nuc_SKP2 + S116 => Nuc_CCNE_CDKN1A_B + Nuc_SKP2; kDeCDKN1A_2*Nuc_SKP2*S116;
  R601: Nuc_SKP2 + S117 => S46 + Nuc_SKP2; kDeCDKN1A_2*Nuc_SKP2*S117;
  R602: Nuc_SKP2 + S118 => S71 + Nuc_SKP2; kDeCDKN1A_2*Nuc_SKP2*S118;
  R603: S115 => Nuc_CCNA_CDKN1A_B + Nuc_CDKN1A_CCNE_A_B_Ser130_u; kDiCdkn1aC*S115;
  R604: S116 => Nuc_CCNE_CDKN1A_B + Nuc_CDKN1A_CCNE_A_B_Ser130_u; kDiCdkn1aC*S116;
  R605: S117 => S46 + Nuc_CDKN1A_CCNE_A_B_Ser130_u; kDiCdkn1aC*S117;
  R606: S118 => S71 + Nuc_CDKN1A_CCNE_A_B_Ser130_u; kDiCdkn1aC*S118;
  R607: Nuc_CCNE_CDKN1A_B + S115 => Nuc_CCNE_CDKN1A_B + Nuc_CCNA_CDKN1A_B + Nuc_CDKN1A_CCNE_A_B_Ser130_p; kPhCDKN1AByCe*Nuc_CCNE_CDKN1A_B*S115;
  R608: Nuc_CCNE_CDKN1A_B + S116 => Nuc_CCNE_CDKN1A_B + Nuc_CCNE_CDKN1A_B + Nuc_CDKN1A_CCNE_A_B_Ser130_p; kPhCDKN1AByCe*Nuc_CCNE_CDKN1A_B*S116;
  R609: Nuc_CCNE_CDKN1A_B + S117 => Nuc_CCNE_CDKN1A_B + S46 + Nuc_CDKN1A_CCNE_A_B_Ser130_p; kPhCDKN1AByCe*Nuc_CCNE_CDKN1A_B*S117;
  R610: Nuc_CCNE_CDKN1A_B + S118 => Nuc_CCNE_CDKN1A_B + S71 + Nuc_CDKN1A_CCNE_A_B_Ser130_p; kPhCDKN1AByCe*Nuc_CCNE_CDKN1A_B*S118;
  R611: Nuc_CCNA_CDKN1A_B + S115 => Nuc_CCNA_CDKN1A_B + Nuc_CCNA_CDKN1A_B + Nuc_CDKN1A_CCNE_A_B_Ser130_p; kPhCDKN1AByCa*Nuc_CCNA_CDKN1A_B*S115;
  R612: Nuc_CCNA_CDKN1A_B + S116 => Nuc_CCNE_CDKN1A_B + Nuc_CCNA_CDKN1A_B + Nuc_CDKN1A_CCNE_A_B_Ser130_p; kPhCDKN1AByCa*Nuc_CCNA_CDKN1A_B*S116;
  R613: Nuc_CCNA_CDKN1A_B + S117 => Nuc_CCNA_CDKN1A_B + S46 + Nuc_CDKN1A_CCNE_A_B_Ser130_p; kPhCDKN1AByCa*Nuc_CCNA_CDKN1A_B*S117;
  R614: Nuc_CCNA_CDKN1A_B + S118 => Nuc_CCNA_CDKN1A_B + S71 + Nuc_CDKN1A_CCNE_A_B_Ser130_p; kPhCDKN1AByCa*Nuc_CCNA_CDKN1A_B*S118;
  R615: S46 + S115 => Nuc_CCNA_CDKN1A_B + S46 + Nuc_CDKN1A_CCNE_A_B_Ser130_p; kPhCDKN1AByCb*S46*S115;
  R616: S46 + S116 => Nuc_CCNE_CDKN1A_B + S46 + Nuc_CDKN1A_CCNE_A_B_Ser130_p; kPhCDKN1AByCb*S46*S116;
  R617: S46 + S117 => S46 + S46 + Nuc_CDKN1A_CCNE_A_B_Ser130_p; kPhCDKN1AByCb*S46*S117;
  R618: S46 + S118 => S46 + S71 + Nuc_CDKN1A_CCNE_A_B_Ser130_p; kPhCDKN1AByCb*S46*S118;
  R619: Nuc_CDKN1A_CCNE_A_B_Ser130_p => Nuc_CDKN1A_CCNE_A_B_Ser130_u; kDpCDKN1A*Nuc_CDKN1A_CCNE_A_B_Ser130_p;
  R620: S120 => Cyt_CCNA_CDKN1A_B; kDeCDKN1B_1*S120;
  R621: S121 => Nuc_CCNA_CDKN1A_B; kDeCDKN1B_1*S121;
  R622: S122 => Cyt_CCNE_CDKN1A_B; kDeCDKN1B_1*S122;
  R623: S123 => Nuc_CCNE_CDKN1A_B; kDeCDKN1B_1*S123;
  R624: Nuc_CDKN1B_CCNE_A_Thr187_p => ; kDeCDKN1B_1*Nuc_CDKN1B_CCNE_A_Thr187_p;
  R625: Cyt_SKP2 + S120 => Cyt_CCNA_CDKN1A_B + Cyt_SKP2; kDeCDKN1B_2*Cyt_SKP2*S120;
  R626: Cyt_SKP2 + S122 => Cyt_CCNE_CDKN1A_B + Cyt_SKP2; kDeCDKN1B_2*Cyt_SKP2*S122;
  R627: Nuc_SKP2 + Nuc_CDKN1B_CCNE_A_Thr187_p => Nuc_SKP2; kDeCDKN1B_2*Nuc_SKP2*Nuc_CDKN1B_CCNE_A_Thr187_p;
  R628: Nuc_SKP2 + S121 => Nuc_CCNA_CDKN1A_B + Nuc_SKP2; _rateLaw3*Nuc_SKP2*S121;
  R629: Nuc_SKP2 + S123 => Nuc_CCNE_CDKN1A_B + Nuc_SKP2; _rateLaw3*Nuc_SKP2*S123;
  R630: Nuc_CCNA_CDKN1A_B + Nuc_CDKN1B_CCNE_A_Thr187_p => S125; kAsCdkn1bC*Nuc_CCNA_CDKN1A_B*Nuc_CDKN1B_CCNE_A_Thr187_p;
  R631: S120 => Cyt_CCNA_CDKN1A_B + Cyt_CDKN1B_CCNE_A_Thr187_p; kDiCdkn1bC*S120;
  R632: S121 => Nuc_CCNA_CDKN1A_B + Nuc_CDKN1B_CCNE_A_Thr187_u; kDiCdkn1bC*S121;
  R633: Nuc_CCNE_CDKN1A_B + Nuc_CDKN1B_CCNE_A_Thr187_p => S126; kAsCdkn1bC*Nuc_CCNE_CDKN1A_B*Nuc_CDKN1B_CCNE_A_Thr187_p;
  R634: S122 => Cyt_CCNE_CDKN1A_B + Cyt_CDKN1B_CCNE_A_Thr187_p; kDiCdkn1bC*S122;
  R635: S123 => Nuc_CCNE_CDKN1A_B + Nuc_CDKN1B_CCNE_A_Thr187_u; kDiCdkn1bC*S123;
  R636: Nuc_CCNE_CDKN1A_B + S121 => Nuc_CCNE_CDKN1A_B + S125; kPhCDKN1BByCe*Nuc_CCNE_CDKN1A_B*S121;
  R637: Nuc_CCNE_CDKN1A_B + S123 => Nuc_CCNE_CDKN1A_B + S126; kPhCDKN1BByCe*Nuc_CCNE_CDKN1A_B*S123;
  R638: Nuc_CCNA_CDKN1A_B + S121 => Nuc_CCNA_CDKN1A_B + S125; kPhCDKN1BByCa*Nuc_CCNA_CDKN1A_B*S121;
  R639: Nuc_CCNA_CDKN1A_B + S123 => Nuc_CCNA_CDKN1A_B + S126; kPhCDKN1BByCa*Nuc_CCNA_CDKN1A_B*S123;
  R640: S46 + S121 => S46 + S125; kPhCDKN1BByCb*S46*S121;
  R641: S46 + S123 => S46 + S126; kPhCDKN1BByCb*S46*S123;
  R642: S120 => S110; kDpCDKN1B*S120;
  R643: S122 => S111; kDpCDKN1B*S122;
  R644: Nuc_CDKN1B_CCNE_A_Thr187_p => Nuc_CDKN1B_CCNE_A_Thr187_u; kDpCDKN1B*Nuc_CDKN1B_CCNE_A_Thr187_p;
  R645: Num_NUP_pSites_u + S115 => Num_NUP_pSites_u + S105; kExImCCNA_CDKN1A_B1__CDKN1A_CCNE_A_B1_Ser130u__1*Num_NUP_pSites_u*S115;
  R646: Num_NUP_pSites_u + S116 => Num_NUP_pSites_u + S106; kExImCCNE_CDKN1A_B1__CDKN1A_CCNE_A_B1_Ser130u__1*Num_NUP_pSites_u*S116;
  R647: Num_NUP_pSites_u + S117 => Num_NUP_pSites_u + S107; kExImCCNB_CDK1_Thr14_Tyr15u_CDKN1A1__CDKN1A_CCNE_A_B1_Ser130u__1*Num_NUP_pSites_u*S117;
  R648: Num_NUP_pSites_u + S118 => Num_NUP_pSites_u + S108; kExImCCNB_CDK1_Thr14_Tyr15p_CDKN1A1__CDKN1A_CCNE_A_B1_Ser130u__1*Num_NUP_pSites_u*S118;
  R649: Num_NUP_pSites_u + Nuc_CDKN1A_CCNE_A_B_Ser130_p => Num_NUP_pSites_u + Cyt_CDKN1A_CCNE_A_B_Ser130_p; kExImCDKN1A_CCNE_A_B_Ser130p__1*Num_NUP_pSites_u*Nuc_CDKN1A_CCNE_A_B_Ser130_p;
  R650: Num_NUP_pSites_u + S121 => Num_NUP_pSites_u + S110; kExImCCNA_CDKN1A_B1__CDKN1B_CCNE_A1_Thr187u__1*Num_NUP_pSites_u*S121;
  R651: Num_NUP_pSites_u + S123 => Num_NUP_pSites_u + S111; kExImCCNE_CDKN1A_B1__CDKN1B_CCNE_A1_Thr187u__1*Num_NUP_pSites_u*S123;
  R652: Num_NUP_pSites_u + Nuc_CDKN1B_CCNE_A_Thr187_p => Num_NUP_pSites_u + Cyt_CDKN1B_CCNE_A_Thr187_p; kExImCDKN1B_CCNE_A_Thr187p__1*Num_NUP_pSites_u*Nuc_CDKN1B_CCNE_A_Thr187_p;
  R653: Num_NUP_pSites_u + S120 => Num_NUP_pSites_u + S125; kImImCCNA_CDKN1A_B1__CDKN1B_CCNE_A1_Thr187p__1*Num_NUP_pSites_u*S120;
  R654: Num_NUP_pSites_u + S122 => Num_NUP_pSites_u + S126; kImImCCNE_CDKN1A_B1__CDKN1B_CCNE_A1_Thr187p__1*Num_NUP_pSites_u*S122;
  R655: S126 => Nuc_CDKN1B_CCNE_A_Thr187_p; kDeCe*S126;
  R656: Nuc_CCNE_CDKN1A_B + S126 => Nuc_CCNE_CDKN1A_B + Nuc_CDKN1B_CCNE_A_Thr187_p; kPhCeE*Nuc_CCNE_CDKN1A_B*S126;
  R657: S125 => Nuc_CDKN1B_CCNE_A_Thr187_p; kDeCa1*S125;
  R658: Nuc_CCNA_CDKN1A_B + S126 => Nuc_CCNA_CDKN1A_B + Nuc_CDKN1B_CCNE_A_Thr187_p; kPhCeA*Nuc_CCNA_CDKN1A_B*S126;
  R659: S56 + S125 => S56 + Nuc_CDKN1B_CCNE_A_Thr187_p; kDeCa2*S56*S125;
  R660: S62 + S125 => S62 + Nuc_CDKN1B_CCNE_A_Thr187_p; kDeCa2*S62*S125;
  R661: S54 + S125 => S54 + Nuc_CDKN1B_CCNE_A_Thr187_p; kDeCa3*S54*S125;
  R662: S125 => Nuc_CCNA_CDKN1A_B; kDeCDKN1B_1*S125;
  R663: S126 => Nuc_CCNE_CDKN1A_B; kDeCDKN1B_1*S126;
  R664: Nuc_SKP2 + S125 => Nuc_CCNA_CDKN1A_B + Nuc_SKP2; kDeCDKN1B_2*Nuc_SKP2*S125;
  R665: Nuc_SKP2 + S126 => Nuc_CCNE_CDKN1A_B + Nuc_SKP2; kDeCDKN1B_2*Nuc_SKP2*S126;
  R666: S125 => Nuc_CCNA_CDKN1A_B + Nuc_CDKN1B_CCNE_A_Thr187_p; kDiCdkn1bC*S125;
  R667: S126 => Nuc_CCNE_CDKN1A_B + Nuc_CDKN1B_CCNE_A_Thr187_p; kDiCdkn1bC*S126;
  R668: S125 => S121; kDpCDKN1B*S125;
  R669: S126 => S123; kDpCDKN1B*S126;
  R670: Num_NUP_pSites_u + S125 => Num_NUP_pSites_u + S120; kExImCCNA_CDKN1A_B1__CDKN1B_CCNE_A1_Thr187p__1*Num_NUP_pSites_u*S125;
  R671: Num_NUP_pSites_u + S126 => Num_NUP_pSites_u + S122; kExImCCNE_CDKN1A_B1__CDKN1B_CCNE_A1_Thr187p__1*Num_NUP_pSites_u*S126;
end
