// SBML level 2 version 3

model cell_cycle_v4.0.0()

  // Compartments:
  compartment Plm = 2e-14;  // 2-D
  compartment Cyt in Plm = 1e-12;
  compartment Num in Cyt = 9e-15;  // 2-D
  compartment Nuc in Num = 1e-12;

  // Species:
  species Cyt_CCND in Cyt = 6.022e11/Cyt; Cyt_CCND is "@Cyt::CCND()";
  species Cyt_CCNE_CDKN1A_B in Cyt = 1.3986043e11/Cyt; Cyt_CCNE_CDKN1A_B is "@Cyt::CCNE(CDKN1A_B)";
  species Cyt_E2F_DBD_RB1_Ser332_u in Cyt = 1.1128068e10/Cyt; Cyt_E2F_DBD_RB1_Ser332_u is "@Cyt::E2F(DBD,RB1,Ser332~u)";
  species Cyt_E2F_DBD_RB1_Ser332_p in Cyt = 22932894/Cyt; Cyt_E2F_DBD_RB1_Ser332_p is "@Cyt::E2F(DBD,RB1,Ser332~p)";
  species Cyt_CCNA_CDKN1A_B in Cyt = 4.2325597e9/Cyt; Cyt_CCNA_CDKN1A_B is "@Cyt::CCNA(CDKN1A_B)";
  species S6 in Cyt = 1.133559e9/Cyt; S6 is "@Cyt::CCNB(CDK1_Thr14_Tyr15~u,CDKN1A)";
  species S7 in Cyt = 4.3034014e10/Cyt; S7 is "@Cyt::E2F(DBD,RB1!1,Ser332~u).RB1(E2F!1,Ser807_Ser811~u)";
  species S8 in Cyt = 90654340/Cyt; S8 is "@Cyt::E2F(DBD,RB1!1,Ser332~p).RB1(E2F!1,Ser807_Ser811~u)";
  species Cyt_RB1_E2F_Ser807_Ser811_u in Cyt = 5.2778426e10/Cyt; Cyt_RB1_E2F_Ser807_Ser811_u is "@Cyt::RB1(E2F,Ser807_Ser811~u)";
  species Cyt_RB1_E2F_Ser807_Ser811_p in Cyt = 5.0629691e11/Cyt; Cyt_RB1_E2F_Ser807_Ser811_p is "@Cyt::RB1(E2F,Ser807_Ser811~p)";
  species Cyt_PPP2R2B_ENSA_ARPP19 in Cyt = 4.6484797e10/Cyt; Cyt_PPP2R2B_ENSA_ARPP19 is "@Cyt::PPP2R2B(ENSA_ARPP19)";
  species S12 in Cyt = 2.4260911e12/Cyt; S12 is "@Cyt::APC(FBXO5,FZR1_CDC20,Ser355~u)";
  species Cyt_CDC20_APC in Cyt = 1.3847757e11/Cyt; Cyt_CDC20_APC is "@Cyt::CDC20(APC)";
  species S14 in Cyt = 4.2087805e10/Cyt; S14 is "@Cyt::APC(FBXO5,FZR1_CDC20!1,Ser355~p).CDC20(APC!1)";
  species S15 in Cyt = 3.7993439e10/Cyt; S15 is "@Cyt::APC(FBXO5,FZR1_CDC20,Ser355~p)";
  species S16 in Cyt = 4.2969631e11/Cyt; S16 is "@Cyt::APC(FBXO5,FZR1_CDC20!1,Ser355~u).FZR1(APC!1,FBXO5,nTerm~u)";
  species Cyt_FZR1_APC_FBXO5_nTerm_u in Cyt = 3.4406152e8/Cyt; Cyt_FZR1_APC_FBXO5_nTerm_u is "@Cyt::FZR1(APC,FBXO5,nTerm~u)";
  species Cyt_FZR1_APC_FBXO5_nTerm_p in Cyt = 9.7028319e10/Cyt; Cyt_FZR1_APC_FBXO5_nTerm_p is "@Cyt::FZR1(APC,FBXO5,nTerm~p)";
  species S19 in Cyt = 6.5604459e10/Cyt; S19 is "@Cyt::APC(FBXO5!1,FZR1_CDC20!2,Ser355~u).FBXO5(APC!1,FZR1!3,Ser182~u).FZR1(APC!2,FBXO5!3,nTerm~u)";
  species Cyt_FBXO5_APC_FZR1_Ser182_u in Cyt = 4.3226888e8/Cyt; Cyt_FBXO5_APC_FZR1_Ser182_u is "@Cyt::FBXO5(APC,FZR1,Ser182~u)";
  species S21 in Cyt = 1.3323959e9/Cyt; S21 is "@Cyt::APC(FBXO5!1,FZR1_CDC20!2,Ser355~p).FBXO5(APC!1,FZR1!3,Ser182~u).FZR1(APC!2,FBXO5!3,nTerm~u)";
  species S22 in Cyt = 8.1944566e9/Cyt; S22 is "@Cyt::APC(FBXO5,FZR1_CDC20!1,Ser355~p).FZR1(APC!1,FBXO5,nTerm~u)";
  species Cyt_FBXO5_APC_FZR1_Ser182_p in Cyt = 11324333/Cyt; Cyt_FBXO5_APC_FZR1_Ser182_p is "@Cyt::FBXO5(APC,FZR1,Ser182~p)";
  species Cyt_FOXM1_DBD_Thr600_u in Cyt = 3.3510826e9/Cyt; Cyt_FOXM1_DBD_Thr600_u is "@Cyt::FOXM1(DBD,Thr600~u)";
  species Cyt_FOXM1_DBD_Thr600_p in Cyt = 2.2950816e8/Cyt; Cyt_FOXM1_DBD_Thr600_p is "@Cyt::FOXM1(DBD,Thr600~p)";
  species Cyt_WEE1_Ser123_u in Cyt = 5.9042195e11/Cyt; Cyt_WEE1_Ser123_u is "@Cyt::WEE1(Ser123~u)";
  species S27 in Cyt = 4.5242773e9/Cyt; S27 is "@Cyt::CCNB(CDK1_Thr14_Tyr15~p,CDKN1A)";
  species Cyt_WEE1_Ser123_p in Cyt = 1.1778049e10/Cyt; Cyt_WEE1_Ser123_p is "@Cyt::WEE1(Ser123~p)";
  species Cyt_CDC25_pSites_p in Cyt = 1.1103404e10/Cyt; Cyt_CDC25_pSites_p is "@Cyt::CDC25(pSites~p)";
  species Cyt_CDC25_pSites_u in Cyt = 5.910966e11/Cyt; Cyt_CDC25_pSites_u is "@Cyt::CDC25(pSites~u)";
  species Cyt_MASTL_Thr198_u in Cyt = 6.0070998e11/Cyt; Cyt_MASTL_Thr198_u is "@Cyt::MASTL(Thr198~u)";
  species Cyt_MASTL_Thr198_p in Cyt = 1.4900204e9/Cyt; Cyt_MASTL_Thr198_p is "@Cyt::MASTL(Thr198~p)";
  species S33 in Cyt = 4.9793694e11/Cyt; S33 is "@Cyt::ENSA_ARPP19(PPP2R2B,Ser62_Ser67~u)";
  species S34 in Cyt = 1.9785953e8/Cyt; S34 is "@Cyt::ENSA_ARPP19(PPP2R2B,Ser62_Ser67~p)";
  species S35 in Cyt = 1.040652e11/Cyt; S35 is "@Cyt::ENSA_ARPP19(PPP2R2B!1,Ser62_Ser67~p).PPP2R2B(ENSA_ARPP19!1)";
  species Cyt_iWEE in Cyt = 0; Cyt_iWEE is "@Cyt::iWEE()";
  species Cyt_SKP2 in Cyt = 6.022e11/Cyt; Cyt_SKP2 is "@Cyt::SKP2()";
  species Cyt_TP53_DBD_Ser15_p in Cyt = 0; Cyt_TP53_DBD_Ser15_p is "@Cyt::TP53(DBD,Ser15~p)";
  species Cyt_FOXO_DBD in Cyt = 6.022e11/Cyt; Cyt_FOXO_DBD is "@Cyt::FOXO(DBD)";
  species Num_NUP_pSites_u in Num = 2980.89/Num; Num_NUP_pSites_u is "@Num::NUP(pSites~u)";
  species Nuc_CCND in Nuc = 6.022e11/Nuc; Nuc_CCND is "@Nuc::CCND()";
  species Nuc_CCNE_CDKN1A_B in Nuc = 1.3986043e11/Nuc; Nuc_CCNE_CDKN1A_B is "@Nuc::CCNE(CDKN1A_B)";
  species Nuc_E2F_DBD_RB1_Ser332_u in Nuc = 1.1128068e10/Nuc; Nuc_E2F_DBD_RB1_Ser332_u is "@Nuc::E2F(DBD,RB1,Ser332~u)";
  species Nuc_E2F_DBD_RB1_Ser332_p in Nuc = 22932894/Nuc; Nuc_E2F_DBD_RB1_Ser332_p is "@Nuc::E2F(DBD,RB1,Ser332~p)";
  species Nuc_CCNA_CDKN1A_B in Nuc = 4.2325597e9/Nuc; Nuc_CCNA_CDKN1A_B is "@Nuc::CCNA(CDKN1A_B)";
  species S46 in Nuc = 1.133559e9/Nuc; S46 is "@Nuc::CCNB(CDK1_Thr14_Tyr15~u,CDKN1A)";
  species S47 in Nuc = 4.3034014e10/Nuc; S47 is "@Nuc::E2F(DBD,RB1!1,Ser332~u).RB1(E2F!1,Ser807_Ser811~u)";
  species S48 in Nuc = 90654340/Nuc; S48 is "@Nuc::E2F(DBD,RB1!1,Ser332~p).RB1(E2F!1,Ser807_Ser811~u)";
  species Nuc_RB1_E2F_Ser807_Ser811_u in Nuc = 5.2778426e10/Nuc; Nuc_RB1_E2F_Ser807_Ser811_u is "@Nuc::RB1(E2F,Ser807_Ser811~u)";
  species Nuc_RB1_E2F_Ser807_Ser811_p in Nuc = 5.0629691e11/Nuc; Nuc_RB1_E2F_Ser807_Ser811_p is "@Nuc::RB1(E2F,Ser807_Ser811~p)";
  species Nuc_PPP2R2B_ENSA_ARPP19 in Nuc = 4.6484797e10/Nuc; Nuc_PPP2R2B_ENSA_ARPP19 is "@Nuc::PPP2R2B(ENSA_ARPP19)";
  species S52 in Nuc = 2.4260911e12/Nuc; S52 is "@Nuc::APC(FBXO5,FZR1_CDC20,Ser355~u)";
  species Nuc_CDC20_APC in Nuc = 1.3847757e11/Nuc; Nuc_CDC20_APC is "@Nuc::CDC20(APC)";
  species S54 in Nuc = 4.2087805e10/Nuc; S54 is "@Nuc::APC(FBXO5,FZR1_CDC20!1,Ser355~p).CDC20(APC!1)";
  species S55 in Nuc = 3.7993439e10/Nuc; S55 is "@Nuc::APC(FBXO5,FZR1_CDC20,Ser355~p)";
  species S56 in Nuc = 4.2969631e11/Nuc; S56 is "@Nuc::APC(FBXO5,FZR1_CDC20!1,Ser355~u).FZR1(APC!1,FBXO5,nTerm~u)";
  species Nuc_FZR1_APC_FBXO5_nTerm_u in Nuc = 3.4406152e8/Nuc; Nuc_FZR1_APC_FBXO5_nTerm_u is "@Nuc::FZR1(APC,FBXO5,nTerm~u)";
  species Nuc_FZR1_APC_FBXO5_nTerm_p in Nuc = 9.7028319e10/Nuc; Nuc_FZR1_APC_FBXO5_nTerm_p is "@Nuc::FZR1(APC,FBXO5,nTerm~p)";
  species S59 in Nuc = 6.5604459e10/Nuc; S59 is "@Nuc::APC(FBXO5!1,FZR1_CDC20!2,Ser355~u).FBXO5(APC!1,FZR1!3,Ser182~u).FZR1(APC!2,FBXO5!3,nTerm~u)";
  species Nuc_FBXO5_APC_FZR1_Ser182_u in Nuc = 4.3226888e8/Nuc; Nuc_FBXO5_APC_FZR1_Ser182_u is "@Nuc::FBXO5(APC,FZR1,Ser182~u)";
  species S61 in Nuc = 1.3323959e9/Nuc; S61 is "@Nuc::APC(FBXO5!1,FZR1_CDC20!2,Ser355~p).FBXO5(APC!1,FZR1!3,Ser182~u).FZR1(APC!2,FBXO5!3,nTerm~u)";
  species S62 in Nuc = 8.1944566e9/Nuc; S62 is "@Nuc::APC(FBXO5,FZR1_CDC20!1,Ser355~p).FZR1(APC!1,FBXO5,nTerm~u)";
  species Nuc_FBXO5_APC_FZR1_Ser182_p in Nuc = 11324333/Nuc; Nuc_FBXO5_APC_FZR1_Ser182_p is "@Nuc::FBXO5(APC,FZR1,Ser182~p)";
  species Nuc_FOXM1_DBD_Thr600_u in Nuc = 3.3510826e9/Nuc; Nuc_FOXM1_DBD_Thr600_u is "@Nuc::FOXM1(DBD,Thr600~u)";
  species Nuc_FOXM1_DBD_Thr600_p in Nuc = 2.2950816e8/Nuc; Nuc_FOXM1_DBD_Thr600_p is "@Nuc::FOXM1(DBD,Thr600~p)";
  species S66 in Nuc = 114614.27/Nuc; S66 is "@Nuc::CCNB_promoter(FOXM1!1).FOXM1(DBD!1,Thr600~p)";
  species Nuc_CCNB_promoter_FOXM1 in Nuc = 60105386/Nuc; Nuc_CCNB_promoter_FOXM1 is "@Nuc::CCNB_promoter(FOXM1)";
  species Nuc_CDC20_promoter_FOXM1 in Nuc = 60174121/Nuc; Nuc_CDC20_promoter_FOXM1 is "@Nuc::CDC20_promoter(FOXM1)";
  species S69 in Nuc = 45878.816/Nuc; S69 is "@Nuc::CDC20_promoter(FOXM1!1).FOXM1(DBD!1,Thr600~p)";
  species Nuc_WEE1_Ser123_u in Nuc = 5.9042195e11/Nuc; Nuc_WEE1_Ser123_u is "@Nuc::WEE1(Ser123~u)";
  species S71 in Nuc = 4.5242773e9/Nuc; S71 is "@Nuc::CCNB(CDK1_Thr14_Tyr15~p,CDKN1A)";
  species Nuc_WEE1_Ser123_p in Nuc = 1.1778049e10/Nuc; Nuc_WEE1_Ser123_p is "@Nuc::WEE1(Ser123~p)";
  species Nuc_CDC25_pSites_p in Nuc = 1.1103404e10/Nuc; Nuc_CDC25_pSites_p is "@Nuc::CDC25(pSites~p)";
  species Nuc_CDC25_pSites_u in Nuc = 5.910966e11/Nuc; Nuc_CDC25_pSites_u is "@Nuc::CDC25(pSites~u)";
  species Nuc_MASTL_Thr198_u in Nuc = 6.0070998e11/Nuc; Nuc_MASTL_Thr198_u is "@Nuc::MASTL(Thr198~u)";
  species Nuc_MASTL_Thr198_p in Nuc = 1.4900204e9/Nuc; Nuc_MASTL_Thr198_p is "@Nuc::MASTL(Thr198~p)";
  species S77 in Nuc = 4.9793694e11/Nuc; S77 is "@Nuc::ENSA_ARPP19(PPP2R2B,Ser62_Ser67~u)";
  species S78 in Nuc = 1.9785953e8/Nuc; S78 is "@Nuc::ENSA_ARPP19(PPP2R2B,Ser62_Ser67~p)";
  species S79 in Nuc = 1.040652e11/Nuc; S79 is "@Nuc::ENSA_ARPP19(PPP2R2B!1,Ser62_Ser67~p).PPP2R2B(ENSA_ARPP19!1)";
  species Nuc_CCNE_promoter_E2F in Nuc = 50873268/Nuc; Nuc_CCNE_promoter_E2F is "@Nuc::CCNE_promoter(E2F)";
  species Nuc_CCNA_promoter_E2F in Nuc = 50873268/Nuc; Nuc_CCNA_promoter_E2F is "@Nuc::CCNA_promoter(E2F)";
  species Nuc_E2F_promoter_E2F in Nuc = 50873268/Nuc; Nuc_E2F_promoter_E2F is "@Nuc::E2F_promoter(E2F)";
  species Nuc_FBXO5_promoter_E2F in Nuc = 50873268/Nuc; Nuc_FBXO5_promoter_E2F is "@Nuc::FBXO5_promoter(E2F)";
  species Nuc_FOXM1_promoter_E2F in Nuc = 50873268/Nuc; Nuc_FOXM1_promoter_E2F is "@Nuc::FOXM1_promoter(E2F)";
  species S85 in Nuc = 9346731.7/Nuc; S85 is "@Nuc::CCNE_promoter(E2F!1).E2F(DBD!1,RB1,Ser332~u)";
  species S86 in Nuc = 9346731.7/Nuc; S86 is "@Nuc::CCNA_promoter(E2F!1).E2F(DBD!1,RB1,Ser332~u)";
  species S87 in Nuc = 9346731.7/Nuc; S87 is "@Nuc::E2F(DBD!1,RB1,Ser332~u).E2F_promoter(E2F!1)";
  species S88 in Nuc = 9346731.7/Nuc; S88 is "@Nuc::E2F(DBD!1,RB1,Ser332~u).FBXO5_promoter(E2F!1)";
  species S89 in Nuc = 9346731.7/Nuc; S89 is "@Nuc::E2F(DBD!1,RB1,Ser332~u).FOXM1_promoter(E2F!1)";
  species S90 in Nuc = 0; S90 is "@Nuc::CCNE_promoter(E2F!1).E2F(DBD!1,RB1,Ser332~p)";
  species S91 in Nuc = 0; S91 is "@Nuc::CCNA_promoter(E2F!1).E2F(DBD!1,RB1,Ser332~p)";
  species S92 in Nuc = 0; S92 is "@Nuc::E2F(DBD!1,RB1,Ser332~p).E2F_promoter(E2F!1)";
  species S93 in Nuc = 0; S93 is "@Nuc::E2F(DBD!1,RB1,Ser332~p).FBXO5_promoter(E2F!1)";
  species S94 in Nuc = 0; S94 is "@Nuc::E2F(DBD!1,RB1,Ser332~p).FOXM1_promoter(E2F!1)";
  species Nuc_iWEE in Nuc = 0; Nuc_iWEE is "@Nuc::iWEE()";
  species Nuc_SKP2 in Nuc = 6.022e11/Nuc; Nuc_SKP2 is "@Nuc::SKP2()";
  species Nuc_TP53_DBD_Ser15_p in Nuc = 0; Nuc_TP53_DBD_Ser15_p is "@Nuc::TP53(DBD,Ser15~p)";
  species Nuc_CDKN1A_promoter_TP53 in Nuc = 60220000/Nuc; Nuc_CDKN1A_promoter_TP53 is "@Nuc::CDKN1A_promoter(TP53)";
  species Nuc_FOXO_DBD in Nuc = 6.022e11/Nuc; Nuc_FOXO_DBD is "@Nuc::FOXO(DBD)";
  species Nuc_CDKN1B_promoter_FOXO in Nuc = 60220000/Nuc; Nuc_CDKN1B_promoter_FOXO is "@Nuc::CDKN1B_promoter(FOXO)";
  species S101 in Nuc = 0; S101 is "@Nuc::CDKN1A_promoter(TP53!1).TP53(DBD!1,Ser15~p)";
  species Cyt_CDKN1A_CCNE_A_B_Ser130_u in Cyt = 0; Cyt_CDKN1A_CCNE_A_B_Ser130_u is "@Cyt::CDKN1A(CCNE_A_B,Ser130~u)";
  species S103 in Nuc = 0; S103 is "@Nuc::CDKN1B_promoter(FOXO!1).FOXO(DBD!1)";
  species Cyt_CDKN1B_CCNE_A_Thr187_u in Cyt = 0; Cyt_CDKN1B_CCNE_A_Thr187_u is "@Cyt::CDKN1B(CCNE_A,Thr187~u)";
  species S105 in Cyt = 0; S105 is "@Cyt::CCNA(CDKN1A_B!1).CDKN1A(CCNE_A_B!1,Ser130~u)";
  species S106 in Cyt = 0; S106 is "@Cyt::CCNE(CDKN1A_B!1).CDKN1A(CCNE_A_B!1,Ser130~u)";
  species S107 in Cyt = 0; S107 is "@Cyt::CCNB(CDK1_Thr14_Tyr15~u,CDKN1A!1).CDKN1A(CCNE_A_B!1,Ser130~u)";
  species S108 in Cyt = 0; S108 is "@Cyt::CCNB(CDK1_Thr14_Tyr15~p,CDKN1A!1).CDKN1A(CCNE_A_B!1,Ser130~u)";
  species Cyt_CDKN1A_CCNE_A_B_Ser130_p in Cyt = 0; Cyt_CDKN1A_CCNE_A_B_Ser130_p is "@Cyt::CDKN1A(CCNE_A_B,Ser130~p)";
  species S110 in Cyt = 0; S110 is "@Cyt::CCNA(CDKN1A_B!1).CDKN1B(CCNE_A!1,Thr187~u)";
  species S111 in Cyt = 0; S111 is "@Cyt::CCNE(CDKN1A_B!1).CDKN1B(CCNE_A!1,Thr187~u)";
  species Cyt_CDKN1B_CCNE_A_Thr187_p in Cyt = 0; Cyt_CDKN1B_CCNE_A_Thr187_p is "@Cyt::CDKN1B(CCNE_A,Thr187~p)";
  species Nuc_CDKN1A_CCNE_A_B_Ser130_u in Nuc = 0; Nuc_CDKN1A_CCNE_A_B_Ser130_u is "@Nuc::CDKN1A(CCNE_A_B,Ser130~u)";
  species Nuc_CDKN1B_CCNE_A_Thr187_u in Nuc = 0; Nuc_CDKN1B_CCNE_A_Thr187_u is "@Nuc::CDKN1B(CCNE_A,Thr187~u)";
  species S115 in Nuc = 0; S115 is "@Nuc::CCNA(CDKN1A_B!1).CDKN1A(CCNE_A_B!1,Ser130~u)";
  species S116 in Nuc = 0; S116 is "@Nuc::CCNE(CDKN1A_B!1).CDKN1A(CCNE_A_B!1,Ser130~u)";
  species S117 in Nuc = 0; S117 is "@Nuc::CCNB(CDK1_Thr14_Tyr15~u,CDKN1A!1).CDKN1A(CCNE_A_B!1,Ser130~u)";
  species S118 in Nuc = 0; S118 is "@Nuc::CCNB(CDK1_Thr14_Tyr15~p,CDKN1A!1).CDKN1A(CCNE_A_B!1,Ser130~u)";
  species Nuc_CDKN1A_CCNE_A_B_Ser130_p in Nuc = 0; Nuc_CDKN1A_CCNE_A_B_Ser130_p is "@Nuc::CDKN1A(CCNE_A_B,Ser130~p)";
  species S120 in Cyt = 0; S120 is "@Cyt::CCNA(CDKN1A_B!1).CDKN1B(CCNE_A!1,Thr187~p)";
  species S121 in Nuc = 0; S121 is "@Nuc::CCNA(CDKN1A_B!1).CDKN1B(CCNE_A!1,Thr187~u)";
  species S122 in Cyt = 0; S122 is "@Cyt::CCNE(CDKN1A_B!1).CDKN1B(CCNE_A!1,Thr187~p)";
  species S123 in Nuc = 0; S123 is "@Nuc::CCNE(CDKN1A_B!1).CDKN1B(CCNE_A!1,Thr187~u)";
  species Nuc_CDKN1B_CCNE_A_Thr187_p in Nuc = 0; Nuc_CDKN1B_CCNE_A_Thr187_p is "@Nuc::CDKN1B(CCNE_A,Thr187~p)";
  species S125 in Nuc = 0; S125 is "@Nuc::CCNA(CDKN1A_B!1).CDKN1B(CCNE_A!1,Thr187~p)";
  species S126 in Nuc = 0; S126 is "@Nuc::CCNE(CDKN1A_B!1).CDKN1B(CCNE_A!1,Thr187~p)";

  // Parameters:
  kPhRbD = 9.206253e-27;
  kPhRbE = 1.1507816e-26;
  kDpRb = 0.0013860014;
  kPhRb = 3.4523449e-26;
  kSyCe1 = 1.6693001e19;
  kSyCe2 = 8.3160083;
  kDeCe = 0.00013860014;
  kDiE2fRb = 0.00034650035;
  kAsE2fRb = 5.7539081e-25;
  kSyE2f1 = 8.3465003e18;
  kSyE2f2 = 1.3860014;
  kDeE2f1 = 6.9300069e-5;
  kDeE2f2 = 2.3015632e-27;
  kPhE2f = 2.3015632e-27;
  kDpE2f2 = 1.1507816e-25;
  kSyEmi1 = 4.1732502e19;
  kSyEmi2 = 6.9300069;
  kDeEmi1 = 0.00034650035;
  kDeEmi2 = 0.00034650035;
  kDeEmi3 = 0.0034650035;
  kPhEmiA = 5.7539081e-29;
  kPhEmiB = 2.8769541e-28;
  kDpEmi = 3.4650035e-6;
  kSyCa1 = 8.3465003e18;
  kSyCa2 = 1.039501;
  kDeCa1 = 6.9300069e-6;
  kDeCa2 = 4.6031265e-27;
  kDeCa3 = 1.1507816e-27;
  kDpCdh = 0.0034650035;
  kPhCdhA = 2.8769541e-26;
  kPhCdhE = 1.1507816e-27;
  kPhCdhB = 2.8769541e-25;
  kDiACE = 0.00034650035;
  kAsACE = 5.7539081e-25;
  kDiACdh = 0.00034650035;
  kAsACdh = 5.7539081e-25;
  kPhCeA = 1.1507816e-26;
  kPhCeE = 1.1507816e-28;
  kPhFoxE = 1.1507816e-27;
  kPhFoxA = 1.1507816e-27;
  kPhFoxB = 5.7539081e-27;
  kDpFox = 1e-5;
  kSyCb1 = 8.3465003e18;
  kSyCb2 = 1.039501;
  kDeCb1 = 6.9300069e-6;
  kDeCb2 = 1.438477e-27;
  kDeCb3 = 1.438477e-27;
  kPhEnsa = 1.1507816e-27;
  kDpEnsa = 0.00034650035;
  kPhGw = 1.1507816e-26;
  kDpGw1 = 0.0017325017;
  kDpGw2 = 1.1507816e-25;
  kWee1 = 1.1507816e-28;
  kWee2 = 1.1507816e-26;
  kPhWeeA = 1.1507816e-27;
  kPhWeeB = 1.1507816e-26;
  kDpWee = 1.1507816e-25;
  kCdc25_1 = 1.1507816e-27;
  kCdc25_2 = 1.1507816e-26;
  kDpCdc25 = 1.1507816e-25;
  kDipEB55 = 4.7124047e-5;
  kAspEB55 = 6.5594552e-25;
  kSyCdc_1 = 8.3465003e18;
  kSyCdc_2 = 1.3860014;
  kDeCdc_1 = 2.7720028e-5;
  kDeCdc_2 = 4.6031265e-28;
  kDipACdc = 0.00086625087;
  kAspACdc = 1.1507816e-26;
  kPhApcA = 1.1507816e-28;
  kDpApc_1 = 0;
  kDpApc_2 = 5.7539081e-26;
  kSyFox1 = 8.3465003e18;
  kSyFox2 = 1.039501;
  kDeFox1 = 6.9300069e-6;
  kDeFox2 = 5.7539081e-27;
  kAsEPx = 5.7539081e-25;
  kDiEPx = 0.034650035;
  kAsFPcb = 5.7539081e-25;
  kDiFPcb = 0.069300069;
  kAsFPcdc = 5.7539081e-25;
  kDiFPcdc = 0.17325017;
  kPhC25B = 1.1507816e-26;
  kPhCAEE = 9.2062529e-28;
  kPhCAEA = 2.3015632e-26;
  kPhCAEB = 2.3015632e-25;
  ikSyCb = 1;
  jiWee = 6.022e22;
  kDpE2f1 = 0;
  kPhC25A = 0;
  kSySkp2 = 1.2044e20;
  kDeSkp2_1 = 0.0001;
  kDeSkp2_2 = 3.3211558e-27;
  kAsTP53PCDKN1A = 4.9817336e-25;
  kDiTP53PCDKN1A = 0.15;
  kSyCDKN1A_1 = 1.2044e19;
  kSyCDKN1A_2 = 8;
  kDeCDKN1A_1 = 2e-5;
  kDeCDKN1A_2 = 4.1514447e-28;
  kAsCdkn1aC = 1.1624045e-26;
  kDiCdkn1aC = 0.0003;
  kPhCDKN1AByCe = 8.3028894e-27;
  kPhCDKN1AByCa = 3.3211558e-28;
  kPhCDKN1AByCb = 3.3211558e-27;
  kDpCDKN1A = 0.002;
  kAsFOXOPCDKN1B = 4.9817336e-25;
  kDiFOXOPCDKN1B = 0.15;
  kSyCDKN1B_1 = 1.2044e19;
  kSyCDKN1B_2 = 1;
  kDeCDKN1B_1 = 2e-5;
  kDeCDKN1B_2 = 4.1514447e-27;
  kAsCdkn1bC = 1.1624045e-26;
  kDiCdkn1bC = 0.0003;
  kPhCDKN1BByCe = 8.3028894e-27;
  kPhCDKN1BByCa = 8.3028894e-26;
  kPhCDKN1BByCb = 8.3028894e-28;
  kDpCDKN1B = 0.002;
  kPhNup = 4.9817336e-12;
  kDpNup_1 = 2;
  kImImCCND_1 = 1.6605779e-15;
  kExImCCND_1 = 1.6605779e-15;
  kImImCCNE_CDKN1A_B__1 = 1.6605779e-15;
  kExImCCNE_CDKN1A_B__1 = 1.6605779e-15;
  kImImE2F_DBD_RB1_Ser332u__1 = 1.6605779e-15;
  kExImE2F_DBD_RB1_Ser332u__1 = 1.6605779e-15;
  kImImE2F_DBD_RB1_Ser332p__1 = 1.6605779e-15;
  kExImE2F_DBD_RB1_Ser332p__1 = 1.6605779e-15;
  kImImCCNA_CDKN1A_B__1 = 1.6605779e-15;
  kExImCCNA_CDKN1A_B__1 = 1.6605779e-15;
  kImImCCNB_CDK1_Thr14_Tyr15u_CDKN1A__1 = 1.6605779e-15;
  kExImCCNB_CDK1_Thr14_Tyr15u_CDKN1A__1 = 1.6605779e-15;
  kImImE2F_DBD_RB11_Ser332u__RB1_E2F1_Ser807_Ser811u__1 = 1.6605779e-15;
  kExImE2F_DBD_RB11_Ser332u__RB1_E2F1_Ser807_Ser811u__1 = 1.6605779e-15;
  kImImE2F_DBD_RB11_Ser332p__RB1_E2F1_Ser807_Ser811u__1 = 1.6605779e-15;
  kExImE2F_DBD_RB11_Ser332p__RB1_E2F1_Ser807_Ser811u__1 = 1.6605779e-15;
  kImImRB1_E2F_Ser807_Ser811u__1 = 1.6605779e-15;
  kExImRB1_E2F_Ser807_Ser811u__1 = 1.6605779e-15;
  kImImRB1_E2F_Ser807_Ser811p__1 = 1.6605779e-15;
  kExImRB1_E2F_Ser807_Ser811p__1 = 1.6605779e-15;
  kImImPPP2R2B_ENSA_ARPP19__1 = 1.6605779e-15;
  kExImPPP2R2B_ENSA_ARPP19__1 = 1.6605779e-15;
  kImImAPC_FBXO5_FZR1_CDC20_Ser355u__1 = 1.6605779e-15;
  kExImAPC_FBXO5_FZR1_CDC20_Ser355u__1 = 1.6605779e-15;
  kImImCDC20_APC__1 = 1.6605779e-15;
  kExImCDC20_APC__1 = 1.6605779e-15;
  kImImAPC_FBXO5_FZR1_CDC201_Ser355p__CDC20_APC1__1 = 1.6605779e-15;
  kExImAPC_FBXO5_FZR1_CDC201_Ser355p__CDC20_APC1__1 = 1.6605779e-15;
  kImImAPC_FBXO5_FZR1_CDC20_Ser355p__1 = 1.6605779e-15;
  kExImAPC_FBXO5_FZR1_CDC20_Ser355p__1 = 1.6605779e-15;
  kImImAPC_FBXO5_FZR1_CDC201_Ser355u__FZR1_APC1_FBXO5_nTermu__1 = 1.6605779e-15;
  kExImAPC_FBXO5_FZR1_CDC201_Ser355u__FZR1_APC1_FBXO5_nTermu__1 = 1.6605779e-15;
  kImImFZR1_APC_FBXO5_nTermu__1 = 1.6605779e-15;
  kExImFZR1_APC_FBXO5_nTermu__1 = 1.6605779e-15;
  kImImFZR1_APC_FBXO5_nTermp__1 = 1.6605779e-15;
  kExImFZR1_APC_FBXO5_nTermp__1 = 1.6605779e-15;
  kImImAPC_FBXO51_FZR1_CDC202_Ser355u__FBXO5_APC1_FZR13_Ser182u__FZR1_APC2_FBXO53_nTermu__1 = 1.6605779e-15;
  kExImAPC_FBXO51_FZR1_CDC202_Ser355u__FBXO5_APC1_FZR13_Ser182u__FZR1_APC2_FBXO53_nTermu__1 = 1.6605779e-15;
  kImImFBXO5_APC_FZR1_Ser182u__1 = 1.6605779e-15;
  kExImFBXO5_APC_FZR1_Ser182u__1 = 1.6605779e-15;
  kImImAPC_FBXO51_FZR1_CDC202_Ser355p__FBXO5_APC1_FZR13_Ser182u__FZR1_APC2_FBXO53_nTermu__1 = 1.6605779e-15;
  kExImAPC_FBXO51_FZR1_CDC202_Ser355p__FBXO5_APC1_FZR13_Ser182u__FZR1_APC2_FBXO53_nTermu__1 = 1.6605779e-15;
  kImImAPC_FBXO5_FZR1_CDC201_Ser355p__FZR1_APC1_FBXO5_nTermu__1 = 1.6605779e-15;
  kExImAPC_FBXO5_FZR1_CDC201_Ser355p__FZR1_APC1_FBXO5_nTermu__1 = 1.6605779e-15;
  kImImFBXO5_APC_FZR1_Ser182p__1 = 1.6605779e-15;
  kExImFBXO5_APC_FZR1_Ser182p__1 = 1.6605779e-15;
  kImImFOXM1_DBD_Thr600u__1 = 1.6605779e-15;
  kExImFOXM1_DBD_Thr600u__1 = 1.6605779e-15;
  kImImFOXM1_DBD_Thr600p__1 = 1.6605779e-15;
  kExImFOXM1_DBD_Thr600p__1 = 1.6605779e-15;
  kImImWEE1_Ser123u__1 = 1.6605779e-15;
  kExImWEE1_Ser123u__1 = 1.6605779e-15;
  kImImCCNB_CDK1_Thr14_Tyr15p_CDKN1A__1 = 1.6605779e-15;
  kExImCCNB_CDK1_Thr14_Tyr15p_CDKN1A__1 = 1.6605779e-15;
  kImImWEE1_Ser123p__1 = 1.6605779e-15;
  kExImWEE1_Ser123p__1 = 1.6605779e-15;
  kImImCDC25_pSitesp__1 = 1.6605779e-15;
  kExImCDC25_pSitesp__1 = 1.6605779e-15;
  kImImCDC25_pSitesu__1 = 1.6605779e-15;
  kExImCDC25_pSitesu__1 = 1.6605779e-15;
  kImImMASTL_Thr198u__1 = 1.6605779e-15;
  kExImMASTL_Thr198u__1 = 1.6605779e-15;
  kImImMASTL_Thr198p__1 = 1.6605779e-15;
  kExImMASTL_Thr198p__1 = 1.6605779e-15;
  kImImENSA_ARPP19_PPP2R2B_Ser62_Ser67u__1 = 1.6605779e-15;
  kExImENSA_ARPP19_PPP2R2B_Ser62_Ser67u__1 = 1.6605779e-15;
  kImImENSA_ARPP19_PPP2R2B_Ser62_Ser67p__1 = 1.6605779e-15;
  kExImENSA_ARPP19_PPP2R2B_Ser62_Ser67p__1 = 1.6605779e-15;
  kImImENSA_ARPP19_PPP2R2B1_Ser62_Ser67p__PPP2R2B_ENSA_ARPP191__1 = 1.6605779e-15;
  kExImENSA_ARPP19_PPP2R2B1_Ser62_Ser67p__PPP2R2B_ENSA_ARPP191__1 = 1.6605779e-15;
  kImImiWEE_1 = 1.6605779e-15;
  kExImiWEE_1 = 1.6605779e-15;
  kImImSKP2_1 = 1.6605779e-15;
  kExImSKP2_1 = 1.6605779e-15;
  kImImTP53_DBD_Ser15p__1 = 1.6605779e-15;
  kExImTP53_DBD_Ser15p__1 = 1.6605779e-15;
  kImImFOXO_DBD__1 = 1.6605779e-15;
  kExImFOXO_DBD__1 = 1.6605779e-15;
  kImImCDKN1A_CCNE_A_B_Ser130u__1 = 1.6605779e-15;
  kExImCDKN1A_CCNE_A_B_Ser130u__1 = 1.6605779e-15;
  kImImCDKN1B_CCNE_A_Thr187u__1 = 1.6605779e-15;
  kExImCDKN1B_CCNE_A_Thr187u__1 = 1.6605779e-15;
  kImImCCNA_CDKN1A_B1__CDKN1A_CCNE_A_B1_Ser130u__1 = 1.6605779e-15;
  kExImCCNA_CDKN1A_B1__CDKN1A_CCNE_A_B1_Ser130u__1 = 1.6605779e-15;
  kImImCCNE_CDKN1A_B1__CDKN1A_CCNE_A_B1_Ser130u__1 = 1.6605779e-15;
  kExImCCNE_CDKN1A_B1__CDKN1A_CCNE_A_B1_Ser130u__1 = 1.6605779e-15;
  kImImCCNB_CDK1_Thr14_Tyr15u_CDKN1A1__CDKN1A_CCNE_A_B1_Ser130u__1 = 1.6605779e-15;
  kExImCCNB_CDK1_Thr14_Tyr15u_CDKN1A1__CDKN1A_CCNE_A_B1_Ser130u__1 = 1.6605779e-15;
  kImImCCNB_CDK1_Thr14_Tyr15p_CDKN1A1__CDKN1A_CCNE_A_B1_Ser130u__1 = 1.6605779e-15;
  kExImCCNB_CDK1_Thr14_Tyr15p_CDKN1A1__CDKN1A_CCNE_A_B1_Ser130u__1 = 1.6605779e-15;
  kImImCDKN1A_CCNE_A_B_Ser130p__1 = 1.6605779e-15;
  kExImCDKN1A_CCNE_A_B_Ser130p__1 = 1.6605779e-15;
  kImImCCNA_CDKN1A_B1__CDKN1B_CCNE_A1_Thr187u__1 = 1.6605779e-15;
  kExImCCNA_CDKN1A_B1__CDKN1B_CCNE_A1_Thr187u__1 = 1.6605779e-15;
  kImImCCNE_CDKN1A_B1__CDKN1B_CCNE_A1_Thr187u__1 = 1.6605779e-15;
  kExImCCNE_CDKN1A_B1__CDKN1B_CCNE_A1_Thr187u__1 = 1.6605779e-15;
  kImImCDKN1B_CCNE_A_Thr187p__1 = 1.6605779e-15;
  kExImCDKN1B_CCNE_A_Thr187p__1 = 1.6605779e-15;
  kImImCCNA_CDKN1A_B1__CDKN1B_CCNE_A1_Thr187p__1 = 1.6605779e-15;
  kExImCCNA_CDKN1A_B1__CDKN1B_CCNE_A1_Thr187p__1 = 1.6605779e-15;
  kImImCCNE_CDKN1A_B1__CDKN1B_CCNE_A1_Thr187p__1 = 1.6605779e-15;
  kExImCCNE_CDKN1A_B1__CDKN1B_CCNE_A1_Thr187p__1 = 1.6605779e-15;
  kIm_2 = 1.6605779e-14;
  kEx_2 = 1.6605779e-14;
  _InitialConc1 = 6.022e11;
  _InitialConc2 = 1.3986043e11;
  _InitialConc3 = 1.1128068e10;
  _InitialConc4 = 22932894;
  _InitialConc5 = 4.2325597e9;
  _InitialConc6 = 1.133559e9;
  _InitialConc7 = 4.3034014e10;
  _InitialConc8 = 90654340;
  _InitialConc9 = 5.2778426e10;
  _InitialConc10 = 5.0629691e11;
  _InitialConc11 = 4.6484797e10;
  _InitialConc12 = 2.4260911e12;
  _InitialConc13 = 1.3847757e11;
  _InitialConc14 = 4.2087805e10;
  _InitialConc15 = 3.7993439e10;
  _InitialConc16 = 4.2969631e11;
  _InitialConc17 = 3.4406152e8;
  _InitialConc18 = 9.7028319e10;
  _InitialConc19 = 6.5604459e10;
  _InitialConc20 = 4.3226888e8;
  _InitialConc21 = 1.3323959e9;
  _InitialConc22 = 8.1944566e9;
  _InitialConc23 = 11324333;
  _InitialConc24 = 3.3510826e9;
  _InitialConc25 = 2.2950816e8;
  _InitialConc26 = 5.9042195e11;
  _InitialConc27 = 4.5242773e9;
  _InitialConc28 = 1.1778049e10;
  _InitialConc29 = 1.1103404e10;
  _InitialConc30 = 5.910966e11;
  _InitialConc31 = 6.0070998e11;
  _InitialConc32 = 1.4900204e9;
  _InitialConc33 = 4.9793694e11;
  _InitialConc34 = 1.9785953e8;
  _InitialConc35 = 1.040652e11;
  _InitialConc36 = 0;
  _InitialConc37 = 6.022e11;
  _InitialConc38 = 0;
  _InitialConc39 = 6.022e11;
  _InitialConc40 = 2980.89;
  _InitialConc41 = 6.022e11;
  _InitialConc42 = 1.3986043e11;
  _InitialConc43 = 1.1128068e10;
  _InitialConc44 = 22932894;
  _InitialConc45 = 4.2325597e9;
  _InitialConc46 = 1.133559e9;
  _InitialConc47 = 4.3034014e10;
  _InitialConc48 = 90654340;
  _InitialConc49 = 5.2778426e10;
  _InitialConc50 = 5.0629691e11;
  _InitialConc51 = 4.6484797e10;
  _InitialConc52 = 2.4260911e12;
  _InitialConc53 = 1.3847757e11;
  _InitialConc54 = 4.2087805e10;
  _InitialConc55 = 3.7993439e10;
  _InitialConc56 = 4.2969631e11;
  _InitialConc57 = 3.4406152e8;
  _InitialConc58 = 9.7028319e10;
  _InitialConc59 = 6.5604459e10;
  _InitialConc60 = 4.3226888e8;
  _InitialConc61 = 1.3323959e9;
  _InitialConc62 = 8.1944566e9;
  _InitialConc63 = 11324333;
  _InitialConc64 = 3.3510826e9;
  _InitialConc65 = 2.2950816e8;
  _InitialConc66 = 114614.27;
  _InitialConc67 = 60105386;
  _InitialConc68 = 60174121;
  _InitialConc69 = 45878.816;
  _InitialConc70 = 5.9042195e11;
  _InitialConc71 = 4.5242773e9;
  _InitialConc72 = 1.1778049e10;
  _InitialConc73 = 1.1103404e10;
  _InitialConc74 = 5.910966e11;
  _InitialConc75 = 6.0070998e11;
  _InitialConc76 = 1.4900204e9;
  _InitialConc77 = 4.9793694e11;
  _InitialConc78 = 1.9785953e8;
  _InitialConc79 = 1.040652e11;
  _InitialConc80 = 50873268;
  _InitialConc81 = 50873268;
  _InitialConc82 = 50873268;
  _InitialConc83 = 50873268;
  _InitialConc84 = 50873268;
  _InitialConc85 = 9346731.7;
  _InitialConc86 = 9346731.7;
  _InitialConc87 = 9346731.7;
  _InitialConc88 = 9346731.7;
  _InitialConc89 = 9346731.7;
  _InitialConc90 = 0;
  _InitialConc91 = 0;
  _InitialConc92 = 0;
  _InitialConc93 = 0;
  _InitialConc94 = 0;
  _InitialConc95 = 0;
  _InitialConc96 = 6.022e11;
  _InitialConc97 = 0;
  _InitialConc98 = 60220000;
  _InitialConc99 = 6.022e11;
  _InitialConc100 = 60220000;
  _rateLaw3 = 0;
  _rateLaw1 = kSyCb1*ikSyCb;
  _rateLaw2 = kSyCb2*ikSyCb;

  // Assignment rules:
  tCCNE := Cyt_CCNE_CDKN1A_B + Nuc_CCNE_CDKN1A_B + S106 + S111 + S116 + S122 + S123 + S126;
  tCCNA := Cyt_CCNA_CDKN1A_B + Nuc_CCNA_CDKN1A_B + S105 + S110 + S115 + S120 + S121 + S125;
  tCCNB := S6 + S27 + S46 + S71 + S107 + S108 + S117 + S118;
  tCDKN1A := Cyt_CDKN1A_CCNE_A_B_Ser130_u + S105 + S106 + S107 + S108 + Cyt_CDKN1A_CCNE_A_B_Ser130_p + Nuc_CDKN1A_CCNE_A_B_Ser130_u + S115 + S116 + S117 + S118 + Nuc_CDKN1A_CCNE_A_B_Ser130_p;
  tCDKN1B := Cyt_CDKN1B_CCNE_A_Thr187_u + S110 + S111 + Cyt_CDKN1B_CCNE_A_Thr187_p + Nuc_CDKN1B_CCNE_A_Thr187_u + S120 + S121 + S122 + S123 + Nuc_CDKN1B_CCNE_A_Thr187_p + S125 + S126;
  tSKP2 := Cyt_SKP2 + Nuc_SKP2;
  ApcCdh := S16 + S22 + S56 + S62;
  aCCNB := S6 + S46;

  // Reactions:
  R1: => Cyt_E2F_DBD_RB1_Ser332_u; kSyE2f1*Cyt;
  R2: Nuc_FOXM1_DBD_Thr600_p + Nuc_CCNB_promoter_FOXM1 => S66; kAsFPcb*Nuc_FOXM1_DBD_Thr600_p*Nuc_CCNB_promoter_FOXM1*Nuc;
  R3: S66 => Nuc_FOXM1_DBD_Thr600_p + Nuc_CCNB_promoter_FOXM1; kDiFPcb*S66*Nuc;
  R4: S87 => Cyt_E2F_DBD_RB1_Ser332_u + S87; kSyE2f2*S87*Nuc;
  R5: S92 => Cyt_E2F_DBD_RB1_Ser332_u + S92; kSyE2f2*S92*Nuc;
  R6: Cyt_E2F_DBD_RB1_Ser332_u => ; kDeE2f1*Cyt_E2F_DBD_RB1_Ser332_u*Cyt;
  R7: Cyt_E2F_DBD_RB1_Ser332_p => ; kDeE2f1*Cyt_E2F_DBD_RB1_Ser332_p*Cyt;
  R8: S7 => Cyt_RB1_E2F_Ser807_Ser811_u; kDeE2f1*S7*Cyt;
  R9: S8 => Cyt_RB1_E2F_Ser807_Ser811_u; kDeE2f1*S8*Cyt;
  R10: Nuc_E2F_DBD_RB1_Ser332_u => ; kDeE2f1*Nuc_E2F_DBD_RB1_Ser332_u*Nuc;
  R11: Nuc_E2F_DBD_RB1_Ser332_p => ; kDeE2f1*Nuc_E2F_DBD_RB1_Ser332_p*Nuc;
  R12: S47 => Nuc_RB1_E2F_Ser807_Ser811_u; kDeE2f1*S47*Nuc;
  R13: S48 => Nuc_RB1_E2F_Ser807_Ser811_u; kDeE2f1*S48*Nuc;
  R14: S85 => Nuc_CCNE_promoter_E2F; kDeE2f1*S85*Nuc;
  R15: S86 => Nuc_CCNA_promoter_E2F; kDeE2f1*S86*Nuc;
  R16: S87 => Nuc_E2F_promoter_E2F; kDeE2f1*S87*Nuc;
  R17: S88 => Nuc_FBXO5_promoter_E2F; kDeE2f1*S88*Nuc;
  R18: S89 => Nuc_FOXM1_promoter_E2F; kDeE2f1*S89*Nuc;
  R19: S90 => Nuc_CCNE_promoter_E2F; kDeE2f1*S90*Nuc;
  R20: S91 => Nuc_CCNA_promoter_E2F; kDeE2f1*S91*Nuc;
  R21: S92 => Nuc_E2F_promoter_E2F; kDeE2f1*S92*Nuc;
  R22: S93 => Nuc_FBXO5_promoter_E2F; kDeE2f1*S93*Nuc;
  R23: S94 => Nuc_FOXM1_promoter_E2F; kDeE2f1*S94*Nuc;
  R24: Cyt_CCND + S7 => Cyt_CCND + Cyt_E2F_DBD_RB1_Ser332_u + Cyt_RB1_E2F_Ser807_Ser811_p; kPhRbD*Cyt_CCND*S7*Cyt;
  R25: Cyt_CCND + S8 => Cyt_CCND + Cyt_E2F_DBD_RB1_Ser332_p + Cyt_RB1_E2F_Ser807_Ser811_p; kPhRbD*Cyt_CCND*S8*Cyt;
  R26: Nuc_CCND + S47 => Nuc_CCND + Nuc_E2F_DBD_RB1_Ser332_u + Nuc_RB1_E2F_Ser807_Ser811_p; kPhRbD*Nuc_CCND*S47*Nuc;
  R27: Nuc_CCND + S48 => Nuc_CCND + Nuc_E2F_DBD_RB1_Ser332_p + Nuc_RB1_E2F_Ser807_Ser811_p; kPhRbD*Nuc_CCND*S48*Nuc;
  R28: Cyt_CCNE_CDKN1A_B + S7 => Cyt_CCNE_CDKN1A_B + Cyt_E2F_DBD_RB1_Ser332_u + Cyt_RB1_E2F_Ser807_Ser811_p; kPhRbE*Cyt_CCNE_CDKN1A_B*S7*Cyt;
  R29: Cyt_CCNE_CDKN1A_B + S8 => Cyt_CCNE_CDKN1A_B + Cyt_E2F_DBD_RB1_Ser332_p + Cyt_RB1_E2F_Ser807_Ser811_p; kPhRbE*Cyt_CCNE_CDKN1A_B*S8*Cyt;
  R30: Nuc_CCNE_CDKN1A_B + S47 => Nuc_CCNE_CDKN1A_B + Nuc_E2F_DBD_RB1_Ser332_u + Nuc_RB1_E2F_Ser807_Ser811_p; kPhRbE*Nuc_CCNE_CDKN1A_B*S47*Nuc;
  R31: Nuc_CCNE_CDKN1A_B + S48 => Nuc_CCNE_CDKN1A_B + Nuc_E2F_DBD_RB1_Ser332_p + Nuc_RB1_E2F_Ser807_Ser811_p; kPhRbE*Nuc_CCNE_CDKN1A_B*S48*Nuc;
  R32: Cyt_CCNA_CDKN1A_B + S7 => Cyt_E2F_DBD_RB1_Ser332_u + Cyt_CCNA_CDKN1A_B + Cyt_RB1_E2F_Ser807_Ser811_p; kPhRb*Cyt_CCNA_CDKN1A_B*S7*Cyt;
  R33: Cyt_CCNA_CDKN1A_B + S8 => Cyt_E2F_DBD_RB1_Ser332_p + Cyt_CCNA_CDKN1A_B + Cyt_RB1_E2F_Ser807_Ser811_p; kPhRb*Cyt_CCNA_CDKN1A_B*S8*Cyt;
  R34: Nuc_CCNA_CDKN1A_B + S47 => Nuc_E2F_DBD_RB1_Ser332_u + Nuc_CCNA_CDKN1A_B + Nuc_RB1_E2F_Ser807_Ser811_p; kPhRb*Nuc_CCNA_CDKN1A_B*S47*Nuc;
  R35: Nuc_CCNA_CDKN1A_B + S48 => Nuc_E2F_DBD_RB1_Ser332_p + Nuc_CCNA_CDKN1A_B + Nuc_RB1_E2F_Ser807_Ser811_p; kPhRb*Nuc_CCNA_CDKN1A_B*S48*Nuc;
  R36: S6 + S7 => Cyt_E2F_DBD_RB1_Ser332_u + S6 + Cyt_RB1_E2F_Ser807_Ser811_p; kPhRb*S6*S7*Cyt;
  R37: S6 + S8 => Cyt_E2F_DBD_RB1_Ser332_p + S6 + Cyt_RB1_E2F_Ser807_Ser811_p; kPhRb*S6*S8*Cyt;
  R38: S46 + S47 => Nuc_E2F_DBD_RB1_Ser332_u + S46 + Nuc_RB1_E2F_Ser807_Ser811_p; kPhRb*S46*S47*Nuc;
  R39: S46 + S48 => Nuc_E2F_DBD_RB1_Ser332_p + S46 + Nuc_RB1_E2F_Ser807_Ser811_p; kPhRb*S46*S48*Nuc;
  R40: Cyt_E2F_DBD_RB1_Ser332_u + Cyt_CCNA_CDKN1A_B => Cyt_E2F_DBD_RB1_Ser332_p + Cyt_CCNA_CDKN1A_B; kPhE2f*Cyt_E2F_DBD_RB1_Ser332_u*Cyt_CCNA_CDKN1A_B*Cyt;
  R41: Cyt_CCNA_CDKN1A_B + S7 => Cyt_CCNA_CDKN1A_B + S8; kPhE2f*Cyt_CCNA_CDKN1A_B*S7*Cyt;
  R42: Nuc_E2F_DBD_RB1_Ser332_u + Nuc_CCNA_CDKN1A_B => Nuc_E2F_DBD_RB1_Ser332_p + Nuc_CCNA_CDKN1A_B; kPhE2f*Nuc_E2F_DBD_RB1_Ser332_u*Nuc_CCNA_CDKN1A_B*Nuc;
  R43: Nuc_CCNA_CDKN1A_B + S47 => Nuc_CCNA_CDKN1A_B + S48; kPhE2f*Nuc_CCNA_CDKN1A_B*S47*Nuc;
  R44: Nuc_CCNA_CDKN1A_B + S85 => Nuc_CCNA_CDKN1A_B + S90; kPhE2f*Nuc_CCNA_CDKN1A_B*S85*Nuc;
  R45: Nuc_CCNA_CDKN1A_B + S86 => Nuc_CCNA_CDKN1A_B + S91; kPhE2f*Nuc_CCNA_CDKN1A_B*S86*Nuc;
  R46: Nuc_CCNA_CDKN1A_B + S87 => Nuc_CCNA_CDKN1A_B + S92; kPhE2f*Nuc_CCNA_CDKN1A_B*S87*Nuc;
  R47: Nuc_CCNA_CDKN1A_B + S88 => Nuc_CCNA_CDKN1A_B + S93; kPhE2f*Nuc_CCNA_CDKN1A_B*S88*Nuc;
  R48: Nuc_CCNA_CDKN1A_B + S89 => Nuc_CCNA_CDKN1A_B + S94; kPhE2f*Nuc_CCNA_CDKN1A_B*S89*Nuc;
  R49: Cyt_E2F_DBD_RB1_Ser332_u + S6 => Cyt_E2F_DBD_RB1_Ser332_p + S6; kPhE2f*Cyt_E2F_DBD_RB1_Ser332_u*S6*Cyt;
  R50: S6 + S7 => S6 + S8; kPhE2f*S6*S7*Cyt;
  R51: Nuc_E2F_DBD_RB1_Ser332_u + S46 => Nuc_E2F_DBD_RB1_Ser332_p + S46; kPhE2f*Nuc_E2F_DBD_RB1_Ser332_u*S46*Nuc;
  R52: S46 + S47 => S46 + S48; kPhE2f*S46*S47*Nuc;
  R53: S46 + S85 => S46 + S90; kPhE2f*S46*S85*Nuc;
  R54: S46 + S86 => S46 + S91; kPhE2f*S46*S86*Nuc;
  R55: S46 + S87 => S46 + S92; kPhE2f*S46*S87*Nuc;
  R56: S46 + S88 => S46 + S93; kPhE2f*S46*S88*Nuc;
  R57: S46 + S89 => S46 + S94; kPhE2f*S46*S89*Nuc;
  R58: Cyt_E2F_DBD_RB1_Ser332_p => Cyt_E2F_DBD_RB1_Ser332_u; kDpE2f1*Cyt_E2F_DBD_RB1_Ser332_p*Cyt;
  R59: S8 => S7; kDpE2f1*S8*Cyt;
  R60: Nuc_E2F_DBD_RB1_Ser332_p => Nuc_E2F_DBD_RB1_Ser332_u; kDpE2f1*Nuc_E2F_DBD_RB1_Ser332_p*Nuc;
  R61: S48 => S47; kDpE2f1*S48*Nuc;
  R62: S90 => S85; kDpE2f1*S90*Nuc;
  R63: S91 => S86; kDpE2f1*S91*Nuc;
  R64: S92 => S87; kDpE2f1*S92*Nuc;
  R65: S93 => S88; kDpE2f1*S93*Nuc;
  R66: S94 => S89; kDpE2f1*S94*Nuc;
  R67: Cyt_E2F_DBD_RB1_Ser332_p + Cyt_PPP2R2B_ENSA_ARPP19 => Cyt_E2F_DBD_RB1_Ser332_u + Cyt_PPP2R2B_ENSA_ARPP19; kDpE2f2*Cyt_E2F_DBD_RB1_Ser332_p*Cyt_PPP2R2B_ENSA_ARPP19*Cyt;
  R68: S8 + Cyt_PPP2R2B_ENSA_ARPP19 => S7 + Cyt_PPP2R2B_ENSA_ARPP19; kDpE2f2*S8*Cyt_PPP2R2B_ENSA_ARPP19*Cyt;
  R69: Nuc_E2F_DBD_RB1_Ser332_p + Nuc_PPP2R2B_ENSA_ARPP19 => Nuc_E2F_DBD_RB1_Ser332_u + Nuc_PPP2R2B_ENSA_ARPP19; kDpE2f2*Nuc_E2F_DBD_RB1_Ser332_p*Nuc_PPP2R2B_ENSA_ARPP19*Nuc;
  R70: S48 + Nuc_PPP2R2B_ENSA_ARPP19 => S47 + Nuc_PPP2R2B_ENSA_ARPP19; kDpE2f2*S48*Nuc_PPP2R2B_ENSA_ARPP19*Nuc;
  R71: Nuc_PPP2R2B_ENSA_ARPP19 + S90 => Nuc_PPP2R2B_ENSA_ARPP19 + S85; kDpE2f2*Nuc_PPP2R2B_ENSA_ARPP19*S90*Nuc;
  R72: Nuc_PPP2R2B_ENSA_ARPP19 + S91 => Nuc_PPP2R2B_ENSA_ARPP19 + S86; kDpE2f2*Nuc_PPP2R2B_ENSA_ARPP19*S91*Nuc;
  R73: Nuc_PPP2R2B_ENSA_ARPP19 + S92 => Nuc_PPP2R2B_ENSA_ARPP19 + S87; kDpE2f2*Nuc_PPP2R2B_ENSA_ARPP19*S92*Nuc;
  R74: Nuc_PPP2R2B_ENSA_ARPP19 + S93 => Nuc_PPP2R2B_ENSA_ARPP19 + S88; kDpE2f2*Nuc_PPP2R2B_ENSA_ARPP19*S93*Nuc;
  R75: Nuc_PPP2R2B_ENSA_ARPP19 + S94 => Nuc_PPP2R2B_ENSA_ARPP19 + S89; kDpE2f2*Nuc_PPP2R2B_ENSA_ARPP19*S94*Nuc;
  R76: Cyt_E2F_DBD_RB1_Ser332_p + Cyt_SKP2 => Cyt_SKP2; kDeE2f2*Cyt_E2F_DBD_RB1_Ser332_p*Cyt_SKP2*Cyt;
  R77: S8 + Cyt_SKP2 => Cyt_RB1_E2F_Ser807_Ser811_u + Cyt_SKP2; kDeE2f2*S8*Cyt_SKP2*Cyt;
  R78: Nuc_E2F_DBD_RB1_Ser332_p + Nuc_SKP2 => Nuc_SKP2; kDeE2f2*Nuc_E2F_DBD_RB1_Ser332_p*Nuc_SKP2*Nuc;
  R79: S48 + Nuc_SKP2 => Nuc_RB1_E2F_Ser807_Ser811_u + Nuc_SKP2; kDeE2f2*S48*Nuc_SKP2*Nuc;
  R80: S90 + Nuc_SKP2 => Nuc_CCNE_promoter_E2F + Nuc_SKP2; kDeE2f2*S90*Nuc_SKP2*Nuc;
  R81: S91 + Nuc_SKP2 => Nuc_CCNA_promoter_E2F + Nuc_SKP2; kDeE2f2*S91*Nuc_SKP2*Nuc;
  R82: S92 + Nuc_SKP2 => Nuc_E2F_promoter_E2F + Nuc_SKP2; kDeE2f2*S92*Nuc_SKP2*Nuc;
  R83: S93 + Nuc_SKP2 => Nuc_FBXO5_promoter_E2F + Nuc_SKP2; kDeE2f2*S93*Nuc_SKP2*Nuc;
  R84: S94 + Nuc_SKP2 => Nuc_FOXM1_promoter_E2F + Nuc_SKP2; kDeE2f2*S94*Nuc_SKP2*Nuc;
  R85: Cyt_CCND + Cyt_RB1_E2F_Ser807_Ser811_u => Cyt_CCND + Cyt_RB1_E2F_Ser807_Ser811_p; kPhRbD*Cyt_CCND*Cyt_RB1_E2F_Ser807_Ser811_u*Cyt;
  R86: Nuc_CCND + Nuc_RB1_E2F_Ser807_Ser811_u => Nuc_CCND + Nuc_RB1_E2F_Ser807_Ser811_p; kPhRbD*Nuc_CCND*Nuc_RB1_E2F_Ser807_Ser811_u*Nuc;
  R87: Cyt_CCNE_CDKN1A_B + Cyt_RB1_E2F_Ser807_Ser811_u => Cyt_CCNE_CDKN1A_B + Cyt_RB1_E2F_Ser807_Ser811_p; kPhRbE*Cyt_CCNE_CDKN1A_B*Cyt_RB1_E2F_Ser807_Ser811_u*Cyt;
  R88: Nuc_CCNE_CDKN1A_B + Nuc_RB1_E2F_Ser807_Ser811_u => Nuc_CCNE_CDKN1A_B + Nuc_RB1_E2F_Ser807_Ser811_p; kPhRbE*Nuc_CCNE_CDKN1A_B*Nuc_RB1_E2F_Ser807_Ser811_u*Nuc;
  R89: Cyt_CCNA_CDKN1A_B + Cyt_RB1_E2F_Ser807_Ser811_u => Cyt_CCNA_CDKN1A_B + Cyt_RB1_E2F_Ser807_Ser811_p; kPhRb*Cyt_CCNA_CDKN1A_B*Cyt_RB1_E2F_Ser807_Ser811_u*Cyt;
  R90: Nuc_CCNA_CDKN1A_B + Nuc_RB1_E2F_Ser807_Ser811_u => Nuc_CCNA_CDKN1A_B + Nuc_RB1_E2F_Ser807_Ser811_p; kPhRb*Nuc_CCNA_CDKN1A_B*Nuc_RB1_E2F_Ser807_Ser811_u*Nuc;
  R91: S6 + Cyt_RB1_E2F_Ser807_Ser811_u => S6 + Cyt_RB1_E2F_Ser807_Ser811_p; kPhRb*S6*Cyt_RB1_E2F_Ser807_Ser811_u*Cyt;
  R92: S46 + Nuc_RB1_E2F_Ser807_Ser811_u => S46 + Nuc_RB1_E2F_Ser807_Ser811_p; kPhRb*S46*Nuc_RB1_E2F_Ser807_Ser811_u*Nuc;
  R93: => Cyt_CCNE_CDKN1A_B; kSyCe1*Cyt;
  R94: S86 => Cyt_CCNA_CDKN1A_B + S86; kSyCa2*S86*Nuc;
  R95: S91 => Cyt_CCNA_CDKN1A_B + S91; kSyCa2*S91*Nuc;
  R96: Cyt_CCNE_CDKN1A_B => ; kDeCe*Cyt_CCNE_CDKN1A_B*Cyt;
  R97: Nuc_CCNE_CDKN1A_B => ; kDeCe*Nuc_CCNE_CDKN1A_B*Nuc;
  R98: Cyt_CCNE_CDKN1A_B + Cyt_CCNE_CDKN1A_B => Cyt_CCNE_CDKN1A_B; kPhCeE*Cyt_CCNE_CDKN1A_B*Cyt_CCNE_CDKN1A_B*Cyt;
  R99: Nuc_CCNE_CDKN1A_B + Nuc_CCNE_CDKN1A_B => Nuc_CCNE_CDKN1A_B; kPhCeE*Nuc_CCNE_CDKN1A_B*Nuc_CCNE_CDKN1A_B*Nuc;
  R100: Cyt_RB1_E2F_Ser807_Ser811_p => Cyt_RB1_E2F_Ser807_Ser811_u; kDpRb*Cyt_RB1_E2F_Ser807_Ser811_p*Cyt;
  R101: Nuc_RB1_E2F_Ser807_Ser811_p => Nuc_RB1_E2F_Ser807_Ser811_u; kDpRb*Nuc_RB1_E2F_Ser807_Ser811_p*Nuc;
  R102: S14 => S12 + Cyt_CDC20_APC; kDpApc_1*S14*Cyt;
  R103: S54 => S52 + Nuc_CDC20_APC; kDpApc_1*S54*Nuc;
  R104: Cyt_PPP2R2B_ENSA_ARPP19 + S14 => Cyt_PPP2R2B_ENSA_ARPP19 + S12 + Cyt_CDC20_APC; kDpApc_2*Cyt_PPP2R2B_ENSA_ARPP19*S14*Cyt;
  R105: Nuc_PPP2R2B_ENSA_ARPP19 + S54 => Nuc_PPP2R2B_ENSA_ARPP19 + S52 + Nuc_CDC20_APC; kDpApc_2*Nuc_PPP2R2B_ENSA_ARPP19*S54*Nuc;
  R106: Cyt_CCNA_CDKN1A_B + S12 => Cyt_CCNA_CDKN1A_B + S15; kPhApcA*Cyt_CCNA_CDKN1A_B*S12*Cyt;
  R107: Cyt_CCNA_CDKN1A_B + S16 => Cyt_CCNA_CDKN1A_B + S22; kPhApcA*Cyt_CCNA_CDKN1A_B*S16*Cyt;
  R108: Cyt_CCNA_CDKN1A_B + S19 => Cyt_CCNA_CDKN1A_B + S21; kPhApcA*Cyt_CCNA_CDKN1A_B*S19*Cyt;
  R109: Nuc_CCNA_CDKN1A_B + S52 => Nuc_CCNA_CDKN1A_B + S55; kPhApcA*Nuc_CCNA_CDKN1A_B*S52*Nuc;
  R110: Nuc_CCNA_CDKN1A_B + S56 => Nuc_CCNA_CDKN1A_B + S62; kPhApcA*Nuc_CCNA_CDKN1A_B*S56*Nuc;
  R111: Nuc_CCNA_CDKN1A_B + S59 => Nuc_CCNA_CDKN1A_B + S61; kPhApcA*Nuc_CCNA_CDKN1A_B*S59*Nuc;
  R112: S6 + S12 => S6 + S15; kPhApcA*S6*S12*Cyt;
  R113: S6 + S16 => S6 + S22; kPhApcA*S6*S16*Cyt;
  R114: S6 + S19 => S6 + S21; kPhApcA*S6*S19*Cyt;
  R115: S46 + S52 => S46 + S55; kPhApcA*S46*S52*Nuc;
  R116: S46 + S56 => S46 + S62; kPhApcA*S46*S56*Nuc;
  R117: S46 + S59 => S46 + S61; kPhApcA*S46*S59*Nuc;
  R118: S15 => S12; kDpApc_1*S15*Cyt;
  R119: S21 => S19; kDpApc_1*S21*Cyt;
  R120: S22 => S16; kDpApc_1*S22*Cyt;
  R121: S55 => S52; kDpApc_1*S55*Nuc;
  R122: S61 => S59; kDpApc_1*S61*Nuc;
  R123: S62 => S56; kDpApc_1*S62*Nuc;
  R124: Cyt_PPP2R2B_ENSA_ARPP19 + S15 => Cyt_PPP2R2B_ENSA_ARPP19 + S12; kDpApc_2*Cyt_PPP2R2B_ENSA_ARPP19*S15*Cyt;
  R125: Cyt_PPP2R2B_ENSA_ARPP19 + S21 => Cyt_PPP2R2B_ENSA_ARPP19 + S19; kDpApc_2*Cyt_PPP2R2B_ENSA_ARPP19*S21*Cyt;
  R126: Cyt_PPP2R2B_ENSA_ARPP19 + S22 => Cyt_PPP2R2B_ENSA_ARPP19 + S16; kDpApc_2*Cyt_PPP2R2B_ENSA_ARPP19*S22*Cyt;
  R127: Nuc_PPP2R2B_ENSA_ARPP19 + S55 => Nuc_PPP2R2B_ENSA_ARPP19 + S52; kDpApc_2*Nuc_PPP2R2B_ENSA_ARPP19*S55*Nuc;
  R128: Nuc_PPP2R2B_ENSA_ARPP19 + S61 => Nuc_PPP2R2B_ENSA_ARPP19 + S59; kDpApc_2*Nuc_PPP2R2B_ENSA_ARPP19*S61*Nuc;
  R129: Nuc_PPP2R2B_ENSA_ARPP19 + S62 => Nuc_PPP2R2B_ENSA_ARPP19 + S56; kDpApc_2*Nuc_PPP2R2B_ENSA_ARPP19*S62*Nuc;
  R130: Cyt_CCNA_CDKN1A_B + S16 => Cyt_CCNA_CDKN1A_B + S12 + Cyt_FZR1_APC_FBXO5_nTerm_p; kPhCdhA*Cyt_CCNA_CDKN1A_B*S16*Cyt;
  R131: Cyt_CCNA_CDKN1A_B + S22 => Cyt_CCNA_CDKN1A_B + S15 + Cyt_FZR1_APC_FBXO5_nTerm_p; kPhCdhA*Cyt_CCNA_CDKN1A_B*S22*Cyt;
  R132: Nuc_CCNA_CDKN1A_B + S56 => Nuc_CCNA_CDKN1A_B + S52 + Nuc_FZR1_APC_FBXO5_nTerm_p; kPhCdhA*Nuc_CCNA_CDKN1A_B*S56*Nuc;
  R133: Nuc_CCNA_CDKN1A_B + S62 => Nuc_CCNA_CDKN1A_B + S55 + Nuc_FZR1_APC_FBXO5_nTerm_p; kPhCdhA*Nuc_CCNA_CDKN1A_B*S62*Nuc;
  R134: Cyt_CCNE_CDKN1A_B + S19 => Cyt_CCNE_CDKN1A_B + S12 + Cyt_FZR1_APC_FBXO5_nTerm_p + Cyt_FBXO5_APC_FZR1_Ser182_u; kPhCAEE*Cyt_CCNE_CDKN1A_B*S19*Cyt;
  R135: Cyt_CCNE_CDKN1A_B + S21 => Cyt_CCNE_CDKN1A_B + S15 + Cyt_FZR1_APC_FBXO5_nTerm_p + Cyt_FBXO5_APC_FZR1_Ser182_u; kPhCAEE*Cyt_CCNE_CDKN1A_B*S21*Cyt;
  R136: Nuc_CCNE_CDKN1A_B + S59 => Nuc_CCNE_CDKN1A_B + S52 + Nuc_FZR1_APC_FBXO5_nTerm_p + Nuc_FBXO5_APC_FZR1_Ser182_u; kPhCAEE*Nuc_CCNE_CDKN1A_B*S59*Nuc;
  R137: Nuc_CCNE_CDKN1A_B + S61 => Nuc_CCNE_CDKN1A_B + S55 + Nuc_FZR1_APC_FBXO5_nTerm_p + Nuc_FBXO5_APC_FZR1_Ser182_u; kPhCAEE*Nuc_CCNE_CDKN1A_B*S61*Nuc;
  R138: Cyt_CCNA_CDKN1A_B + S19 => Cyt_CCNA_CDKN1A_B + S12 + Cyt_FZR1_APC_FBXO5_nTerm_p + Cyt_FBXO5_APC_FZR1_Ser182_u; kPhCAEA*Cyt_CCNA_CDKN1A_B*S19*Cyt;
  R139: Cyt_CCNA_CDKN1A_B + S21 => Cyt_CCNA_CDKN1A_B + S15 + Cyt_FZR1_APC_FBXO5_nTerm_p + Cyt_FBXO5_APC_FZR1_Ser182_u; kPhCAEA*Cyt_CCNA_CDKN1A_B*S21*Cyt;
  R140: Nuc_CCNA_CDKN1A_B + S59 => Nuc_CCNA_CDKN1A_B + S52 + Nuc_FZR1_APC_FBXO5_nTerm_p + Nuc_FBXO5_APC_FZR1_Ser182_u; kPhCAEA*Nuc_CCNA_CDKN1A_B*S59*Nuc;
  R141: Nuc_CCNA_CDKN1A_B + S61 => Nuc_CCNA_CDKN1A_B + S55 + Nuc_FZR1_APC_FBXO5_nTerm_p + Nuc_FBXO5_APC_FZR1_Ser182_u; kPhCAEA*Nuc_CCNA_CDKN1A_B*S61*Nuc;
  R142: S6 + S19 => S6 + S12 + Cyt_FZR1_APC_FBXO5_nTerm_p + Cyt_FBXO5_APC_FZR1_Ser182_u; kPhCAEB*S6*S19*Cyt;
  R143: S6 + S21 => S6 + S15 + Cyt_FZR1_APC_FBXO5_nTerm_p + Cyt_FBXO5_APC_FZR1_Ser182_u; kPhCAEB*S6*S21*Cyt;
  R144: S46 + S59 => S46 + S52 + Nuc_FZR1_APC_FBXO5_nTerm_p + Nuc_FBXO5_APC_FZR1_Ser182_u; kPhCAEB*S46*S59*Nuc;
  R145: S46 + S61 => S46 + S55 + Nuc_FZR1_APC_FBXO5_nTerm_p + Nuc_FBXO5_APC_FZR1_Ser182_u; kPhCAEB*S46*S61*Nuc;
  R146: Cyt_CCNE_CDKN1A_B + S16 => Cyt_CCNE_CDKN1A_B + S12 + Cyt_FZR1_APC_FBXO5_nTerm_p; kPhCdhE*Cyt_CCNE_CDKN1A_B*S16*Cyt;
  R147: Cyt_CCNE_CDKN1A_B + S22 => Cyt_CCNE_CDKN1A_B + S15 + Cyt_FZR1_APC_FBXO5_nTerm_p; kPhCdhE*Cyt_CCNE_CDKN1A_B*S22*Cyt;
  R148: Nuc_CCNE_CDKN1A_B + S56 => Nuc_CCNE_CDKN1A_B + S52 + Nuc_FZR1_APC_FBXO5_nTerm_p; kPhCdhE*Nuc_CCNE_CDKN1A_B*S56*Nuc;
  R149: Nuc_CCNE_CDKN1A_B + S62 => Nuc_CCNE_CDKN1A_B + S55 + Nuc_FZR1_APC_FBXO5_nTerm_p; kPhCdhE*Nuc_CCNE_CDKN1A_B*S62*Nuc;
  R150: S19 => S16; kDeEmi1*S19*Cyt;
  R151: Cyt_FBXO5_APC_FZR1_Ser182_u => ; kDeEmi1*Cyt_FBXO5_APC_FZR1_Ser182_u*Cyt;
  R152: S21 => S22; kDeEmi1*S21*Cyt;
  R153: Cyt_FBXO5_APC_FZR1_Ser182_p => ; kDeEmi1*Cyt_FBXO5_APC_FZR1_Ser182_p*Cyt;
  R154: S59 => S56; kDeEmi1*S59*Nuc;
  R155: Nuc_FBXO5_APC_FZR1_Ser182_u => ; kDeEmi1*Nuc_FBXO5_APC_FZR1_Ser182_u*Nuc;
  R156: S61 => S62; kDeEmi1*S61*Nuc;
  R157: Nuc_FBXO5_APC_FZR1_Ser182_p => ; kDeEmi1*Nuc_FBXO5_APC_FZR1_Ser182_p*Nuc;
  R158: S19 => S16; kDeEmi2*S19*Cyt;
  R159: S21 => S22; kDeEmi2*S21*Cyt;
  R160: S59 => S56; kDeEmi2*S59*Nuc;
  R161: S61 => S62; kDeEmi2*S61*Nuc;
  R162: Cyt_CCNA_CDKN1A_B + S19 => Cyt_CCNA_CDKN1A_B + S16 + Cyt_FBXO5_APC_FZR1_Ser182_p; kPhEmiA*Cyt_CCNA_CDKN1A_B*S19*Cyt;
  R163: Cyt_CCNA_CDKN1A_B + S21 => Cyt_CCNA_CDKN1A_B + S22 + Cyt_FBXO5_APC_FZR1_Ser182_p; kPhEmiA*Cyt_CCNA_CDKN1A_B*S21*Cyt;
  R164: Nuc_CCNA_CDKN1A_B + S59 => Nuc_CCNA_CDKN1A_B + S56 + Nuc_FBXO5_APC_FZR1_Ser182_p; kPhEmiA*Nuc_CCNA_CDKN1A_B*S59*Nuc;
  R165: Nuc_CCNA_CDKN1A_B + S61 => Nuc_CCNA_CDKN1A_B + S62 + Nuc_FBXO5_APC_FZR1_Ser182_p; kPhEmiA*Nuc_CCNA_CDKN1A_B*S61*Nuc;
  R166: S6 + S19 => S6 + S16 + Cyt_FBXO5_APC_FZR1_Ser182_p; kPhEmiB*S6*S19*Cyt;
  R167: S6 + S21 => S6 + S22 + Cyt_FBXO5_APC_FZR1_Ser182_p; kPhEmiB*S6*S21*Cyt;
  R168: S46 + S59 => S46 + S56 + Nuc_FBXO5_APC_FZR1_Ser182_p; kPhEmiB*S46*S59*Nuc;
  R169: S46 + S61 => S46 + S62 + Nuc_FBXO5_APC_FZR1_Ser182_p; kPhEmiB*S46*S61*Nuc;
  R170: Cyt_CCNA_CDKN1A_B + Cyt_FBXO5_APC_FZR1_Ser182_u => Cyt_CCNA_CDKN1A_B + Cyt_FBXO5_APC_FZR1_Ser182_p; kPhEmiA*Cyt_CCNA_CDKN1A_B*Cyt_FBXO5_APC_FZR1_Ser182_u*Cyt;
  R171: Nuc_CCNA_CDKN1A_B + Nuc_FBXO5_APC_FZR1_Ser182_u => Nuc_CCNA_CDKN1A_B + Nuc_FBXO5_APC_FZR1_Ser182_p; kPhEmiA*Nuc_CCNA_CDKN1A_B*Nuc_FBXO5_APC_FZR1_Ser182_u*Nuc;
  R172: S6 + Cyt_FBXO5_APC_FZR1_Ser182_u => S6 + Cyt_FBXO5_APC_FZR1_Ser182_p; kPhEmiB*S6*Cyt_FBXO5_APC_FZR1_Ser182_u*Cyt;
  R173: S46 + Nuc_FBXO5_APC_FZR1_Ser182_u => S46 + Nuc_FBXO5_APC_FZR1_Ser182_p; kPhEmiB*S46*Nuc_FBXO5_APC_FZR1_Ser182_u*Nuc;
  R174: Cyt_FBXO5_APC_FZR1_Ser182_p => Cyt_FBXO5_APC_FZR1_Ser182_u; kDpEmi*Cyt_FBXO5_APC_FZR1_Ser182_p*Cyt;
  R175: Nuc_FBXO5_APC_FZR1_Ser182_p => Nuc_FBXO5_APC_FZR1_Ser182_u; kDpEmi*Nuc_FBXO5_APC_FZR1_Ser182_p*Nuc;
  R176: Cyt_FBXO5_APC_FZR1_Ser182_p => ; kDeEmi3*Cyt_FBXO5_APC_FZR1_Ser182_p*Cyt;
  R177: Nuc_FBXO5_APC_FZR1_Ser182_p => ; kDeEmi3*Nuc_FBXO5_APC_FZR1_Ser182_p*Nuc;
  R178: => Cyt_FOXM1_DBD_Thr600_u; kSyFox1*Cyt;
  R179: S88 => Cyt_FBXO5_APC_FZR1_Ser182_u + S88; kSyEmi2*S88*Nuc;
  R180: S93 => Cyt_FBXO5_APC_FZR1_Ser182_u + S93; kSyEmi2*S93*Nuc;
  R181: Cyt_CCNE_CDKN1A_B + Cyt_FZR1_APC_FBXO5_nTerm_u => Cyt_CCNE_CDKN1A_B + Cyt_FZR1_APC_FBXO5_nTerm_p; kPhCdhE*Cyt_CCNE_CDKN1A_B*Cyt_FZR1_APC_FBXO5_nTerm_u*Cyt;
  R182: Nuc_CCNE_CDKN1A_B + Nuc_FZR1_APC_FBXO5_nTerm_u => Nuc_CCNE_CDKN1A_B + Nuc_FZR1_APC_FBXO5_nTerm_p; kPhCdhE*Nuc_CCNE_CDKN1A_B*Nuc_FZR1_APC_FBXO5_nTerm_u*Nuc;
  R183: Cyt_CCNA_CDKN1A_B + Cyt_FZR1_APC_FBXO5_nTerm_u => Cyt_CCNA_CDKN1A_B + Cyt_FZR1_APC_FBXO5_nTerm_p; kPhCdhA*Cyt_CCNA_CDKN1A_B*Cyt_FZR1_APC_FBXO5_nTerm_u*Cyt;
  R184: Nuc_CCNA_CDKN1A_B + Nuc_FZR1_APC_FBXO5_nTerm_u => Nuc_CCNA_CDKN1A_B + Nuc_FZR1_APC_FBXO5_nTerm_p; kPhCdhA*Nuc_CCNA_CDKN1A_B*Nuc_FZR1_APC_FBXO5_nTerm_u*Nuc;
  R185: S6 + Cyt_FZR1_APC_FBXO5_nTerm_u => S6 + Cyt_FZR1_APC_FBXO5_nTerm_p; kPhCdhB*S6*Cyt_FZR1_APC_FBXO5_nTerm_u*Cyt;
  R186: S46 + Nuc_FZR1_APC_FBXO5_nTerm_u => S46 + Nuc_FZR1_APC_FBXO5_nTerm_p; kPhCdhB*S46*Nuc_FZR1_APC_FBXO5_nTerm_u*Nuc;
  R187: Cyt_FZR1_APC_FBXO5_nTerm_p => Cyt_FZR1_APC_FBXO5_nTerm_u; kDpCdh*Cyt_FZR1_APC_FBXO5_nTerm_p*Cyt;
  R188: Nuc_FZR1_APC_FBXO5_nTerm_p => Nuc_FZR1_APC_FBXO5_nTerm_u; kDpCdh*Nuc_FZR1_APC_FBXO5_nTerm_p*Nuc;
  R189: => Cyt_CCNA_CDKN1A_B; kSyCa1*Cyt;
  R190: Cyt_CCNA_CDKN1A_B => ; kDeCa1*Cyt_CCNA_CDKN1A_B*Cyt;
  R191: Nuc_CCNA_CDKN1A_B => ; kDeCa1*Nuc_CCNA_CDKN1A_B*Nuc;
  R192: Cyt_CCNE_CDKN1A_B + Cyt_CCNA_CDKN1A_B => Cyt_CCNA_CDKN1A_B; kPhCeA*Cyt_CCNE_CDKN1A_B*Cyt_CCNA_CDKN1A_B*Cyt;
  R193: Nuc_CCNE_CDKN1A_B + Nuc_CCNA_CDKN1A_B => Nuc_CCNA_CDKN1A_B; kPhCeA*Nuc_CCNE_CDKN1A_B*Nuc_CCNA_CDKN1A_B*Nuc;
  R194: Cyt_CCNA_CDKN1A_B + S16 => S16; kDeCa2*Cyt_CCNA_CDKN1A_B*S16*Cyt;
  R195: Cyt_CCNA_CDKN1A_B + S22 => S22; kDeCa2*Cyt_CCNA_CDKN1A_B*S22*Cyt;
  R196: Nuc_CCNA_CDKN1A_B + S56 => S56; kDeCa2*Nuc_CCNA_CDKN1A_B*S56*Nuc;
  R197: Nuc_CCNA_CDKN1A_B + S62 => S62; kDeCa2*Nuc_CCNA_CDKN1A_B*S62*Nuc;
  R198: Cyt_CCNA_CDKN1A_B + S14 => S14; kDeCa3*Cyt_CCNA_CDKN1A_B*S14*Cyt;
  R199: Nuc_CCNA_CDKN1A_B + S54 => S54; kDeCa3*Nuc_CCNA_CDKN1A_B*S54*Nuc;
  R200: S89 => Cyt_FOXM1_DBD_Thr600_u + S89; kSyFox2*S89*Nuc;
  R201: S94 => Cyt_FOXM1_DBD_Thr600_u + S94; kSyFox2*S94*Nuc;
  R202: Cyt_FOXM1_DBD_Thr600_u => ; kDeFox1*Cyt_FOXM1_DBD_Thr600_u*Cyt;
  R203: Cyt_FOXM1_DBD_Thr600_p => ; kDeFox1*Cyt_FOXM1_DBD_Thr600_p*Cyt;
  R204: Nuc_FOXM1_DBD_Thr600_u => ; kDeFox1*Nuc_FOXM1_DBD_Thr600_u*Nuc;
  R205: Nuc_FOXM1_DBD_Thr600_p => ; kDeFox1*Nuc_FOXM1_DBD_Thr600_p*Nuc;
  R206: S66 => Nuc_CCNB_promoter_FOXM1; kDeFox1*S66*Nuc;
  R207: S69 => Nuc_CDC20_promoter_FOXM1; kDeFox1*S69*Nuc;
  R208: S16 + Cyt_FOXM1_DBD_Thr600_u => S16; kDeFox2*S16*Cyt_FOXM1_DBD_Thr600_u*Cyt;
  R209: S22 + Cyt_FOXM1_DBD_Thr600_u => S22; kDeFox2*S22*Cyt_FOXM1_DBD_Thr600_u*Cyt;
  R210: S16 + Cyt_FOXM1_DBD_Thr600_p => S16; kDeFox2*S16*Cyt_FOXM1_DBD_Thr600_p*Cyt;
  R211: S22 + Cyt_FOXM1_DBD_Thr600_p => S22; kDeFox2*S22*Cyt_FOXM1_DBD_Thr600_p*Cyt;
  R212: S56 + Nuc_FOXM1_DBD_Thr600_u => S56; kDeFox2*S56*Nuc_FOXM1_DBD_Thr600_u*Nuc;
  R213: S62 + Nuc_FOXM1_DBD_Thr600_u => S62; kDeFox2*S62*Nuc_FOXM1_DBD_Thr600_u*Nuc;
  R214: S56 + Nuc_FOXM1_DBD_Thr600_p => S56; kDeFox2*S56*Nuc_FOXM1_DBD_Thr600_p*Nuc;
  R215: S62 + Nuc_FOXM1_DBD_Thr600_p => S62; kDeFox2*S62*Nuc_FOXM1_DBD_Thr600_p*Nuc;
  R216: S56 + S66 => S56 + Nuc_CCNB_promoter_FOXM1; kDeFox2*S56*S66*Nuc;
  R217: S62 + S66 => S62 + Nuc_CCNB_promoter_FOXM1; kDeFox2*S62*S66*Nuc;
  R218: S56 + S69 => S56 + Nuc_CDC20_promoter_FOXM1; kDeFox2*S56*S69*Nuc;
  R219: S62 + S69 => S62 + Nuc_CDC20_promoter_FOXM1; kDeFox2*S62*S69*Nuc;
  R220: Cyt_CCNE_CDKN1A_B + Cyt_FOXM1_DBD_Thr600_u => Cyt_CCNE_CDKN1A_B + Cyt_FOXM1_DBD_Thr600_p; kPhFoxE*Cyt_CCNE_CDKN1A_B*Cyt_FOXM1_DBD_Thr600_u*Cyt;
  R221: Nuc_CCNE_CDKN1A_B + Nuc_FOXM1_DBD_Thr600_u => Nuc_CCNE_CDKN1A_B + Nuc_FOXM1_DBD_Thr600_p; kPhFoxE*Nuc_CCNE_CDKN1A_B*Nuc_FOXM1_DBD_Thr600_u*Nuc;
  R222: Cyt_CCNA_CDKN1A_B + Cyt_FOXM1_DBD_Thr600_u => Cyt_CCNA_CDKN1A_B + Cyt_FOXM1_DBD_Thr600_p; kPhFoxA*Cyt_CCNA_CDKN1A_B*Cyt_FOXM1_DBD_Thr600_u*Cyt;
  R223: Nuc_CCNA_CDKN1A_B + Nuc_FOXM1_DBD_Thr600_u => Nuc_CCNA_CDKN1A_B + Nuc_FOXM1_DBD_Thr600_p; kPhFoxA*Nuc_CCNA_CDKN1A_B*Nuc_FOXM1_DBD_Thr600_u*Nuc;
  R224: S6 + Cyt_FOXM1_DBD_Thr600_u => S6 + Cyt_FOXM1_DBD_Thr600_p; kPhFoxB*S6*Cyt_FOXM1_DBD_Thr600_u*Cyt;
  R225: S46 + Nuc_FOXM1_DBD_Thr600_u => S46 + Nuc_FOXM1_DBD_Thr600_p; kPhFoxB*S46*Nuc_FOXM1_DBD_Thr600_u*Nuc;
  R226: Cyt_FOXM1_DBD_Thr600_p => Cyt_FOXM1_DBD_Thr600_u; kDpFox*Cyt_FOXM1_DBD_Thr600_p*Cyt;
  R227: Nuc_FOXM1_DBD_Thr600_p => Nuc_FOXM1_DBD_Thr600_u; kDpFox*Nuc_FOXM1_DBD_Thr600_p*Nuc;
  R228: S69 => Nuc_FOXM1_DBD_Thr600_u + Nuc_CDC20_promoter_FOXM1; kDpFox*S69*Nuc;
  R229: S66 => Nuc_FOXM1_DBD_Thr600_u + Nuc_CCNB_promoter_FOXM1; kDpFox*S66*Nuc;
  R230: => S6; _rateLaw1*Cyt;
  R231: S66 => S6 + S66; _rateLaw2*S66*Nuc;
  R232: S6 => ; kDeCb1*S6*Cyt;
  R233: S27 => ; kDeCb1*S27*Cyt;
  R234: S46 => ; kDeCb1*S46*Nuc;
  R235: S71 => ; kDeCb1*S71*Nuc;
  R236: S6 + S16 => S16; kDeCb2*S6*S16*Cyt;
  R237: S6 + S22 => S22; kDeCb2*S6*S22*Cyt;
  R238: S16 + S27 => S16; kDeCb2*S16*S27*Cyt;
  R239: S22 + S27 => S22; kDeCb2*S22*S27*Cyt;
  R240: S46 + S56 => S56; kDeCb2*S46*S56*Nuc;
  R241: S46 + S62 => S62; kDeCb2*S46*S62*Nuc;
  R242: S56 + S71 => S56; kDeCb2*S56*S71*Nuc;
  R243: S62 + S71 => S62; kDeCb2*S62*S71*Nuc;
  R244: S6 + S14 => S14; kDeCb3*S6*S14*Cyt;
  R245: S14 + S27 => S14; kDeCb3*S14*S27*Cyt;
  R246: S46 + S54 => S54; kDeCb3*S46*S54*Nuc;
  R247: S54 + S71 => S54; kDeCb3*S54*S71*Nuc;
  R248: Cyt_CDC20_APC => ; kDeCdc_1*Cyt_CDC20_APC*Cyt;
  R249: S14 => S15; kDeCdc_1*S14*Cyt;
  R250: Nuc_CDC20_APC => ; kDeCdc_1*Nuc_CDC20_APC*Nuc;
  R251: S54 => S55; kDeCdc_1*S54*Nuc;
  R252: Cyt_CDC20_APC + S16 => S16; kDeCdc_2*Cyt_CDC20_APC*S16*Cyt;
  R253: Cyt_CDC20_APC + S22 => S22; kDeCdc_2*Cyt_CDC20_APC*S22*Cyt;
  R254: S14 + S16 => S15 + S16; kDeCdc_2*S14*S16*Cyt;
  R255: S14 + S22 => S15 + S22; kDeCdc_2*S14*S22*Cyt;
  R256: Nuc_CDC20_APC + S56 => S56; kDeCdc_2*Nuc_CDC20_APC*S56*Nuc;
  R257: Nuc_CDC20_APC + S62 => S62; kDeCdc_2*Nuc_CDC20_APC*S62*Nuc;
  R258: S54 + S56 => S55 + S56; kDeCdc_2*S54*S56*Nuc;
  R259: S54 + S62 => S55 + S62; kDeCdc_2*S54*S62*Nuc;
  R260: => Cyt_CDC20_APC; kSyCdc_1*Cyt;
  R261: S69 => Cyt_CDC20_APC + S69; kSyCdc_2*S69*Nuc;
  R262: Nuc_FOXM1_DBD_Thr600_p + Nuc_CDC20_promoter_FOXM1 => S69; kAsFPcdc*Nuc_FOXM1_DBD_Thr600_p*Nuc_CDC20_promoter_FOXM1*Nuc;
  R263: S69 => Nuc_FOXM1_DBD_Thr600_p + Nuc_CDC20_promoter_FOXM1; kDiFPcdc*S69*Nuc;
  R264: S6 + Cyt_WEE1_Ser123_u => Cyt_WEE1_Ser123_u + S27; kWee2*S6*Cyt_WEE1_Ser123_u*Cyt;
  R265: S46 + Nuc_WEE1_Ser123_u => Nuc_WEE1_Ser123_u + S71; kWee2*S46*Nuc_WEE1_Ser123_u*Nuc;
  R266: S6 + Cyt_WEE1_Ser123_p => S27 + Cyt_WEE1_Ser123_p; kWee1*S6*Cyt_WEE1_Ser123_p*Cyt;
  R267: S46 + Nuc_WEE1_Ser123_p => S71 + Nuc_WEE1_Ser123_p; kWee1*S46*Nuc_WEE1_Ser123_p*Nuc;
  R268: S27 + Cyt_CDC25_pSites_p => S6 + Cyt_CDC25_pSites_p; kCdc25_2*S27*Cyt_CDC25_pSites_p*Cyt;
  R269: S71 + Nuc_CDC25_pSites_p => S46 + Nuc_CDC25_pSites_p; kCdc25_2*S71*Nuc_CDC25_pSites_p*Nuc;
  R270: S27 + Cyt_CDC25_pSites_u => S6 + Cyt_CDC25_pSites_u; kCdc25_1*S27*Cyt_CDC25_pSites_u*Cyt;
  R271: S71 + Nuc_CDC25_pSites_u => S46 + Nuc_CDC25_pSites_u; kCdc25_1*S71*Nuc_CDC25_pSites_u*Nuc;
  R272: S6 + Cyt_CDC25_pSites_u => S6 + Cyt_CDC25_pSites_p; kPhC25B*S6*Cyt_CDC25_pSites_u*Cyt;
  R273: S46 + Nuc_CDC25_pSites_u => S46 + Nuc_CDC25_pSites_p; kPhC25B*S46*Nuc_CDC25_pSites_u*Nuc;
  R274: Cyt_CCNA_CDKN1A_B + Cyt_CDC25_pSites_u => Cyt_CCNA_CDKN1A_B + Cyt_CDC25_pSites_p; kPhC25A*Cyt_CCNA_CDKN1A_B*Cyt_CDC25_pSites_u*Cyt;
  R275: Nuc_CCNA_CDKN1A_B + Nuc_CDC25_pSites_u => Nuc_CCNA_CDKN1A_B + Nuc_CDC25_pSites_p; kPhC25A*Nuc_CCNA_CDKN1A_B*Nuc_CDC25_pSites_u*Nuc;
  R276: Cyt_PPP2R2B_ENSA_ARPP19 + Cyt_CDC25_pSites_p => Cyt_PPP2R2B_ENSA_ARPP19 + Cyt_CDC25_pSites_u; kDpCdc25*Cyt_PPP2R2B_ENSA_ARPP19*Cyt_CDC25_pSites_p*Cyt;
  R277: Nuc_PPP2R2B_ENSA_ARPP19 + Nuc_CDC25_pSites_p => Nuc_PPP2R2B_ENSA_ARPP19 + Nuc_CDC25_pSites_u; kDpCdc25*Nuc_PPP2R2B_ENSA_ARPP19*Nuc_CDC25_pSites_p*Nuc;
  R278: Cyt_PPP2R2B_ENSA_ARPP19 + Cyt_WEE1_Ser123_p => Cyt_PPP2R2B_ENSA_ARPP19 + Cyt_WEE1_Ser123_u; kDpWee*Cyt_PPP2R2B_ENSA_ARPP19*Cyt_WEE1_Ser123_p*Cyt;
  R279: Nuc_PPP2R2B_ENSA_ARPP19 + Nuc_WEE1_Ser123_p => Nuc_PPP2R2B_ENSA_ARPP19 + Nuc_WEE1_Ser123_u; kDpWee*Nuc_PPP2R2B_ENSA_ARPP19*Nuc_WEE1_Ser123_p*Nuc;
  R280: Cyt_CCNA_CDKN1A_B + Cyt_WEE1_Ser123_u => Cyt_CCNA_CDKN1A_B + Cyt_WEE1_Ser123_p; kPhWeeA*Cyt_CCNA_CDKN1A_B*Cyt_WEE1_Ser123_u*Cyt;
  R281: Nuc_CCNA_CDKN1A_B + Nuc_WEE1_Ser123_u => Nuc_CCNA_CDKN1A_B + Nuc_WEE1_Ser123_p; kPhWeeA*Nuc_CCNA_CDKN1A_B*Nuc_WEE1_Ser123_u*Nuc;
  R282: S6 + Cyt_WEE1_Ser123_u => S6 + Cyt_WEE1_Ser123_p; kPhWeeB*S6*Cyt_WEE1_Ser123_u*Cyt;
  R283: S46 + Nuc_WEE1_Ser123_u => S46 + Nuc_WEE1_Ser123_p; kPhWeeB*S46*Nuc_WEE1_Ser123_u*Nuc;
  R284: S6 + Cyt_MASTL_Thr198_u => S6 + Cyt_MASTL_Thr198_p; kPhGw*S6*Cyt_MASTL_Thr198_u*Cyt;
  R285: S46 + Nuc_MASTL_Thr198_u => S46 + Nuc_MASTL_Thr198_p; kPhGw*S46*Nuc_MASTL_Thr198_u*Nuc;
  R286: Cyt_MASTL_Thr198_p => Cyt_MASTL_Thr198_u; kDpGw1*Cyt_MASTL_Thr198_p*Cyt;
  R287: Nuc_MASTL_Thr198_p => Nuc_MASTL_Thr198_u; kDpGw1*Nuc_MASTL_Thr198_p*Nuc;
  R288: Cyt_PPP2R2B_ENSA_ARPP19 + Cyt_MASTL_Thr198_p => Cyt_PPP2R2B_ENSA_ARPP19 + Cyt_MASTL_Thr198_u; kDpGw2*Cyt_PPP2R2B_ENSA_ARPP19*Cyt_MASTL_Thr198_p*Cyt;
  R289: Nuc_PPP2R2B_ENSA_ARPP19 + Nuc_MASTL_Thr198_p => Nuc_PPP2R2B_ENSA_ARPP19 + Nuc_MASTL_Thr198_u; kDpGw2*Nuc_PPP2R2B_ENSA_ARPP19*Nuc_MASTL_Thr198_p*Nuc;
  R290: Cyt_MASTL_Thr198_p + S33 => Cyt_MASTL_Thr198_p + S34; kPhEnsa*Cyt_MASTL_Thr198_p*S33*Cyt;
  R291: Nuc_MASTL_Thr198_p + S77 => Nuc_MASTL_Thr198_p + S78; kPhEnsa*Nuc_MASTL_Thr198_p*S77*Nuc;
  R292: S35 => Cyt_PPP2R2B_ENSA_ARPP19 + S33; kDpEnsa*S35*Cyt;
  R293: S79 => Nuc_PPP2R2B_ENSA_ARPP19 + S77; kDpEnsa*S79*Nuc;
  R294: => Cyt_FBXO5_APC_FZR1_Ser182_u; kSyEmi1*Cyt;
  R295: S85 => Cyt_CCNE_CDKN1A_B + S85; kSyCe2*S85*Nuc;
  R296: S90 => Cyt_CCNE_CDKN1A_B + S90; kSyCe2*S90*Nuc;
  R297: S6 + S16 => S6 + S12 + Cyt_FZR1_APC_FBXO5_nTerm_p; kPhCdhB*S6*S16*Cyt;
  R298: S6 + S22 => S6 + S15 + Cyt_FZR1_APC_FBXO5_nTerm_p; kPhCdhB*S6*S22*Cyt;
  R299: S46 + S56 => S46 + S52 + Nuc_FZR1_APC_FBXO5_nTerm_p; kPhCdhB*S46*S56*Nuc;
  R300: S46 + S62 => S46 + S55 + Nuc_FZR1_APC_FBXO5_nTerm_p; kPhCdhB*S46*S62*Nuc;
  R301: Cyt_E2F_DBD_RB1_Ser332_u + Cyt_RB1_E2F_Ser807_Ser811_u => S7; kAsE2fRb*Cyt_E2F_DBD_RB1_Ser332_u*Cyt_RB1_E2F_Ser807_Ser811_u*Cyt;
  R302: Cyt_E2F_DBD_RB1_Ser332_p + Cyt_RB1_E2F_Ser807_Ser811_u => S8; kAsE2fRb*Cyt_E2F_DBD_RB1_Ser332_p*Cyt_RB1_E2F_Ser807_Ser811_u*Cyt;
  R303: Nuc_E2F_DBD_RB1_Ser332_u + Nuc_RB1_E2F_Ser807_Ser811_u => S47; kAsE2fRb*Nuc_E2F_DBD_RB1_Ser332_u*Nuc_RB1_E2F_Ser807_Ser811_u*Nuc;
  R304: Nuc_E2F_DBD_RB1_Ser332_p + Nuc_RB1_E2F_Ser807_Ser811_u => S48; kAsE2fRb*Nuc_E2F_DBD_RB1_Ser332_p*Nuc_RB1_E2F_Ser807_Ser811_u*Nuc;
  R305: S7 => Cyt_E2F_DBD_RB1_Ser332_u + Cyt_RB1_E2F_Ser807_Ser811_u; kDiE2fRb*S7*Cyt;
  R306: S8 => Cyt_E2F_DBD_RB1_Ser332_p + Cyt_RB1_E2F_Ser807_Ser811_u; kDiE2fRb*S8*Cyt;
  R307: S47 => Nuc_E2F_DBD_RB1_Ser332_u + Nuc_RB1_E2F_Ser807_Ser811_u; kDiE2fRb*S47*Nuc;
  R308: S48 => Nuc_E2F_DBD_RB1_Ser332_p + Nuc_RB1_E2F_Ser807_Ser811_u; kDiE2fRb*S48*Nuc;
  R309: S12 + Cyt_FZR1_APC_FBXO5_nTerm_u => S16; kAsACdh*S12*Cyt_FZR1_APC_FBXO5_nTerm_u*Cyt;
  R310: S15 + Cyt_FZR1_APC_FBXO5_nTerm_u => S22; kAsACdh*S15*Cyt_FZR1_APC_FBXO5_nTerm_u*Cyt;
  R311: S52 + Nuc_FZR1_APC_FBXO5_nTerm_u => S56; kAsACdh*S52*Nuc_FZR1_APC_FBXO5_nTerm_u*Nuc;
  R312: S55 + Nuc_FZR1_APC_FBXO5_nTerm_u => S62; kAsACdh*S55*Nuc_FZR1_APC_FBXO5_nTerm_u*Nuc;
  R313: S16 => S12 + Cyt_FZR1_APC_FBXO5_nTerm_u; kDiACdh*S16*Cyt;
  R314: S22 => S15 + Cyt_FZR1_APC_FBXO5_nTerm_u; kDiACdh*S22*Cyt;
  R315: S56 => S52 + Nuc_FZR1_APC_FBXO5_nTerm_u; kDiACdh*S56*Nuc;
  R316: S62 => S55 + Nuc_FZR1_APC_FBXO5_nTerm_u; kDiACdh*S62*Nuc;
  R317: S16 + Cyt_FBXO5_APC_FZR1_Ser182_u => S19; kAsACE*S16*Cyt_FBXO5_APC_FZR1_Ser182_u*Cyt;
  R318: Cyt_FBXO5_APC_FZR1_Ser182_u + S22 => S21; kAsACE*Cyt_FBXO5_APC_FZR1_Ser182_u*S22*Cyt;
  R319: S56 + Nuc_FBXO5_APC_FZR1_Ser182_u => S59; kAsACE*S56*Nuc_FBXO5_APC_FZR1_Ser182_u*Nuc;
  R320: Nuc_FBXO5_APC_FZR1_Ser182_u + S62 => S61; kAsACE*Nuc_FBXO5_APC_FZR1_Ser182_u*S62*Nuc;
  R321: S19 => S16 + Cyt_FBXO5_APC_FZR1_Ser182_u; kDiACE*S19*Cyt;
  R322: S21 => Cyt_FBXO5_APC_FZR1_Ser182_u + S22; kDiACE*S21*Cyt;
  R323: S59 => S56 + Nuc_FBXO5_APC_FZR1_Ser182_u; kDiACE*S59*Nuc;
  R324: S61 => Nuc_FBXO5_APC_FZR1_Ser182_u + S62; kDiACE*S61*Nuc;
  R325: Cyt_CDC20_APC + S15 => S14; kAspACdc*Cyt_CDC20_APC*S15*Cyt;
  R326: Nuc_CDC20_APC + S55 => S54; kAspACdc*Nuc_CDC20_APC*S55*Nuc;
  R327: S14 => Cyt_CDC20_APC + S15; kDipACdc*S14*Cyt;
  R328: S54 => Nuc_CDC20_APC + S55; kDipACdc*S54*Nuc;
  R329: Cyt_PPP2R2B_ENSA_ARPP19 + S34 => S35; kAspEB55*Cyt_PPP2R2B_ENSA_ARPP19*S34*Cyt;
  R330: Nuc_PPP2R2B_ENSA_ARPP19 + S78 => S79; kAspEB55*Nuc_PPP2R2B_ENSA_ARPP19*S78*Nuc;
  R331: S35 => Cyt_PPP2R2B_ENSA_ARPP19 + S34; kDipEB55*S35*Cyt;
  R332: S79 => Nuc_PPP2R2B_ENSA_ARPP19 + S78; kDipEB55*S79*Nuc;
  R333: Nuc_E2F_DBD_RB1_Ser332_u + Nuc_CCNE_promoter_E2F => S85; kAsEPx*Nuc_E2F_DBD_RB1_Ser332_u*Nuc_CCNE_promoter_E2F*Nuc;
  R334: Nuc_E2F_DBD_RB1_Ser332_p + Nuc_CCNE_promoter_E2F => S90; kAsEPx*Nuc_E2F_DBD_RB1_Ser332_p*Nuc_CCNE_promoter_E2F*Nuc;
  R335: S85 => Nuc_E2F_DBD_RB1_Ser332_u + Nuc_CCNE_promoter_E2F; kDiEPx*S85*Nuc;
  R336: S90 => Nuc_E2F_DBD_RB1_Ser332_p + Nuc_CCNE_promoter_E2F; kDiEPx*S90*Nuc;
  R337: Nuc_E2F_DBD_RB1_Ser332_u + Nuc_CCNA_promoter_E2F => S86; kAsEPx*Nuc_E2F_DBD_RB1_Ser332_u*Nuc_CCNA_promoter_E2F*Nuc;
  R338: Nuc_E2F_DBD_RB1_Ser332_p + Nuc_CCNA_promoter_E2F => S91; kAsEPx*Nuc_E2F_DBD_RB1_Ser332_p*Nuc_CCNA_promoter_E2F*Nuc;
  R339: S86 => Nuc_E2F_DBD_RB1_Ser332_u + Nuc_CCNA_promoter_E2F; kDiEPx*S86*Nuc;
  R340: S91 => Nuc_E2F_DBD_RB1_Ser332_p + Nuc_CCNA_promoter_E2F; kDiEPx*S91*Nuc;
  R341: Nuc_E2F_DBD_RB1_Ser332_u + Nuc_E2F_promoter_E2F => S87; kAsEPx*Nuc_E2F_DBD_RB1_Ser332_u*Nuc_E2F_promoter_E2F*Nuc;
  R342: Nuc_E2F_DBD_RB1_Ser332_p + Nuc_E2F_promoter_E2F => S92; kAsEPx*Nuc_E2F_DBD_RB1_Ser332_p*Nuc_E2F_promoter_E2F*Nuc;
  R343: S87 => Nuc_E2F_DBD_RB1_Ser332_u + Nuc_E2F_promoter_E2F; kDiEPx*S87*Nuc;
  R344: S92 => Nuc_E2F_DBD_RB1_Ser332_p + Nuc_E2F_promoter_E2F; kDiEPx*S92*Nuc;
  R345: Nuc_E2F_DBD_RB1_Ser332_u + Nuc_FBXO5_promoter_E2F => S88; kAsEPx*Nuc_E2F_DBD_RB1_Ser332_u*Nuc_FBXO5_promoter_E2F*Nuc;
  R346: Nuc_E2F_DBD_RB1_Ser332_p + Nuc_FBXO5_promoter_E2F => S93; kAsEPx*Nuc_E2F_DBD_RB1_Ser332_p*Nuc_FBXO5_promoter_E2F*Nuc;
  R347: S88 => Nuc_E2F_DBD_RB1_Ser332_u + Nuc_FBXO5_promoter_E2F; kDiEPx*S88*Nuc;
  R348: S93 => Nuc_E2F_DBD_RB1_Ser332_p + Nuc_FBXO5_promoter_E2F; kDiEPx*S93*Nuc;
  R349: Nuc_E2F_DBD_RB1_Ser332_u + Nuc_FOXM1_promoter_E2F => S89; kAsEPx*Nuc_E2F_DBD_RB1_Ser332_u*Nuc_FOXM1_promoter_E2F*Nuc;
  R350: Nuc_E2F_DBD_RB1_Ser332_p + Nuc_FOXM1_promoter_E2F => S94; kAsEPx*Nuc_E2F_DBD_RB1_Ser332_p*Nuc_FOXM1_promoter_E2F*Nuc;
  R351: S89 => Nuc_E2F_DBD_RB1_Ser332_u + Nuc_FOXM1_promoter_E2F; kDiEPx*S89*Nuc;
  R352: S94 => Nuc_E2F_DBD_RB1_Ser332_p + Nuc_FOXM1_promoter_E2F; kDiEPx*S94*Nuc;
  R353: => Cyt_SKP2; kSySkp2*Cyt;
  R354: Cyt_SKP2 => ; kDeSkp2_1*Cyt_SKP2*Cyt;
  R355: Nuc_SKP2 => ; kDeSkp2_1*Nuc_SKP2*Nuc;
  R356: S16 + Cyt_SKP2 => S16; kDeSkp2_2*S16*Cyt_SKP2*Cyt;
  R357: S22 + Cyt_SKP2 => S22; kDeSkp2_2*S22*Cyt_SKP2*Cyt;
  R358: S56 + Nuc_SKP2 => S56; kDeSkp2_2*S56*Nuc_SKP2*Nuc;
  R359: S62 + Nuc_SKP2 => S62; kDeSkp2_2*S62*Nuc_SKP2*Nuc;
  R360: Nuc_TP53_DBD_Ser15_p + Nuc_CDKN1A_promoter_TP53 => S101; kAsTP53PCDKN1A*Nuc_TP53_DBD_Ser15_p*Nuc_CDKN1A_promoter_TP53*Nuc;
  R361: => Cyt_CDKN1A_CCNE_A_B_Ser130_u; kSyCDKN1A_1*Cyt;
  R362: Nuc_FOXO_DBD + Nuc_CDKN1B_promoter_FOXO => S103; kAsFOXOPCDKN1B*Nuc_FOXO_DBD*Nuc_CDKN1B_promoter_FOXO*Nuc;
  R363: => Cyt_CDKN1B_CCNE_A_Thr187_u; kSyCDKN1B_1*Cyt;
  R364: Cyt_CCND + Num_NUP_pSites_u => Num_NUP_pSites_u + Nuc_CCND; kImImCCND_1*Cyt_CCND*Num_NUP_pSites_u*Num;
  R365: Num_NUP_pSites_u + Nuc_CCND => Cyt_CCND + Num_NUP_pSites_u; kExImCCND_1*Num_NUP_pSites_u*Nuc_CCND*Num;
  R366: Cyt_CCNE_CDKN1A_B + Num_NUP_pSites_u => Num_NUP_pSites_u + Nuc_CCNE_CDKN1A_B; kImImCCNE_CDKN1A_B__1*Cyt_CCNE_CDKN1A_B*Num_NUP_pSites_u*Num;
  R367: Num_NUP_pSites_u + Nuc_CCNE_CDKN1A_B => Cyt_CCNE_CDKN1A_B + Num_NUP_pSites_u; kExImCCNE_CDKN1A_B__1*Num_NUP_pSites_u*Nuc_CCNE_CDKN1A_B*Num;
  R368: Cyt_E2F_DBD_RB1_Ser332_u + Num_NUP_pSites_u => Num_NUP_pSites_u + Nuc_E2F_DBD_RB1_Ser332_u; kImImE2F_DBD_RB1_Ser332u__1*Cyt_E2F_DBD_RB1_Ser332_u*Num_NUP_pSites_u*Num;
  R369: Num_NUP_pSites_u + Nuc_E2F_DBD_RB1_Ser332_u => Cyt_E2F_DBD_RB1_Ser332_u + Num_NUP_pSites_u; kExImE2F_DBD_RB1_Ser332u__1*Num_NUP_pSites_u*Nuc_E2F_DBD_RB1_Ser332_u*Num;
  R370: Cyt_E2F_DBD_RB1_Ser332_p + Num_NUP_pSites_u => Num_NUP_pSites_u + Nuc_E2F_DBD_RB1_Ser332_p; kImImE2F_DBD_RB1_Ser332p__1*Cyt_E2F_DBD_RB1_Ser332_p*Num_NUP_pSites_u*Num;
  R371: Num_NUP_pSites_u + Nuc_E2F_DBD_RB1_Ser332_p => Cyt_E2F_DBD_RB1_Ser332_p + Num_NUP_pSites_u; kExImE2F_DBD_RB1_Ser332p__1*Num_NUP_pSites_u*Nuc_E2F_DBD_RB1_Ser332_p*Num;
  R372: Cyt_CCNA_CDKN1A_B + Num_NUP_pSites_u => Num_NUP_pSites_u + Nuc_CCNA_CDKN1A_B; kImImCCNA_CDKN1A_B__1*Cyt_CCNA_CDKN1A_B*Num_NUP_pSites_u*Num;
  R373: Num_NUP_pSites_u + Nuc_CCNA_CDKN1A_B => Cyt_CCNA_CDKN1A_B + Num_NUP_pSites_u; kExImCCNA_CDKN1A_B__1*Num_NUP_pSites_u*Nuc_CCNA_CDKN1A_B*Num;
  R374: S6 + Num_NUP_pSites_u => Num_NUP_pSites_u + S46; kImImCCNB_CDK1_Thr14_Tyr15u_CDKN1A__1*S6*Num_NUP_pSites_u*Num;
  R375: Num_NUP_pSites_u + S46 => S6 + Num_NUP_pSites_u; kExImCCNB_CDK1_Thr14_Tyr15u_CDKN1A__1*Num_NUP_pSites_u*S46*Num;
  R376: S7 + Num_NUP_pSites_u => Num_NUP_pSites_u + S47; kImImE2F_DBD_RB11_Ser332u__RB1_E2F1_Ser807_Ser811u__1*S7*Num_NUP_pSites_u*Num;
  R377: Num_NUP_pSites_u + S47 => S7 + Num_NUP_pSites_u; kExImE2F_DBD_RB11_Ser332u__RB1_E2F1_Ser807_Ser811u__1*Num_NUP_pSites_u*S47*Num;
  R378: S8 + Num_NUP_pSites_u => Num_NUP_pSites_u + S48; kImImE2F_DBD_RB11_Ser332p__RB1_E2F1_Ser807_Ser811u__1*S8*Num_NUP_pSites_u*Num;
  R379: Num_NUP_pSites_u + S48 => S8 + Num_NUP_pSites_u; kExImE2F_DBD_RB11_Ser332p__RB1_E2F1_Ser807_Ser811u__1*Num_NUP_pSites_u*S48*Num;
  R380: Cyt_RB1_E2F_Ser807_Ser811_u + Num_NUP_pSites_u => Num_NUP_pSites_u + Nuc_RB1_E2F_Ser807_Ser811_u; kImImRB1_E2F_Ser807_Ser811u__1*Cyt_RB1_E2F_Ser807_Ser811_u*Num_NUP_pSites_u*Num;
  R381: Num_NUP_pSites_u + Nuc_RB1_E2F_Ser807_Ser811_u => Cyt_RB1_E2F_Ser807_Ser811_u + Num_NUP_pSites_u; kExImRB1_E2F_Ser807_Ser811u__1*Num_NUP_pSites_u*Nuc_RB1_E2F_Ser807_Ser811_u*Num;
  R382: Cyt_RB1_E2F_Ser807_Ser811_p + Num_NUP_pSites_u => Num_NUP_pSites_u + Nuc_RB1_E2F_Ser807_Ser811_p; kImImRB1_E2F_Ser807_Ser811p__1*Cyt_RB1_E2F_Ser807_Ser811_p*Num_NUP_pSites_u*Num;
  R383: Num_NUP_pSites_u + Nuc_RB1_E2F_Ser807_Ser811_p => Cyt_RB1_E2F_Ser807_Ser811_p + Num_NUP_pSites_u; kExImRB1_E2F_Ser807_Ser811p__1*Num_NUP_pSites_u*Nuc_RB1_E2F_Ser807_Ser811_p*Num;
  R384: Cyt_PPP2R2B_ENSA_ARPP19 + Num_NUP_pSites_u => Num_NUP_pSites_u + Nuc_PPP2R2B_ENSA_ARPP19; kImImPPP2R2B_ENSA_ARPP19__1*Cyt_PPP2R2B_ENSA_ARPP19*Num_NUP_pSites_u*Num;
  R385: Num_NUP_pSites_u + Nuc_PPP2R2B_ENSA_ARPP19 => Cyt_PPP2R2B_ENSA_ARPP19 + Num_NUP_pSites_u; kExImPPP2R2B_ENSA_ARPP19__1*Num_NUP_pSites_u*Nuc_PPP2R2B_ENSA_ARPP19*Num;
  R386: S12 + Num_NUP_pSites_u => Num_NUP_pSites_u + S52; kImImAPC_FBXO5_FZR1_CDC20_Ser355u__1*S12*Num_NUP_pSites_u*Num;
  R387: Num_NUP_pSites_u + S52 => S12 + Num_NUP_pSites_u; kExImAPC_FBXO5_FZR1_CDC20_Ser355u__1*Num_NUP_pSites_u*S52*Num;
  R388: Cyt_CDC20_APC + Num_NUP_pSites_u => Num_NUP_pSites_u + Nuc_CDC20_APC; kImImCDC20_APC__1*Cyt_CDC20_APC*Num_NUP_pSites_u*Num;
  R389: Num_NUP_pSites_u + Nuc_CDC20_APC => Cyt_CDC20_APC + Num_NUP_pSites_u; kExImCDC20_APC__1*Num_NUP_pSites_u*Nuc_CDC20_APC*Num;
  R390: S14 + Num_NUP_pSites_u => Num_NUP_pSites_u + S54; kImImAPC_FBXO5_FZR1_CDC201_Ser355p__CDC20_APC1__1*S14*Num_NUP_pSites_u*Num;
  R391: Num_NUP_pSites_u + S54 => S14 + Num_NUP_pSites_u; kExImAPC_FBXO5_FZR1_CDC201_Ser355p__CDC20_APC1__1*Num_NUP_pSites_u*S54*Num;
  R392: S15 + Num_NUP_pSites_u => Num_NUP_pSites_u + S55; kImImAPC_FBXO5_FZR1_CDC20_Ser355p__1*S15*Num_NUP_pSites_u*Num;
  R393: Num_NUP_pSites_u + S55 => S15 + Num_NUP_pSites_u; kExImAPC_FBXO5_FZR1_CDC20_Ser355p__1*Num_NUP_pSites_u*S55*Num;
  R394: S16 + Num_NUP_pSites_u => Num_NUP_pSites_u + S56; kImImAPC_FBXO5_FZR1_CDC201_Ser355u__FZR1_APC1_FBXO5_nTermu__1*S16*Num_NUP_pSites_u*Num;
  R395: Num_NUP_pSites_u + S56 => S16 + Num_NUP_pSites_u; kExImAPC_FBXO5_FZR1_CDC201_Ser355u__FZR1_APC1_FBXO5_nTermu__1*Num_NUP_pSites_u*S56*Num;
  R396: Cyt_FZR1_APC_FBXO5_nTerm_u + Num_NUP_pSites_u => Num_NUP_pSites_u + Nuc_FZR1_APC_FBXO5_nTerm_u; kImImFZR1_APC_FBXO5_nTermu__1*Cyt_FZR1_APC_FBXO5_nTerm_u*Num_NUP_pSites_u*Num;
  R397: Num_NUP_pSites_u + Nuc_FZR1_APC_FBXO5_nTerm_u => Cyt_FZR1_APC_FBXO5_nTerm_u + Num_NUP_pSites_u; kExImFZR1_APC_FBXO5_nTermu__1*Num_NUP_pSites_u*Nuc_FZR1_APC_FBXO5_nTerm_u*Num;
  R398: Cyt_FZR1_APC_FBXO5_nTerm_p + Num_NUP_pSites_u => Num_NUP_pSites_u + Nuc_FZR1_APC_FBXO5_nTerm_p; kImImFZR1_APC_FBXO5_nTermp__1*Cyt_FZR1_APC_FBXO5_nTerm_p*Num_NUP_pSites_u*Num;
  R399: Num_NUP_pSites_u + Nuc_FZR1_APC_FBXO5_nTerm_p => Cyt_FZR1_APC_FBXO5_nTerm_p + Num_NUP_pSites_u; kExImFZR1_APC_FBXO5_nTermp__1*Num_NUP_pSites_u*Nuc_FZR1_APC_FBXO5_nTerm_p*Num;
  R400: S19 + Num_NUP_pSites_u => Num_NUP_pSites_u + S59; kImImAPC_FBXO51_FZR1_CDC202_Ser355u__FBXO5_APC1_FZR13_Ser182u__FZR1_APC2_FBXO53_nTermu__1*S19*Num_NUP_pSites_u*Num;
  R401: Num_NUP_pSites_u + S59 => S19 + Num_NUP_pSites_u; kExImAPC_FBXO51_FZR1_CDC202_Ser355u__FBXO5_APC1_FZR13_Ser182u__FZR1_APC2_FBXO53_nTermu__1*Num_NUP_pSites_u*S59*Num;
  R402: Cyt_FBXO5_APC_FZR1_Ser182_u + Num_NUP_pSites_u => Num_NUP_pSites_u + Nuc_FBXO5_APC_FZR1_Ser182_u; kImImFBXO5_APC_FZR1_Ser182u__1*Cyt_FBXO5_APC_FZR1_Ser182_u*Num_NUP_pSites_u*Num;
  R403: Num_NUP_pSites_u + Nuc_FBXO5_APC_FZR1_Ser182_u => Cyt_FBXO5_APC_FZR1_Ser182_u + Num_NUP_pSites_u; kExImFBXO5_APC_FZR1_Ser182u__1*Num_NUP_pSites_u*Nuc_FBXO5_APC_FZR1_Ser182_u*Num;
  R404: S21 + Num_NUP_pSites_u => Num_NUP_pSites_u + S61; kImImAPC_FBXO51_FZR1_CDC202_Ser355p__FBXO5_APC1_FZR13_Ser182u__FZR1_APC2_FBXO53_nTermu__1*S21*Num_NUP_pSites_u*Num;
  R405: Num_NUP_pSites_u + S61 => S21 + Num_NUP_pSites_u; kExImAPC_FBXO51_FZR1_CDC202_Ser355p__FBXO5_APC1_FZR13_Ser182u__FZR1_APC2_FBXO53_nTermu__1*Num_NUP_pSites_u*S61*Num;
  R406: S22 + Num_NUP_pSites_u => Num_NUP_pSites_u + S62; kImImAPC_FBXO5_FZR1_CDC201_Ser355p__FZR1_APC1_FBXO5_nTermu__1*S22*Num_NUP_pSites_u*Num;
  R407: Num_NUP_pSites_u + S62 => S22 + Num_NUP_pSites_u; kExImAPC_FBXO5_FZR1_CDC201_Ser355p__FZR1_APC1_FBXO5_nTermu__1*Num_NUP_pSites_u*S62*Num;
  R408: Cyt_FBXO5_APC_FZR1_Ser182_p + Num_NUP_pSites_u => Num_NUP_pSites_u + Nuc_FBXO5_APC_FZR1_Ser182_p; kImImFBXO5_APC_FZR1_Ser182p__1*Cyt_FBXO5_APC_FZR1_Ser182_p*Num_NUP_pSites_u*Num;
  R409: Num_NUP_pSites_u + Nuc_FBXO5_APC_FZR1_Ser182_p => Cyt_FBXO5_APC_FZR1_Ser182_p + Num_NUP_pSites_u; kExImFBXO5_APC_FZR1_Ser182p__1*Num_NUP_pSites_u*Nuc_FBXO5_APC_FZR1_Ser182_p*Num;
  R410: Cyt_FOXM1_DBD_Thr600_u + Num_NUP_pSites_u => Num_NUP_pSites_u + Nuc_FOXM1_DBD_Thr600_u; kImImFOXM1_DBD_Thr600u__1*Cyt_FOXM1_DBD_Thr600_u*Num_NUP_pSites_u*Num;
  R411: Num_NUP_pSites_u + Nuc_FOXM1_DBD_Thr600_u => Cyt_FOXM1_DBD_Thr600_u + Num_NUP_pSites_u; kExImFOXM1_DBD_Thr600u__1*Num_NUP_pSites_u*Nuc_FOXM1_DBD_Thr600_u*Num;
  R412: Cyt_FOXM1_DBD_Thr600_p + Num_NUP_pSites_u => Num_NUP_pSites_u + Nuc_FOXM1_DBD_Thr600_p; kImImFOXM1_DBD_Thr600p__1*Cyt_FOXM1_DBD_Thr600_p*Num_NUP_pSites_u*Num;
  R413: Num_NUP_pSites_u + Nuc_FOXM1_DBD_Thr600_p => Cyt_FOXM1_DBD_Thr600_p + Num_NUP_pSites_u; kExImFOXM1_DBD_Thr600p__1*Num_NUP_pSites_u*Nuc_FOXM1_DBD_Thr600_p*Num;
  R414: Cyt_WEE1_Ser123_u + Num_NUP_pSites_u => Num_NUP_pSites_u + Nuc_WEE1_Ser123_u; kImImWEE1_Ser123u__1*Cyt_WEE1_Ser123_u*Num_NUP_pSites_u*Num;
  R415: Num_NUP_pSites_u + Nuc_WEE1_Ser123_u => Cyt_WEE1_Ser123_u + Num_NUP_pSites_u; kExImWEE1_Ser123u__1*Num_NUP_pSites_u*Nuc_WEE1_Ser123_u*Num;
  R416: S27 + Num_NUP_pSites_u => Num_NUP_pSites_u + S71; kImImCCNB_CDK1_Thr14_Tyr15p_CDKN1A__1*S27*Num_NUP_pSites_u*Num;
  R417: Num_NUP_pSites_u + S71 => S27 + Num_NUP_pSites_u; kExImCCNB_CDK1_Thr14_Tyr15p_CDKN1A__1*Num_NUP_pSites_u*S71*Num;
  R418: Cyt_WEE1_Ser123_p + Num_NUP_pSites_u => Num_NUP_pSites_u + Nuc_WEE1_Ser123_p; kImImWEE1_Ser123p__1*Cyt_WEE1_Ser123_p*Num_NUP_pSites_u*Num;
  R419: Num_NUP_pSites_u + Nuc_WEE1_Ser123_p => Cyt_WEE1_Ser123_p + Num_NUP_pSites_u; kExImWEE1_Ser123p__1*Num_NUP_pSites_u*Nuc_WEE1_Ser123_p*Num;
  R420: Cyt_CDC25_pSites_p + Num_NUP_pSites_u => Num_NUP_pSites_u + Nuc_CDC25_pSites_p; kImImCDC25_pSitesp__1*Cyt_CDC25_pSites_p*Num_NUP_pSites_u*Num;
  R421: Num_NUP_pSites_u + Nuc_CDC25_pSites_p => Cyt_CDC25_pSites_p + Num_NUP_pSites_u; kExImCDC25_pSitesp__1*Num_NUP_pSites_u*Nuc_CDC25_pSites_p*Num;
  R422: Cyt_CDC25_pSites_u + Num_NUP_pSites_u => Num_NUP_pSites_u + Nuc_CDC25_pSites_u; kImImCDC25_pSitesu__1*Cyt_CDC25_pSites_u*Num_NUP_pSites_u*Num;
  R423: Num_NUP_pSites_u + Nuc_CDC25_pSites_u => Cyt_CDC25_pSites_u + Num_NUP_pSites_u; kExImCDC25_pSitesu__1*Num_NUP_pSites_u*Nuc_CDC25_pSites_u*Num;
  R424: Cyt_MASTL_Thr198_u + Num_NUP_pSites_u => Num_NUP_pSites_u + Nuc_MASTL_Thr198_u; kImImMASTL_Thr198u__1*Cyt_MASTL_Thr198_u*Num_NUP_pSites_u*Num;
  R425: Num_NUP_pSites_u + Nuc_MASTL_Thr198_u => Cyt_MASTL_Thr198_u + Num_NUP_pSites_u; kExImMASTL_Thr198u__1*Num_NUP_pSites_u*Nuc_MASTL_Thr198_u*Num;
  R426: Cyt_MASTL_Thr198_p + Num_NUP_pSites_u => Num_NUP_pSites_u + Nuc_MASTL_Thr198_p; kImImMASTL_Thr198p__1*Cyt_MASTL_Thr198_p*Num_NUP_pSites_u*Num;
  R427: Num_NUP_pSites_u + Nuc_MASTL_Thr198_p => Cyt_MASTL_Thr198_p + Num_NUP_pSites_u; kExImMASTL_Thr198p__1*Num_NUP_pSites_u*Nuc_MASTL_Thr198_p*Num;
  R428: S33 + Num_NUP_pSites_u => Num_NUP_pSites_u + S77; kImImENSA_ARPP19_PPP2R2B_Ser62_Ser67u__1*S33*Num_NUP_pSites_u*Num;
  R429: Num_NUP_pSites_u + S77 => S33 + Num_NUP_pSites_u; kExImENSA_ARPP19_PPP2R2B_Ser62_Ser67u__1*Num_NUP_pSites_u*S77*Num;
  R430: S34 + Num_NUP_pSites_u => Num_NUP_pSites_u + S78; kImImENSA_ARPP19_PPP2R2B_Ser62_Ser67p__1*S34*Num_NUP_pSites_u*Num;
  R431: Num_NUP_pSites_u + S78 => S34 + Num_NUP_pSites_u; kExImENSA_ARPP19_PPP2R2B_Ser62_Ser67p__1*Num_NUP_pSites_u*S78*Num;
  R432: S35 + Num_NUP_pSites_u => Num_NUP_pSites_u + S79; kImImENSA_ARPP19_PPP2R2B1_Ser62_Ser67p__PPP2R2B_ENSA_ARPP191__1*S35*Num_NUP_pSites_u*Num;
  R433: Num_NUP_pSites_u + S79 => S35 + Num_NUP_pSites_u; kExImENSA_ARPP19_PPP2R2B1_Ser62_Ser67p__PPP2R2B_ENSA_ARPP191__1*Num_NUP_pSites_u*S79*Num;
  R434: Cyt_iWEE + Num_NUP_pSites_u => Num_NUP_pSites_u + Nuc_iWEE; kImImiWEE_1*Cyt_iWEE*Num_NUP_pSites_u*Num;
  R435: Num_NUP_pSites_u + Nuc_iWEE => Cyt_iWEE + Num_NUP_pSites_u; kExImiWEE_1*Num_NUP_pSites_u*Nuc_iWEE*Num;
  R436: Cyt_SKP2 + Num_NUP_pSites_u => Num_NUP_pSites_u + Nuc_SKP2; kImImSKP2_1*Cyt_SKP2*Num_NUP_pSites_u*Num;
  R437: Num_NUP_pSites_u + Nuc_SKP2 => Cyt_SKP2 + Num_NUP_pSites_u; kExImSKP2_1*Num_NUP_pSites_u*Nuc_SKP2*Num;
  R438: Cyt_TP53_DBD_Ser15_p + Num_NUP_pSites_u => Num_NUP_pSites_u + Nuc_TP53_DBD_Ser15_p; kImImTP53_DBD_Ser15p__1*Cyt_TP53_DBD_Ser15_p*Num_NUP_pSites_u*Num;
  R439: Num_NUP_pSites_u + Nuc_TP53_DBD_Ser15_p => Cyt_TP53_DBD_Ser15_p + Num_NUP_pSites_u; kExImTP53_DBD_Ser15p__1*Num_NUP_pSites_u*Nuc_TP53_DBD_Ser15_p*Num;
  R440: Cyt_FOXO_DBD + Num_NUP_pSites_u => Num_NUP_pSites_u + Nuc_FOXO_DBD; kImImFOXO_DBD__1*Cyt_FOXO_DBD*Num_NUP_pSites_u*Num;
  R441: Num_NUP_pSites_u + Nuc_FOXO_DBD => Cyt_FOXO_DBD + Num_NUP_pSites_u; kExImFOXO_DBD__1*Num_NUP_pSites_u*Nuc_FOXO_DBD*Num;
  R442: S101 => Nuc_TP53_DBD_Ser15_p + Nuc_CDKN1A_promoter_TP53; kDiTP53PCDKN1A*S101*Nuc;
  R443: S101 => S101 + Cyt_CDKN1A_CCNE_A_B_Ser130_u; kSyCDKN1A_2*S101*Nuc;
  R444: Cyt_CDKN1A_CCNE_A_B_Ser130_u => ; kDeCDKN1A_1*Cyt_CDKN1A_CCNE_A_B_Ser130_u*Cyt;
  R445: Cyt_SKP2 + Cyt_CDKN1A_CCNE_A_B_Ser130_u => Cyt_SKP2; kDeCDKN1A_2*Cyt_SKP2*Cyt_CDKN1A_CCNE_A_B_Ser130_u*Cyt;
  R446: Cyt_CCNA_CDKN1A_B + Cyt_CDKN1A_CCNE_A_B_Ser130_u => S105; kAsCdkn1aC*Cyt_CCNA_CDKN1A_B*Cyt_CDKN1A_CCNE_A_B_Ser130_u*Cyt;
  R447: Cyt_CCNE_CDKN1A_B + Cyt_CDKN1A_CCNE_A_B_Ser130_u => S106; kAsCdkn1aC*Cyt_CCNE_CDKN1A_B*Cyt_CDKN1A_CCNE_A_B_Ser130_u*Cyt;
  R448: S6 + Cyt_CDKN1A_CCNE_A_B_Ser130_u => S107; kAsCdkn1aC*S6*Cyt_CDKN1A_CCNE_A_B_Ser130_u*Cyt;
  R449: S27 + Cyt_CDKN1A_CCNE_A_B_Ser130_u => S108; kAsCdkn1aC*S27*Cyt_CDKN1A_CCNE_A_B_Ser130_u*Cyt;
  R450: Cyt_CCNE_CDKN1A_B + Cyt_CDKN1A_CCNE_A_B_Ser130_u => Cyt_CCNE_CDKN1A_B + Cyt_CDKN1A_CCNE_A_B_Ser130_p; kPhCDKN1AByCe*Cyt_CCNE_CDKN1A_B*Cyt_CDKN1A_CCNE_A_B_Ser130_u*Cyt;
  R451: Cyt_CCNA_CDKN1A_B + Cyt_CDKN1A_CCNE_A_B_Ser130_u => Cyt_CCNA_CDKN1A_B + Cyt_CDKN1A_CCNE_A_B_Ser130_p; kPhCDKN1AByCa*Cyt_CCNA_CDKN1A_B*Cyt_CDKN1A_CCNE_A_B_Ser130_u*Cyt;
  R452: S6 + Cyt_CDKN1A_CCNE_A_B_Ser130_u => S6 + Cyt_CDKN1A_CCNE_A_B_Ser130_p; kPhCDKN1AByCb*S6*Cyt_CDKN1A_CCNE_A_B_Ser130_u*Cyt;
  R453: S103 => Nuc_FOXO_DBD + Nuc_CDKN1B_promoter_FOXO; kDiFOXOPCDKN1B*S103*Nuc;
  R454: S103 => S103 + Cyt_CDKN1B_CCNE_A_Thr187_u; kSyCDKN1B_2*S103*Nuc;
  R455: Cyt_CDKN1B_CCNE_A_Thr187_u => ; kDeCDKN1B_1*Cyt_CDKN1B_CCNE_A_Thr187_u*Cyt;
  R456: Cyt_SKP2 + Cyt_CDKN1B_CCNE_A_Thr187_u => Cyt_SKP2; _rateLaw3*Cyt_SKP2*Cyt_CDKN1B_CCNE_A_Thr187_u*Cyt;
  R457: Cyt_CCNA_CDKN1A_B + Cyt_CDKN1B_CCNE_A_Thr187_u => S110; kAsCdkn1bC*Cyt_CCNA_CDKN1A_B*Cyt_CDKN1B_CCNE_A_Thr187_u*Cyt;
  R458: Cyt_CCNE_CDKN1A_B + Cyt_CDKN1B_CCNE_A_Thr187_u => S111; kAsCdkn1bC*Cyt_CCNE_CDKN1A_B*Cyt_CDKN1B_CCNE_A_Thr187_u*Cyt;
  R459: Cyt_CCNE_CDKN1A_B + Cyt_CDKN1B_CCNE_A_Thr187_u => Cyt_CCNE_CDKN1A_B + Cyt_CDKN1B_CCNE_A_Thr187_p; kPhCDKN1BByCe*Cyt_CCNE_CDKN1A_B*Cyt_CDKN1B_CCNE_A_Thr187_u*Cyt;
  R460: Cyt_CCNA_CDKN1A_B + Cyt_CDKN1B_CCNE_A_Thr187_u => Cyt_CCNA_CDKN1A_B + Cyt_CDKN1B_CCNE_A_Thr187_p; kPhCDKN1BByCa*Cyt_CCNA_CDKN1A_B*Cyt_CDKN1B_CCNE_A_Thr187_u*Cyt;
  R461: S6 + Cyt_CDKN1B_CCNE_A_Thr187_u => S6 + Cyt_CDKN1B_CCNE_A_Thr187_p; kPhCDKN1BByCb*S6*Cyt_CDKN1B_CCNE_A_Thr187_u*Cyt;
  R462: Num_NUP_pSites_u + Cyt_CDKN1A_CCNE_A_B_Ser130_u => Num_NUP_pSites_u + Nuc_CDKN1A_CCNE_A_B_Ser130_u; kImImCDKN1A_CCNE_A_B_Ser130u__1*Num_NUP_pSites_u*Cyt_CDKN1A_CCNE_A_B_Ser130_u*Num;
  R463: Num_NUP_pSites_u + Cyt_CDKN1B_CCNE_A_Thr187_u => Num_NUP_pSites_u + Nuc_CDKN1B_CCNE_A_Thr187_u; kImImCDKN1B_CCNE_A_Thr187u__1*Num_NUP_pSites_u*Cyt_CDKN1B_CCNE_A_Thr187_u*Num;
  R464: S106 => Cyt_CDKN1A_CCNE_A_B_Ser130_u; kDeCe*S106*Cyt;
  R465: S111 => Cyt_CDKN1B_CCNE_A_Thr187_u; kDeCe*S111*Cyt;
  R466: Cyt_CCNE_CDKN1A_B + S106 => Cyt_CCNE_CDKN1A_B + Cyt_CDKN1A_CCNE_A_B_Ser130_u; kPhCeE*Cyt_CCNE_CDKN1A_B*S106*Cyt;
  R467: Cyt_CCNE_CDKN1A_B + S111 => Cyt_CCNE_CDKN1A_B + Cyt_CDKN1B_CCNE_A_Thr187_u; kPhCeE*Cyt_CCNE_CDKN1A_B*S111*Cyt;
  R468: S105 => Cyt_CDKN1A_CCNE_A_B_Ser130_u; kDeCa1*S105*Cyt;
  R469: S110 => Cyt_CDKN1B_CCNE_A_Thr187_u; kDeCa1*S110*Cyt;
  R470: Cyt_CCNA_CDKN1A_B + S106 => Cyt_CCNA_CDKN1A_B + Cyt_CDKN1A_CCNE_A_B_Ser130_u; kPhCeA*Cyt_CCNA_CDKN1A_B*S106*Cyt;
  R471: Cyt_CCNA_CDKN1A_B + S111 => Cyt_CCNA_CDKN1A_B + Cyt_CDKN1B_CCNE_A_Thr187_u; kPhCeA*Cyt_CCNA_CDKN1A_B*S111*Cyt;
  R472: S16 + S105 => S16 + Cyt_CDKN1A_CCNE_A_B_Ser130_u; kDeCa2*S16*S105*Cyt;
  R473: S22 + S105 => S22 + Cyt_CDKN1A_CCNE_A_B_Ser130_u; kDeCa2*S22*S105*Cyt;
  R474: S16 + S110 => S16 + Cyt_CDKN1B_CCNE_A_Thr187_u; kDeCa2*S16*S110*Cyt;
  R475: S22 + S110 => S22 + Cyt_CDKN1B_CCNE_A_Thr187_u; kDeCa2*S22*S110*Cyt;
  R476: S14 + S105 => S14 + Cyt_CDKN1A_CCNE_A_B_Ser130_u; kDeCa3*S14*S105*Cyt;
  R477: S14 + S110 => S14 + Cyt_CDKN1B_CCNE_A_Thr187_u; kDeCa3*S14*S110*Cyt;
  R478: S107 => Cyt_CDKN1A_CCNE_A_B_Ser130_u; kDeCb1*S107*Cyt;
  R479: S108 => Cyt_CDKN1A_CCNE_A_B_Ser130_u; kDeCb1*S108*Cyt;
  R480: S16 + S107 => S16 + Cyt_CDKN1A_CCNE_A_B_Ser130_u; kDeCb2*S16*S107*Cyt;
  R481: S22 + S107 => S22 + Cyt_CDKN1A_CCNE_A_B_Ser130_u; kDeCb2*S22*S107*Cyt;
  R482: S16 + S108 => S16 + Cyt_CDKN1A_CCNE_A_B_Ser130_u; kDeCb2*S16*S108*Cyt;
  R483: S22 + S108 => S22 + Cyt_CDKN1A_CCNE_A_B_Ser130_u; kDeCb2*S22*S108*Cyt;
  R484: S14 + S107 => S14 + Cyt_CDKN1A_CCNE_A_B_Ser130_u; kDeCb3*S14*S107*Cyt;
  R485: S14 + S108 => S14 + Cyt_CDKN1A_CCNE_A_B_Ser130_u; kDeCb3*S14*S108*Cyt;
  R486: Cyt_WEE1_Ser123_u + S107 => Cyt_WEE1_Ser123_u + S108; kWee2*Cyt_WEE1_Ser123_u*S107*Cyt;
  R487: Cyt_WEE1_Ser123_p + S107 => Cyt_WEE1_Ser123_p + S108; kWee1*Cyt_WEE1_Ser123_p*S107*Cyt;
  R488: Cyt_CDC25_pSites_p + S108 => Cyt_CDC25_pSites_p + S107; kCdc25_2*Cyt_CDC25_pSites_p*S108*Cyt;
  R489: Cyt_CDC25_pSites_u + S108 => Cyt_CDC25_pSites_u + S107; kCdc25_1*Cyt_CDC25_pSites_u*S108*Cyt;
  R490: S105 => Cyt_CCNA_CDKN1A_B; kDeCDKN1A_1*S105*Cyt;
  R491: S106 => Cyt_CCNE_CDKN1A_B; kDeCDKN1A_1*S106*Cyt;
  R492: S107 => S6; kDeCDKN1A_1*S107*Cyt;
  R493: S108 => S27; kDeCDKN1A_1*S108*Cyt;
  R494: Cyt_CDKN1A_CCNE_A_B_Ser130_p => ; kDeCDKN1A_1*Cyt_CDKN1A_CCNE_A_B_Ser130_p*Cyt;
  R495: Nuc_CDKN1A_CCNE_A_B_Ser130_u => ; kDeCDKN1A_1*Nuc_CDKN1A_CCNE_A_B_Ser130_u*Nuc;
  R496: Cyt_SKP2 + Cyt_CDKN1A_CCNE_A_B_Ser130_p => Cyt_SKP2; kDeCDKN1A_2*Cyt_SKP2*Cyt_CDKN1A_CCNE_A_B_Ser130_p*Cyt;
  R497: Cyt_SKP2 + S105 => Cyt_CCNA_CDKN1A_B + Cyt_SKP2; kDeCDKN1A_2*Cyt_SKP2*S105*Cyt;
  R498: Cyt_SKP2 + S106 => Cyt_CCNE_CDKN1A_B + Cyt_SKP2; kDeCDKN1A_2*Cyt_SKP2*S106*Cyt;
  R499: Cyt_SKP2 + S107 => S6 + Cyt_SKP2; kDeCDKN1A_2*Cyt_SKP2*S107*Cyt;
  R500: Cyt_SKP2 + S108 => S27 + Cyt_SKP2; kDeCDKN1A_2*Cyt_SKP2*S108*Cyt;
  R501: Nuc_SKP2 + Nuc_CDKN1A_CCNE_A_B_Ser130_u => Nuc_SKP2; kDeCDKN1A_2*Nuc_SKP2*Nuc_CDKN1A_CCNE_A_B_Ser130_u*Nuc;
  R502: Nuc_CCNA_CDKN1A_B + Nuc_CDKN1A_CCNE_A_B_Ser130_u => S115; kAsCdkn1aC*Nuc_CCNA_CDKN1A_B*Nuc_CDKN1A_CCNE_A_B_Ser130_u*Nuc;
  R503: S105 => Cyt_CCNA_CDKN1A_B + Cyt_CDKN1A_CCNE_A_B_Ser130_u; kDiCdkn1aC*S105*Cyt;
  R504: Nuc_CCNE_CDKN1A_B + Nuc_CDKN1A_CCNE_A_B_Ser130_u => S116; kAsCdkn1aC*Nuc_CCNE_CDKN1A_B*Nuc_CDKN1A_CCNE_A_B_Ser130_u*Nuc;
  R505: S106 => Cyt_CCNE_CDKN1A_B + Cyt_CDKN1A_CCNE_A_B_Ser130_u; kDiCdkn1aC*S106*Cyt;
  R506: S46 + Nuc_CDKN1A_CCNE_A_B_Ser130_u => S117; kAsCdkn1aC*S46*Nuc_CDKN1A_CCNE_A_B_Ser130_u*Nuc;
  R507: S71 + Nuc_CDKN1A_CCNE_A_B_Ser130_u => S118; kAsCdkn1aC*S71*Nuc_CDKN1A_CCNE_A_B_Ser130_u*Nuc;
  R508: S107 => S6 + Cyt_CDKN1A_CCNE_A_B_Ser130_u; kDiCdkn1aC*S107*Cyt;
  R509: S108 => S27 + Cyt_CDKN1A_CCNE_A_B_Ser130_u; kDiCdkn1aC*S108*Cyt;
  R510: Nuc_CCNE_CDKN1A_B + Nuc_CDKN1A_CCNE_A_B_Ser130_u => Nuc_CCNE_CDKN1A_B + Nuc_CDKN1A_CCNE_A_B_Ser130_p; kPhCDKN1AByCe*Nuc_CCNE_CDKN1A_B*Nuc_CDKN1A_CCNE_A_B_Ser130_u*Nuc;
  R511: Cyt_CCNE_CDKN1A_B + S105 => Cyt_CCNE_CDKN1A_B + Cyt_CCNA_CDKN1A_B + Cyt_CDKN1A_CCNE_A_B_Ser130_p; kPhCDKN1AByCe*Cyt_CCNE_CDKN1A_B*S105*Cyt;
  R512: Cyt_CCNE_CDKN1A_B + S106 => Cyt_CCNE_CDKN1A_B + Cyt_CCNE_CDKN1A_B + Cyt_CDKN1A_CCNE_A_B_Ser130_p; kPhCDKN1AByCe*Cyt_CCNE_CDKN1A_B*S106*Cyt;
  R513: Cyt_CCNE_CDKN1A_B + S107 => Cyt_CCNE_CDKN1A_B + S6 + Cyt_CDKN1A_CCNE_A_B_Ser130_p; kPhCDKN1AByCe*Cyt_CCNE_CDKN1A_B*S107*Cyt;
  R514: Cyt_CCNE_CDKN1A_B + S108 => Cyt_CCNE_CDKN1A_B + S27 + Cyt_CDKN1A_CCNE_A_B_Ser130_p; kPhCDKN1AByCe*Cyt_CCNE_CDKN1A_B*S108*Cyt;
  R515: Nuc_CCNA_CDKN1A_B + Nuc_CDKN1A_CCNE_A_B_Ser130_u => Nuc_CCNA_CDKN1A_B + Nuc_CDKN1A_CCNE_A_B_Ser130_p; kPhCDKN1AByCa*Nuc_CCNA_CDKN1A_B*Nuc_CDKN1A_CCNE_A_B_Ser130_u*Nuc;
  R516: Cyt_CCNA_CDKN1A_B + S105 => Cyt_CCNA_CDKN1A_B + Cyt_CCNA_CDKN1A_B + Cyt_CDKN1A_CCNE_A_B_Ser130_p; kPhCDKN1AByCa*Cyt_CCNA_CDKN1A_B*S105*Cyt;
  R517: Cyt_CCNA_CDKN1A_B + S106 => Cyt_CCNE_CDKN1A_B + Cyt_CCNA_CDKN1A_B + Cyt_CDKN1A_CCNE_A_B_Ser130_p; kPhCDKN1AByCa*Cyt_CCNA_CDKN1A_B*S106*Cyt;
  R518: Cyt_CCNA_CDKN1A_B + S107 => Cyt_CCNA_CDKN1A_B + S6 + Cyt_CDKN1A_CCNE_A_B_Ser130_p; kPhCDKN1AByCa*Cyt_CCNA_CDKN1A_B*S107*Cyt;
  R519: Cyt_CCNA_CDKN1A_B + S108 => Cyt_CCNA_CDKN1A_B + S27 + Cyt_CDKN1A_CCNE_A_B_Ser130_p; kPhCDKN1AByCa*Cyt_CCNA_CDKN1A_B*S108*Cyt;
  R520: S46 + Nuc_CDKN1A_CCNE_A_B_Ser130_u => S46 + Nuc_CDKN1A_CCNE_A_B_Ser130_p; kPhCDKN1AByCb*S46*Nuc_CDKN1A_CCNE_A_B_Ser130_u*Nuc;
  R521: S6 + S105 => Cyt_CCNA_CDKN1A_B + S6 + Cyt_CDKN1A_CCNE_A_B_Ser130_p; kPhCDKN1AByCb*S6*S105*Cyt;
  R522: S6 + S106 => Cyt_CCNE_CDKN1A_B + S6 + Cyt_CDKN1A_CCNE_A_B_Ser130_p; kPhCDKN1AByCb*S6*S106*Cyt;
  R523: S6 + S107 => S6 + S6 + Cyt_CDKN1A_CCNE_A_B_Ser130_p; kPhCDKN1AByCb*S6*S107*Cyt;
  R524: S6 + S108 => S6 + S27 + Cyt_CDKN1A_CCNE_A_B_Ser130_p; kPhCDKN1AByCb*S6*S108*Cyt;
  R525: Cyt_CDKN1A_CCNE_A_B_Ser130_p => Cyt_CDKN1A_CCNE_A_B_Ser130_u; kDpCDKN1A*Cyt_CDKN1A_CCNE_A_B_Ser130_p*Cyt;
  R526: S110 => Cyt_CCNA_CDKN1A_B; kDeCDKN1B_1*S110*Cyt;
  R527: S111 => Cyt_CCNE_CDKN1A_B; kDeCDKN1B_1*S111*Cyt;
  R528: Cyt_CDKN1B_CCNE_A_Thr187_p => ; kDeCDKN1B_1*Cyt_CDKN1B_CCNE_A_Thr187_p*Cyt;
  R529: Nuc_CDKN1B_CCNE_A_Thr187_u => ; kDeCDKN1B_1*Nuc_CDKN1B_CCNE_A_Thr187_u*Nuc;
  R530: Cyt_SKP2 + Cyt_CDKN1B_CCNE_A_Thr187_p => Cyt_SKP2; kDeCDKN1B_2*Cyt_SKP2*Cyt_CDKN1B_CCNE_A_Thr187_p*Cyt;
  R531: Cyt_SKP2 + S110 => Cyt_CCNA_CDKN1A_B + Cyt_SKP2; _rateLaw3*Cyt_SKP2*S110*Cyt;
  R532: Cyt_SKP2 + S111 => Cyt_CCNE_CDKN1A_B + Cyt_SKP2; _rateLaw3*Cyt_SKP2*S111*Cyt;
  R533: Nuc_SKP2 + Nuc_CDKN1B_CCNE_A_Thr187_u => Nuc_SKP2; _rateLaw3*Nuc_SKP2*Nuc_CDKN1B_CCNE_A_Thr187_u*Nuc;
  R534: Cyt_CCNA_CDKN1A_B + Cyt_CDKN1B_CCNE_A_Thr187_p => S120; kAsCdkn1bC*Cyt_CCNA_CDKN1A_B*Cyt_CDKN1B_CCNE_A_Thr187_p*Cyt;
  R535: Nuc_CCNA_CDKN1A_B + Nuc_CDKN1B_CCNE_A_Thr187_u => S121; kAsCdkn1bC*Nuc_CCNA_CDKN1A_B*Nuc_CDKN1B_CCNE_A_Thr187_u*Nuc;
  R536: S110 => Cyt_CCNA_CDKN1A_B + Cyt_CDKN1B_CCNE_A_Thr187_u; kDiCdkn1bC*S110*Cyt;
  R537: Cyt_CCNE_CDKN1A_B + Cyt_CDKN1B_CCNE_A_Thr187_p => S122; kAsCdkn1bC*Cyt_CCNE_CDKN1A_B*Cyt_CDKN1B_CCNE_A_Thr187_p*Cyt;
  R538: Nuc_CCNE_CDKN1A_B + Nuc_CDKN1B_CCNE_A_Thr187_u => S123; kAsCdkn1bC*Nuc_CCNE_CDKN1A_B*Nuc_CDKN1B_CCNE_A_Thr187_u*Nuc;
  R539: S111 => Cyt_CCNE_CDKN1A_B + Cyt_CDKN1B_CCNE_A_Thr187_u; kDiCdkn1bC*S111*Cyt;
  R540: Cyt_CCNE_CDKN1A_B + S110 => Cyt_CCNE_CDKN1A_B + S120; kPhCDKN1BByCe*Cyt_CCNE_CDKN1A_B*S110*Cyt;
  R541: Cyt_CCNE_CDKN1A_B + S111 => Cyt_CCNE_CDKN1A_B + S122; kPhCDKN1BByCe*Cyt_CCNE_CDKN1A_B*S111*Cyt;
  R542: Nuc_CCNE_CDKN1A_B + Nuc_CDKN1B_CCNE_A_Thr187_u => Nuc_CCNE_CDKN1A_B + Nuc_CDKN1B_CCNE_A_Thr187_p; kPhCDKN1BByCe*Nuc_CCNE_CDKN1A_B*Nuc_CDKN1B_CCNE_A_Thr187_u*Nuc;
  R543: Cyt_CCNA_CDKN1A_B + S110 => Cyt_CCNA_CDKN1A_B + S120; kPhCDKN1BByCa*Cyt_CCNA_CDKN1A_B*S110*Cyt;
  R544: Cyt_CCNA_CDKN1A_B + S111 => Cyt_CCNA_CDKN1A_B + S122; kPhCDKN1BByCa*Cyt_CCNA_CDKN1A_B*S111*Cyt;
  R545: Nuc_CCNA_CDKN1A_B + Nuc_CDKN1B_CCNE_A_Thr187_u => Nuc_CCNA_CDKN1A_B + Nuc_CDKN1B_CCNE_A_Thr187_p; kPhCDKN1BByCa*Nuc_CCNA_CDKN1A_B*Nuc_CDKN1B_CCNE_A_Thr187_u*Nuc;
  R546: S6 + S110 => S6 + S120; kPhCDKN1BByCb*S6*S110*Cyt;
  R547: S6 + S111 => S6 + S122; kPhCDKN1BByCb*S6*S111*Cyt;
  R548: S46 + Nuc_CDKN1B_CCNE_A_Thr187_u => S46 + Nuc_CDKN1B_CCNE_A_Thr187_p; kPhCDKN1BByCb*S46*Nuc_CDKN1B_CCNE_A_Thr187_u*Nuc;
  R549: Cyt_CDKN1B_CCNE_A_Thr187_p => Cyt_CDKN1B_CCNE_A_Thr187_u; kDpCDKN1B*Cyt_CDKN1B_CCNE_A_Thr187_p*Cyt;
  R550: Num_NUP_pSites_u + Nuc_CDKN1A_CCNE_A_B_Ser130_u => Num_NUP_pSites_u + Cyt_CDKN1A_CCNE_A_B_Ser130_u; kExImCDKN1A_CCNE_A_B_Ser130u__1*Num_NUP_pSites_u*Nuc_CDKN1A_CCNE_A_B_Ser130_u*Num;
  R551: Num_NUP_pSites_u + Nuc_CDKN1B_CCNE_A_Thr187_u => Num_NUP_pSites_u + Cyt_CDKN1B_CCNE_A_Thr187_u; kExImCDKN1B_CCNE_A_Thr187u__1*Num_NUP_pSites_u*Nuc_CDKN1B_CCNE_A_Thr187_u*Num;
  R552: Num_NUP_pSites_u + S105 => Num_NUP_pSites_u + S115; kImImCCNA_CDKN1A_B1__CDKN1A_CCNE_A_B1_Ser130u__1*Num_NUP_pSites_u*S105*Num;
  R553: Num_NUP_pSites_u + S106 => Num_NUP_pSites_u + S116; kImImCCNE_CDKN1A_B1__CDKN1A_CCNE_A_B1_Ser130u__1*Num_NUP_pSites_u*S106*Num;
  R554: Num_NUP_pSites_u + S107 => Num_NUP_pSites_u + S117; kImImCCNB_CDK1_Thr14_Tyr15u_CDKN1A1__CDKN1A_CCNE_A_B1_Ser130u__1*Num_NUP_pSites_u*S107*Num;
  R555: Num_NUP_pSites_u + S108 => Num_NUP_pSites_u + S118; kImImCCNB_CDK1_Thr14_Tyr15p_CDKN1A1__CDKN1A_CCNE_A_B1_Ser130u__1*Num_NUP_pSites_u*S108*Num;
  R556: Num_NUP_pSites_u + Cyt_CDKN1A_CCNE_A_B_Ser130_p => Num_NUP_pSites_u + Nuc_CDKN1A_CCNE_A_B_Ser130_p; kImImCDKN1A_CCNE_A_B_Ser130p__1*Num_NUP_pSites_u*Cyt_CDKN1A_CCNE_A_B_Ser130_p*Num;
  R557: Num_NUP_pSites_u + S110 => Num_NUP_pSites_u + S121; kImImCCNA_CDKN1A_B1__CDKN1B_CCNE_A1_Thr187u__1*Num_NUP_pSites_u*S110*Num;
  R558: Num_NUP_pSites_u + S111 => Num_NUP_pSites_u + S123; kImImCCNE_CDKN1A_B1__CDKN1B_CCNE_A1_Thr187u__1*Num_NUP_pSites_u*S111*Num;
  R559: Num_NUP_pSites_u + Cyt_CDKN1B_CCNE_A_Thr187_p => Num_NUP_pSites_u + Nuc_CDKN1B_CCNE_A_Thr187_p; kImImCDKN1B_CCNE_A_Thr187p__1*Num_NUP_pSites_u*Cyt_CDKN1B_CCNE_A_Thr187_p*Num;
  R560: S116 => Nuc_CDKN1A_CCNE_A_B_Ser130_u; kDeCe*S116*Nuc;
  R561: S122 => Cyt_CDKN1B_CCNE_A_Thr187_p; kDeCe*S122*Cyt;
  R562: S123 => Nuc_CDKN1B_CCNE_A_Thr187_u; kDeCe*S123*Nuc;
  R563: Cyt_CCNE_CDKN1A_B + S122 => Cyt_CCNE_CDKN1A_B + Cyt_CDKN1B_CCNE_A_Thr187_p; kPhCeE*Cyt_CCNE_CDKN1A_B*S122*Cyt;
  R564: Nuc_CCNE_CDKN1A_B + S116 => Nuc_CCNE_CDKN1A_B + Nuc_CDKN1A_CCNE_A_B_Ser130_u; kPhCeE*Nuc_CCNE_CDKN1A_B*S116*Nuc;
  R565: Nuc_CCNE_CDKN1A_B + S123 => Nuc_CCNE_CDKN1A_B + Nuc_CDKN1B_CCNE_A_Thr187_u; kPhCeE*Nuc_CCNE_CDKN1A_B*S123*Nuc;
  R566: S115 => Nuc_CDKN1A_CCNE_A_B_Ser130_u; kDeCa1*S115*Nuc;
  R567: S120 => Cyt_CDKN1B_CCNE_A_Thr187_p; kDeCa1*S120*Cyt;
  R568: S121 => Nuc_CDKN1B_CCNE_A_Thr187_u; kDeCa1*S121*Nuc;
  R569: Nuc_CCNA_CDKN1A_B + S116 => Nuc_CCNA_CDKN1A_B + Nuc_CDKN1A_CCNE_A_B_Ser130_u; kPhCeA*Nuc_CCNA_CDKN1A_B*S116*Nuc;
  R570: Cyt_CCNA_CDKN1A_B + S122 => Cyt_CCNA_CDKN1A_B + Cyt_CDKN1B_CCNE_A_Thr187_p; kPhCeA*Cyt_CCNA_CDKN1A_B*S122*Cyt;
  R571: Nuc_CCNA_CDKN1A_B + S123 => Nuc_CCNA_CDKN1A_B + Nuc_CDKN1B_CCNE_A_Thr187_u; kPhCeA*Nuc_CCNA_CDKN1A_B*S123*Nuc;
  R572: S56 + S115 => S56 + Nuc_CDKN1A_CCNE_A_B_Ser130_u; kDeCa2*S56*S115*Nuc;
  R573: S62 + S115 => S62 + Nuc_CDKN1A_CCNE_A_B_Ser130_u; kDeCa2*S62*S115*Nuc;
  R574: S16 + S120 => S16 + Cyt_CDKN1B_CCNE_A_Thr187_p; kDeCa2*S16*S120*Cyt;
  R575: S22 + S120 => S22 + Cyt_CDKN1B_CCNE_A_Thr187_p; kDeCa2*S22*S120*Cyt;
  R576: S56 + S121 => S56 + Nuc_CDKN1B_CCNE_A_Thr187_u; kDeCa2*S56*S121*Nuc;
  R577: S62 + S121 => S62 + Nuc_CDKN1B_CCNE_A_Thr187_u; kDeCa2*S62*S121*Nuc;
  R578: S54 + S115 => S54 + Nuc_CDKN1A_CCNE_A_B_Ser130_u; kDeCa3*S54*S115*Nuc;
  R579: S14 + S120 => S14 + Cyt_CDKN1B_CCNE_A_Thr187_p; kDeCa3*S14*S120*Cyt;
  R580: S54 + S121 => S54 + Nuc_CDKN1B_CCNE_A_Thr187_u; kDeCa3*S54*S121*Nuc;
  R581: S117 => Nuc_CDKN1A_CCNE_A_B_Ser130_u; kDeCb1*S117*Nuc;
  R582: S118 => Nuc_CDKN1A_CCNE_A_B_Ser130_u; kDeCb1*S118*Nuc;
  R583: S56 + S117 => S56 + Nuc_CDKN1A_CCNE_A_B_Ser130_u; kDeCb2*S56*S117*Nuc;
  R584: S62 + S117 => S62 + Nuc_CDKN1A_CCNE_A_B_Ser130_u; kDeCb2*S62*S117*Nuc;
  R585: S56 + S118 => S56 + Nuc_CDKN1A_CCNE_A_B_Ser130_u; kDeCb2*S56*S118*Nuc;
  R586: S62 + S118 => S62 + Nuc_CDKN1A_CCNE_A_B_Ser130_u; kDeCb2*S62*S118*Nuc;
  R587: S54 + S117 => S54 + Nuc_CDKN1A_CCNE_A_B_Ser130_u; kDeCb3*S54*S117*Nuc;
  R588: S54 + S118 => S54 + Nuc_CDKN1A_CCNE_A_B_Ser130_u; kDeCb3*S54*S118*Nuc;
  R589: Nuc_WEE1_Ser123_u + S117 => Nuc_WEE1_Ser123_u + S118; kWee2*Nuc_WEE1_Ser123_u*S117*Nuc;
  R590: Nuc_WEE1_Ser123_p + S117 => Nuc_WEE1_Ser123_p + S118; kWee1*Nuc_WEE1_Ser123_p*S117*Nuc;
  R591: Nuc_CDC25_pSites_p + S118 => Nuc_CDC25_pSites_p + S117; kCdc25_2*Nuc_CDC25_pSites_p*S118*Nuc;
  R592: Nuc_CDC25_pSites_u + S118 => Nuc_CDC25_pSites_u + S117; kCdc25_1*Nuc_CDC25_pSites_u*S118*Nuc;
  R593: S115 => Nuc_CCNA_CDKN1A_B; kDeCDKN1A_1*S115*Nuc;
  R594: S116 => Nuc_CCNE_CDKN1A_B; kDeCDKN1A_1*S116*Nuc;
  R595: S117 => S46; kDeCDKN1A_1*S117*Nuc;
  R596: S118 => S71; kDeCDKN1A_1*S118*Nuc;
  R597: Nuc_CDKN1A_CCNE_A_B_Ser130_p => ; kDeCDKN1A_1*Nuc_CDKN1A_CCNE_A_B_Ser130_p*Nuc;
  R598: Nuc_SKP2 + Nuc_CDKN1A_CCNE_A_B_Ser130_p => Nuc_SKP2; kDeCDKN1A_2*Nuc_SKP2*Nuc_CDKN1A_CCNE_A_B_Ser130_p*Nuc;
  R599: Nuc_SKP2 + S115 => Nuc_CCNA_CDKN1A_B + Nuc_SKP2; kDeCDKN1A_2*Nuc_SKP2*S115*Nuc;
  R600: Nuc_SKP2 + S116 => Nuc_CCNE_CDKN1A_B + Nuc_SKP2; kDeCDKN1A_2*Nuc_SKP2*S116*Nuc;
  R601: Nuc_SKP2 + S117 => S46 + Nuc_SKP2; kDeCDKN1A_2*Nuc_SKP2*S117*Nuc;
  R602: Nuc_SKP2 + S118 => S71 + Nuc_SKP2; kDeCDKN1A_2*Nuc_SKP2*S118*Nuc;
  R603: S115 => Nuc_CCNA_CDKN1A_B + Nuc_CDKN1A_CCNE_A_B_Ser130_u; kDiCdkn1aC*S115*Nuc;
  R604: S116 => Nuc_CCNE_CDKN1A_B + Nuc_CDKN1A_CCNE_A_B_Ser130_u; kDiCdkn1aC*S116*Nuc;
  R605: S117 => S46 + Nuc_CDKN1A_CCNE_A_B_Ser130_u; kDiCdkn1aC*S117*Nuc;
  R606: S118 => S71 + Nuc_CDKN1A_CCNE_A_B_Ser130_u; kDiCdkn1aC*S118*Nuc;
  R607: Nuc_CCNE_CDKN1A_B + S115 => Nuc_CCNE_CDKN1A_B + Nuc_CCNA_CDKN1A_B + Nuc_CDKN1A_CCNE_A_B_Ser130_p; kPhCDKN1AByCe*Nuc_CCNE_CDKN1A_B*S115*Nuc;
  R608: Nuc_CCNE_CDKN1A_B + S116 => Nuc_CCNE_CDKN1A_B + Nuc_CCNE_CDKN1A_B + Nuc_CDKN1A_CCNE_A_B_Ser130_p; kPhCDKN1AByCe*Nuc_CCNE_CDKN1A_B*S116*Nuc;
  R609: Nuc_CCNE_CDKN1A_B + S117 => Nuc_CCNE_CDKN1A_B + S46 + Nuc_CDKN1A_CCNE_A_B_Ser130_p; kPhCDKN1AByCe*Nuc_CCNE_CDKN1A_B*S117*Nuc;
  R610: Nuc_CCNE_CDKN1A_B + S118 => Nuc_CCNE_CDKN1A_B + S71 + Nuc_CDKN1A_CCNE_A_B_Ser130_p; kPhCDKN1AByCe*Nuc_CCNE_CDKN1A_B*S118*Nuc;
  R611: Nuc_CCNA_CDKN1A_B + S115 => Nuc_CCNA_CDKN1A_B + Nuc_CCNA_CDKN1A_B + Nuc_CDKN1A_CCNE_A_B_Ser130_p; kPhCDKN1AByCa*Nuc_CCNA_CDKN1A_B*S115*Nuc;
  R612: Nuc_CCNA_CDKN1A_B + S116 => Nuc_CCNE_CDKN1A_B + Nuc_CCNA_CDKN1A_B + Nuc_CDKN1A_CCNE_A_B_Ser130_p; kPhCDKN1AByCa*Nuc_CCNA_CDKN1A_B*S116*Nuc;
  R613: Nuc_CCNA_CDKN1A_B + S117 => Nuc_CCNA_CDKN1A_B + S46 + Nuc_CDKN1A_CCNE_A_B_Ser130_p; kPhCDKN1AByCa*Nuc_CCNA_CDKN1A_B*S117*Nuc;
  R614: Nuc_CCNA_CDKN1A_B + S118 => Nuc_CCNA_CDKN1A_B + S71 + Nuc_CDKN1A_CCNE_A_B_Ser130_p; kPhCDKN1AByCa*Nuc_CCNA_CDKN1A_B*S118*Nuc;
  R615: S46 + S115 => Nuc_CCNA_CDKN1A_B + S46 + Nuc_CDKN1A_CCNE_A_B_Ser130_p; kPhCDKN1AByCb*S46*S115*Nuc;
  R616: S46 + S116 => Nuc_CCNE_CDKN1A_B + S46 + Nuc_CDKN1A_CCNE_A_B_Ser130_p; kPhCDKN1AByCb*S46*S116*Nuc;
  R617: S46 + S117 => S46 + S46 + Nuc_CDKN1A_CCNE_A_B_Ser130_p; kPhCDKN1AByCb*S46*S117*Nuc;
  R618: S46 + S118 => S46 + S71 + Nuc_CDKN1A_CCNE_A_B_Ser130_p; kPhCDKN1AByCb*S46*S118*Nuc;
  R619: Nuc_CDKN1A_CCNE_A_B_Ser130_p => Nuc_CDKN1A_CCNE_A_B_Ser130_u; kDpCDKN1A*Nuc_CDKN1A_CCNE_A_B_Ser130_p*Nuc;
  R620: S120 => Cyt_CCNA_CDKN1A_B; kDeCDKN1B_1*S120*Cyt;
  R621: S121 => Nuc_CCNA_CDKN1A_B; kDeCDKN1B_1*S121*Nuc;
  R622: S122 => Cyt_CCNE_CDKN1A_B; kDeCDKN1B_1*S122*Cyt;
  R623: S123 => Nuc_CCNE_CDKN1A_B; kDeCDKN1B_1*S123*Nuc;
  R624: Nuc_CDKN1B_CCNE_A_Thr187_p => ; kDeCDKN1B_1*Nuc_CDKN1B_CCNE_A_Thr187_p*Nuc;
  R625: Cyt_SKP2 + S120 => Cyt_CCNA_CDKN1A_B + Cyt_SKP2; kDeCDKN1B_2*Cyt_SKP2*S120*Cyt;
  R626: Cyt_SKP2 + S122 => Cyt_CCNE_CDKN1A_B + Cyt_SKP2; kDeCDKN1B_2*Cyt_SKP2*S122*Cyt;
  R627: Nuc_SKP2 + Nuc_CDKN1B_CCNE_A_Thr187_p => Nuc_SKP2; kDeCDKN1B_2*Nuc_SKP2*Nuc_CDKN1B_CCNE_A_Thr187_p*Nuc;
  R628: Nuc_SKP2 + S121 => Nuc_CCNA_CDKN1A_B + Nuc_SKP2; _rateLaw3*Nuc_SKP2*S121*Nuc;
  R629: Nuc_SKP2 + S123 => Nuc_CCNE_CDKN1A_B + Nuc_SKP2; _rateLaw3*Nuc_SKP2*S123*Nuc;
  R630: Nuc_CCNA_CDKN1A_B + Nuc_CDKN1B_CCNE_A_Thr187_p => S125; kAsCdkn1bC*Nuc_CCNA_CDKN1A_B*Nuc_CDKN1B_CCNE_A_Thr187_p*Nuc;
  R631: S120 => Cyt_CCNA_CDKN1A_B + Cyt_CDKN1B_CCNE_A_Thr187_p; kDiCdkn1bC*S120*Cyt;
  R632: S121 => Nuc_CCNA_CDKN1A_B + Nuc_CDKN1B_CCNE_A_Thr187_u; kDiCdkn1bC*S121*Nuc;
  R633: Nuc_CCNE_CDKN1A_B + Nuc_CDKN1B_CCNE_A_Thr187_p => S126; kAsCdkn1bC*Nuc_CCNE_CDKN1A_B*Nuc_CDKN1B_CCNE_A_Thr187_p*Nuc;
  R634: S122 => Cyt_CCNE_CDKN1A_B + Cyt_CDKN1B_CCNE_A_Thr187_p; kDiCdkn1bC*S122*Cyt;
  R635: S123 => Nuc_CCNE_CDKN1A_B + Nuc_CDKN1B_CCNE_A_Thr187_u; kDiCdkn1bC*S123*Nuc;
  R636: Nuc_CCNE_CDKN1A_B + S121 => Nuc_CCNE_CDKN1A_B + S125; kPhCDKN1BByCe*Nuc_CCNE_CDKN1A_B*S121*Nuc;
  R637: Nuc_CCNE_CDKN1A_B + S123 => Nuc_CCNE_CDKN1A_B + S126; kPhCDKN1BByCe*Nuc_CCNE_CDKN1A_B*S123*Nuc;
  R638: Nuc_CCNA_CDKN1A_B + S121 => Nuc_CCNA_CDKN1A_B + S125; kPhCDKN1BByCa*Nuc_CCNA_CDKN1A_B*S121*Nuc;
  R639: Nuc_CCNA_CDKN1A_B + S123 => Nuc_CCNA_CDKN1A_B + S126; kPhCDKN1BByCa*Nuc_CCNA_CDKN1A_B*S123*Nuc;
  R640: S46 + S121 => S46 + S125; kPhCDKN1BByCb*S46*S121*Nuc;
  R641: S46 + S123 => S46 + S126; kPhCDKN1BByCb*S46*S123*Nuc;
  R642: S120 => S110; kDpCDKN1B*S120*Cyt;
  R643: S122 => S111; kDpCDKN1B*S122*Cyt;
  R644: Nuc_CDKN1B_CCNE_A_Thr187_p => Nuc_CDKN1B_CCNE_A_Thr187_u; kDpCDKN1B*Nuc_CDKN1B_CCNE_A_Thr187_p*Nuc;
  R645: Num_NUP_pSites_u + S115 => Num_NUP_pSites_u + S105; kExImCCNA_CDKN1A_B1__CDKN1A_CCNE_A_B1_Ser130u__1*Num_NUP_pSites_u*S115*Num;
  R646: Num_NUP_pSites_u + S116 => Num_NUP_pSites_u + S106; kExImCCNE_CDKN1A_B1__CDKN1A_CCNE_A_B1_Ser130u__1*Num_NUP_pSites_u*S116*Num;
  R647: Num_NUP_pSites_u + S117 => Num_NUP_pSites_u + S107; kExImCCNB_CDK1_Thr14_Tyr15u_CDKN1A1__CDKN1A_CCNE_A_B1_Ser130u__1*Num_NUP_pSites_u*S117*Num;
  R648: Num_NUP_pSites_u + S118 => Num_NUP_pSites_u + S108; kExImCCNB_CDK1_Thr14_Tyr15p_CDKN1A1__CDKN1A_CCNE_A_B1_Ser130u__1*Num_NUP_pSites_u*S118*Num;
  R649: Num_NUP_pSites_u + Nuc_CDKN1A_CCNE_A_B_Ser130_p => Num_NUP_pSites_u + Cyt_CDKN1A_CCNE_A_B_Ser130_p; kExImCDKN1A_CCNE_A_B_Ser130p__1*Num_NUP_pSites_u*Nuc_CDKN1A_CCNE_A_B_Ser130_p*Num;
  R650: Num_NUP_pSites_u + S121 => Num_NUP_pSites_u + S110; kExImCCNA_CDKN1A_B1__CDKN1B_CCNE_A1_Thr187u__1*Num_NUP_pSites_u*S121*Num;
  R651: Num_NUP_pSites_u + S123 => Num_NUP_pSites_u + S111; kExImCCNE_CDKN1A_B1__CDKN1B_CCNE_A1_Thr187u__1*Num_NUP_pSites_u*S123*Num;
  R652: Num_NUP_pSites_u + Nuc_CDKN1B_CCNE_A_Thr187_p => Num_NUP_pSites_u + Cyt_CDKN1B_CCNE_A_Thr187_p; kExImCDKN1B_CCNE_A_Thr187p__1*Num_NUP_pSites_u*Nuc_CDKN1B_CCNE_A_Thr187_p*Num;
  R653: Num_NUP_pSites_u + S120 => Num_NUP_pSites_u + S125; kImImCCNA_CDKN1A_B1__CDKN1B_CCNE_A1_Thr187p__1*Num_NUP_pSites_u*S120*Num;
  R654: Num_NUP_pSites_u + S122 => Num_NUP_pSites_u + S126; kImImCCNE_CDKN1A_B1__CDKN1B_CCNE_A1_Thr187p__1*Num_NUP_pSites_u*S122*Num;
  R655: S126 => Nuc_CDKN1B_CCNE_A_Thr187_p; kDeCe*S126*Nuc;
  R656: Nuc_CCNE_CDKN1A_B + S126 => Nuc_CCNE_CDKN1A_B + Nuc_CDKN1B_CCNE_A_Thr187_p; kPhCeE*Nuc_CCNE_CDKN1A_B*S126*Nuc;
  R657: S125 => Nuc_CDKN1B_CCNE_A_Thr187_p; kDeCa1*S125*Nuc;
  R658: Nuc_CCNA_CDKN1A_B + S126 => Nuc_CCNA_CDKN1A_B + Nuc_CDKN1B_CCNE_A_Thr187_p; kPhCeA*Nuc_CCNA_CDKN1A_B*S126*Nuc;
  R659: S56 + S125 => S56 + Nuc_CDKN1B_CCNE_A_Thr187_p; kDeCa2*S56*S125*Nuc;
  R660: S62 + S125 => S62 + Nuc_CDKN1B_CCNE_A_Thr187_p; kDeCa2*S62*S125*Nuc;
  R661: S54 + S125 => S54 + Nuc_CDKN1B_CCNE_A_Thr187_p; kDeCa3*S54*S125*Nuc;
  R662: S125 => Nuc_CCNA_CDKN1A_B; kDeCDKN1B_1*S125*Nuc;
  R663: S126 => Nuc_CCNE_CDKN1A_B; kDeCDKN1B_1*S126*Nuc;
  R664: Nuc_SKP2 + S125 => Nuc_CCNA_CDKN1A_B + Nuc_SKP2; kDeCDKN1B_2*Nuc_SKP2*S125*Nuc;
  R665: Nuc_SKP2 + S126 => Nuc_CCNE_CDKN1A_B + Nuc_SKP2; kDeCDKN1B_2*Nuc_SKP2*S126*Nuc;
  R666: S125 => Nuc_CCNA_CDKN1A_B + Nuc_CDKN1B_CCNE_A_Thr187_p; kDiCdkn1bC*S125*Nuc;
  R667: S126 => Nuc_CCNE_CDKN1A_B + Nuc_CDKN1B_CCNE_A_Thr187_p; kDiCdkn1bC*S126*Nuc;
  R668: S125 => S121; kDpCDKN1B*S125*Nuc;
  R669: S126 => S123; kDpCDKN1B*S126*Nuc;
  R670: Num_NUP_pSites_u + S125 => Num_NUP_pSites_u + S120; kExImCCNA_CDKN1A_B1__CDKN1B_CCNE_A1_Thr187p__1*Num_NUP_pSites_u*S125*Num;
  R671: Num_NUP_pSites_u + S126 => Num_NUP_pSites_u + S122; kExImCCNE_CDKN1A_B1__CDKN1B_CCNE_A1_Thr187p__1*Num_NUP_pSites_u*S126*Num;

  // Unit definitions:
  unit substance = item;
end
